Simulations: Version=6
  Memo TitlePage
    # APSIM Barley Model

    _Khaembah E.N., Zyskowski, R.F. and Brown, H.E._

    The APSIM Barley Model has been developed using the Plant Modelling Framework (PMF) of Brown et al. (2014). This framework provides a library of plant organ and process submodels that can be coupled, at runtime, to construct a model in much the same way that models can be coupled to construct a simulation. This means that dynamic composition of lower level process and organ classes (e.g. photosynthesis, leaf) into larger constructions (e.g. maize, wheat, sorghum) can be achieved by the model developer without additional coding.

    The model consists of:

    * a phenology model to simulate development between growth phases
    * a structure model to simulate plant morphology
    * a collection of organs to simulate the various plant parts
    * an arbitrator to allocate resources (N, biomass) to various plant organs.
  Replacements
    Plant Barley: CropType=Wheat
      OrganArbitrator Arbitrator
        RelativeAllocation NArbitrator
        RelativeAllocation DMArbitrator
      Phenology: DaysAfterSowing=0
        Memo
          Phenology takes into account the daily mean soil (pre-germination) and air (post-germination) temperature, the length of photoperiod as well as the water, nitrogen and vernalisation statuses (e.g. Mirschel et al. (2005).
          The barley cultivar "Valetta" used in this model is not sensitive to vernalisation and therefore nil sensitivity is used to reflect that.
          The data  shows a slowdown in phenological developement in winter conditions, which could be due to temperature and photoperiod.
        MultiplyFunction ThermalTime
          Memo
            Photothermal time based on Sonego 1997

            TTbase = T-0

            FP = Max (0, (P -7)/9)

            TT = TTBase*FP

            Note.  Effectively Mid winter thermal time approaces 0, whereas midsummer approaches TTbase thus mabely accumlating a low temperature eefect.
          AirTemperatureFunction ThermalTimeB0
            XYPairs: X=[0, 15, 30, 40]; Y=[0, 15, 30, 0]
            Memo
              Thermal time determines the rate of developmental progress through many of the crops phases and is used by organs to determing potential growth rates.
          MaximumFunction FP
            Constant Zero: FixedValue=0
            DivideFunction
              SubtractFunction PP7
                VariableReference Photoperiod: VariableName=[Phenology].Photoperiod.Value()
                Constant Seven: FixedValue=7
              Constant Nine: FixedValue=9
        SoilTemperatureFunction: maxt_soil_surface=20; mint_soil_surface=10
          XYPairs: X=[0, 30, 40]; Y=[0, 30, 0]
        PhotoperiodFunction Photoperiod: Twilight=-6; DayLength=0
        PhotoperiodDeltaFunction: Twilight=-6
        PhaseLookup PercievedPhotoPeriod
          PhaseLookupValue ApexBelowGround: Start=Germination; End=Emergence
            Constant Photoperiod: FixedValue=0; Units=h
          PhaseLookupValue ApexAboveGround: Start=Emergence; End=HarvestRipe
            MultiplyFunction
              VariableReference Photoperiod: VariableName=[Phenology].Photoperiod.Value()
              LinearInterpolationFunction: XProperty=[Phenology].PhotoperiodDeltaFunction.Value()
                XYPairs: X=[-24, 0, 0.1, 24]; Y=[0, 0, 1, 1]
        Constant VrnSensitivity: FixedValue=0; Units=Leaves
          Memo
            Barley cultivar "Valetta" used in this model is a spring variety and therefore does not require a period of cold temperature (vernalisation) to initiate reproduction.
        Constant MinimumLeafNumber: FixedValue=6; Units=Leaves
          Memo
            Number of leaves the plant will produce when grown in long photoperiod.
        Constant VernLag: FixedValue=1; Units=Unitless
          Memo
            This represents the the temperature requirement to trigger vernalisation response.  The value is relative to the amount of vernalisation temperature required from the end of the lag until vernalisation saturation.  A value of 0 means there is no lag, a value of 1 means the lag is the same (in vernal time) as the vernalisation requirement and a value of 2 means the lag is twice as long as the vernalisation response phase

            This is not used in this barley model.
        Constant PpSensitivity: FixedValue=6; Units=Leaves
          Memo
            The reduction in leaf number when day length decreases from 8 to 16 h Pp

            This is not currently used in the barley model.
        Constant EarlyReproductivePpSensitivity: FixedValue=0
          Memo
            The phyllochrons duration for the plant to go from flag leaf ligule appearance at 16 h Pp compared to the phyllochron duration for the same phase at 8 h Pp.

            Not used in current barley model.
        Constant EarlyReproductiveLongDayBase: FixedValue=2.5
          Memo
            The phyllochrons duration for the plant to go from flag leaf ligule appearance at 16 h Pp.

            Not used in current barley model.
        GerminatingPhase Germinating: Start=Sowing; End=Germination
        EmergingPhase Emerging: Start=Germination; End=Emergence; ShootLag=40; ShootRate=6
          VariableReference ThermalTime: VariableName=[Phenology].ThermalTime.Value()
          Memo
            On the assumption that the soil moisture is adequate, temperature is the main driver of phenology during the germination phase. Based on Alzueta et al (2012), barley requires 150°Cd from sowing to emergence.
        GenericPhase Vegetative: Start=Emergence; End=VS
          Memo
            This is the first 4-6 leaf growth of the emerged oat plant, In the current model is decides the final leaf number based on Martin et al 1998.

            At the end of this grwth stage a trigger event occurs which calculates the final leaf number (FLN).

            Currently the leaf number is 4, due to March sowings in which th sixth leaf does not emerge until after june.
          VariableReference ThermalTime: VariableName=[Phenology].ThermalTime.Value()
          MultiplyFunction Target
            Constant Six: FixedValue=6
            VariableReference Phyll: VariableName=[Structure].BasePhyllochron.Value()
        GenericPhase EarlyReproductive: Start=VS; End=TerminalSpikelet
          Memo
            Growth occurs until terminal spikelet occurs.

            In this case TS is driven fron the FLN

            Duration is (TS-6)*Phyllocgron
          VariableReference ThermalTime: VariableName=[Phenology].ThermalTime.Value()
          MultiplyFunction Target
            SubtractFunction
              VariableReference TST: VariableName=[Structure].TSLN.Value()
              Constant Six: FixedValue=6
            VariableReference Phyllochron: VariableName=[Structure].BasePhyllochron.Value()
        GenericPhase StemElongation: Start=TerminalSpikelet; End=FlagLeaf
          Memo
            The Time for the FlagLeaf to appear post TS

            1.5 * Phyylchron
          VariableReference ThermalTime: VariableName=[Phenology].ThermalTime.Value()
          MultiplyFunction Target
            VariableReference Phyllochron: VariableName=[Structure].BasePhyllochron.Value()
            Constant exp: FixedValue=1.5
        GenericPhase EarDevelopment: Start=FlagLeaf; End=Flowering
          VariableReference ThermalTime: VariableName=[Phenology].ThermalTime.Value()
          Memo
            The Time from flagLeaf  appearanace  to flowering

            Was constant at 100, however have cahnge it 1 Phyllchron.
          MultiplyFunction Target
            VariableReference Phyllochron: VariableName=[Structure].BasePhyllochron.Value()
            Constant exp: FixedValue=1
        GenericPhase GrainDevelopment: Start=Flowering; End=StartGrainFill
          Constant Target: FixedValue=240
          VariableReference ThermalTime: VariableName=[Phenology].ThermalTime.Value()
        GenericPhase GrainFilling: Start=StartGrainFill; End=EndGrainFill
          Constant Target: FixedValue=900
          VariableReference ThermalTime: VariableName=[Phenology].ThermalTime.Value()
        GenericPhase Maturing: Start=EndGrainFill; End=Maturity
          Constant Target: FixedValue=35
          VariableReference ThermalTime: VariableName=[Phenology].ThermalTime.Value()
        GenericPhase Ripening: Start=Maturity; End=HarvestRipe
          Constant Target: FixedValue=300
          VariableReference ThermalTime: VariableName=[Phenology].ThermalTime.Value()
        EndPhase ReadyForHarvesting: Start=HarvestRipe; End=Unused
          VariableReference ThermalTime: VariableName=[Phenology].ThermalTime.Value()
        ZadokPMF Zadok
        OnEventFunction FlagLeafDAS: SetEvent=FlagLeaf; ReSetEvent=never
          Memo
            A function is used to provide flowering date as days after sowing(DAS).
          Constant PreEventValue: FixedValue=0
          VariableReference PostEventValue: VariableName=[Phenology].DaysAfterSowing
        OnEventFunction FloweringDAS: SetEvent=Flowering; ReSetEvent=never
          Memo
            A function is used to provide flowering date as days after sowing(DAS).
          Constant PreEventValue: FixedValue=0
          VariableReference PostEventValue: VariableName=[Phenology].DaysAfterSowing
        OnEventFunction MaturityDAS: SetEvent=Maturity; ReSetEvent=never
          Memo
            A function is used to provide maturity date as days after sowing(DAS).
          Constant PreEventValue: FixedValue=0
          VariableReference PostEventValue: VariableName=[Phenology].DaysAfterSowing
            VariableReference PostEventValue: VariableName=[Phenology].DaysAfterSowing
      Structure: Initialised=false; Germinated=false; Emerged=false; CohortToInitialise=0; TipToAppear=0; ApexNum=0
        VariableReference ThermalTime: VariableName=[Phenology].ThermalTime.Value()
        MultiplyFunction MainStemNodeAppearanceRate
          Memo Rational
            Based on [Jamieson_SIRIUS_1998] where leaf appearace could be described by a base phyllochron determined between leaves 2 and 7 and a phyllochron that was 70% of base phyllochron for leaves < 2 and 130% of base phyllochron for leaves > 7
          LinearInterpolationFunction LeafStageFactor: XProperty=[Leaf].AppearedCohortNo
            XYPairs: X=[0, 2, 4, 6, 8, 14, 18]; Y=[0.75, 0.9, 1, 1.1, 1.2, 1.1, 1.5]
          LinearInterpolationFunction PhotoPeriodEffect: XProperty=[Phenology].Photoperiod.Value()
            XYPairs: X=[8, 12, 14]; Y=[1, 1, 1]
          VariableReference Phyllochron: VariableName=[Structure].BasePhyllochron.Value()
        MultiplyFunction BranchingRate
          PhaseLookup PotentialBranchingRate
            PhaseLookupValue Vegetative: Start=Emergence; End=TerminalSpikelet
              LinearInterpolationFunction PotentialBranchingRate: XProperty=[Structure].LeafTipsAppeared
                XYPairs: X=[1, 2, 3, 4, 5, 6, 7, 8]; Y=[0, 1, 1, 1, 2, 2, 2, 2]
            PhaseLookupValue Reproductive: Start=TerminalSpikelet; End=HarvestRipe
              Constant Zero: FixedValue=0
          MinimumFunction StressFactors
            LinearInterpolationFunction WSC: XProperty=[Stem].PercentWSC.Value()
              XYPairs: X=[0.2, 0.27]; Y=[1, 1]
            LinearInterpolationFunction Nitrogen: XProperty=[Arbitrator].FN
              XYPairs: X=[0.5, 2, 3]; Y=[0, 1, 1]
            LinearInterpolationFunction Cover: XProperty=[Leaf].CoverTotal
              XYPairs: X=[0, 0.1, 0.25]; Y=[1, 1, 0]
            LinearInterpolationFunction Growth: XProperty=[Structure].MeanTillerGrowthRate.Value()
              XYPairs: X=[0, 0.001, 0.005]; Y=[1, 1, 1]
            LinearInterpolationFunction PhotoPeriodEffect: XProperty=[Phenology].Photoperiod.Value()
              XYPairs: X=[11.99, 12, 14]; Y=[1, 1, 1]
            LinearInterpolationFunction TemperatureEffect: XProperty=[Weather].MeanT
              XYPairs: X=[4, 10, 14]; Y=[1, 1, 1]
        PhaseLookup BranchMortality
          PhaseLookupValue MortalityPhase: Start=FlagLeaf; End=Flowering
            MultiplyFunction Mortality
              LinearInterpolationFunction MortalityPerDegDay: XProperty=[Structure].MeanTillerGrowthRate.Value()
                XYPairs: X=[0, 0.005, 0.005]; Y=[0.002, 0, 0]
              VariableReference ThermalTime: VariableName=[Phenology].ThermalTime.Value()
        HeightFunction HeightModel
          LinearInterpolationFunction PotentialHeight: XProperty=[Phenology].Stage
            XYPairs: X=[3, 4, 5, 6, 7]; Y=[10, 200, 1000, 1100, 1200]
          LinearInterpolationFunction WaterStress: XProperty=[Barley].WaterSupplyDemandRatio
            XYPairs: X=[0.3, 1]; Y=[0, 1]
        MovingAverageFunction MeanTillerGrowthRate: NumberOfDays=5; InitialValue=0
          DivideFunction TillerGrowthRate
            VariableReference DailyGrowth: VariableName=[Arbitrator].DM.TotalFixationSupply
            VariableReference ThermalTime: VariableName=[Phenology].ThermalTime.Value()
            VariableReference StemPopulation: VariableName=[Structure].TotalStemPopn
        MovingAverageFunction MeanPhyllochron: NumberOfDays=300; InitialValue=80
          VariableReference Phyllochron: VariableName=[Structure].MainStemNodeAppearanceRate.Value()
        DivideFunction HaunStageTerminalSpikelet
          SubtractFunction FLNlessIntercept
            VariableReference FinalLeafNumber: VariableName=[Structure].MainStemFinalNodeNumber.Value()
            Constant Intercept: FixedValue=2.85
          Constant Slope: FixedValue=1.1
        AddFunction HaunStage
          VariableReference AppearedLeaves: VariableName=[Leaf].ExpandedCohortNo
          VariableReference ProportionOfExpandingLeaf: VariableName=[Leaf].NextExpandingLeafProportion
        PhaseLookup ThermalTimeP
          PhaseLookupValue SoilTemperature: Start=Sowing; End=TerminalSpikelet
            SoilTemperatureFunction: maxt_soil_surface=20; mint_soil_surface=10
              XYPairs: X=[0, 30, 40]; Y=[0, 30, 0]
          PhaseLookupValue AirTemperature: Start=TerminalSpikelet; End=HarvestRipe
            AirTemperatureFunction
              XYPairs: X=[0, 30, 40]; Y=[0, 30, 0]
        MinimumFunction MainStemFinalNodeNumber
          Memo
            An event driven method of calculating the final leaf number, Base on Martin et al 1998

            Event  occurs when vegtative stage switches to Reproductive, either 4 or 6 leaf appearance.

            If event occurs when PhotoPeriod is decreasing, then final leaf number is the MLN -2.

            Otherwise

            FLN = MLN - lc(PPS)

            For Drummond these values  MLN = 17 and Lc = 0.56

            THe model allows these to be cultivar deined.
          Constant MaxLN: FixedValue=15
          MinimumFunction FLN
            OnEventFunction AtLeafSix: SetEvent=VS; ReSetEvent=never
              VariableReference PreEventValue: VariableName=[Structure].MaxLN.Value()
              MaximumFunction PostEventValue
                Constant Zero: FixedValue=0
                LessThanFunction
                  VariableReference TestVariable: VariableName=[Phenology].PhotoperiodDeltaFunction.Value()
                  Constant Zero: FixedValue=0
                  SubtractFunction IfTrue
                    VariableReference MLN: VariableName=[Structure].MaxLN.Value()
                    Constant Two: FixedValue=2
                  SubtractFunction IfFalse
                    VariableReference MLN: VariableName=[Structure].MaxLN.Value()
                    MultiplyFunction Ic
                      VariableReference PP: VariableName=[Phenology].Photoperiod.Value()
                      VariableReference PPS: VariableName=[Structure].PPSlope.Value()
            VariableReference MLN: VariableName=[Structure].MaxLN.Value()
        MinimumFunction TSLN
          Memo
            Terminal spikelet leaf number

            This value is highly related to final leaf number, The FLN is probably dependent on TSLN rather than as cuurently defined.

            Calculation baed on Sonego 2000

            TSLN = FLN*0.995 - 1.95
          VariableReference MLN: VariableName=[Structure].MaxLN.Value()
          SubtractFunction
            MultiplyFunction
              VariableReference FLN: VariableName=[Structure].MainStemFinalNodeNumber.Value()
              Constant PS: FixedValue=0.995
            Constant LVS: FixedValue=1.95
        Constant MaxLN: FixedValue=17
        Constant BasePhyllochron: FixedValue=100; Units=oC.d
          Memo
            This is based on a range of 96.4 - 119.7°Cd for different varieties of barley measured in a previous experiment(Alzueta et al. 2012).
        Constant PPSlope: FixedValue=0.5
      ReproductiveOrgan Grain: GrowthRespiration=0; MaintenanceRespiration=0; RipeStage=Ripe
        Memo
          Grain model current a pure supply model, that is currently uses  a partition model to determine amount

          The grain Number model model left here does nothing, it is there so we can switch to it later if required.

          N conc values are from Zhao et al 2009
        Biomass Live
        Biomass Dead
        Constant MaxNConcDailyGrowth: FixedValue=0.03
        Constant WaterContent: FixedValue=0.12
        Constant MinimumNConc: FixedValue=0.02; Units=0.045
        Constant MaximumNConc: FixedValue=0.0192
          Memo
            Grain N concentration of 1.92 % according to Procrop (ref xx)
        Constant MaximumPotentialGrainSize: FixedValue=0.043; Units=g
        PhaseBasedSwitch NitrogenDemandSwitch: Start=Germination; End=Maturity
        AccumulateFunction AccumThermalTime: StartStageName=Flowering; EndStageName=Maturity
          VariableReference DailyThermalTimeValue: VariableName=[Phenology].ThermalTime.Value()
        AirTemperatureFunction FillingRate
          XYPairs: X=[0, 26, 30, 35]; Y=[0, 0.0015, 0.0015, 0.0015]
        PartitionFractionDemandFunction DMDemandFunction
          Memo
            Currently using Partitioning model based on SIRIUS rather tha grin filling model.
          PhaseLookup PartitionFraction
            PhaseLookupValue InitialPhase: Start=Flowering; End=StartGrainFill
              Constant: FixedValue=0.5
            PhaseLookupValue LinearPhase: Start=StartGrainFill; End=EndGrainFill
              MultiplyFunction
                Constant: FixedValue=0.7
                LinearInterpolationFunction FW: XProperty=[Leaf].Fw
                  XYPairs: X=[0, 0.5, 1]; Y=[1.5, 1.5, 1.5]
            PhaseLookupValue Ripening: Start=EndGrainFill; End=HarvestRipe
              Constant: FixedValue=0
        ExpressionFunction Protein
          Expression=([Grain].Live.N + [Grain].Dead.N)/([Grain].Live.Wt + [Grain].Dead.Wt) * 100 * 5.71
        DivideFunction GrowthRateGrainDevelopment
          AccumulateFunction AccumulatedGrowth: StartStageName=FlagLeaf; EndStageName=StartGrainFill
            VariableReference DailyBiomassProduction: VariableName=[Arbitrator].DM.TotalFixationSupply
          AccumulateFunction DaysOfGrainDevelopment: StartStageName=FlagLeaf; EndStageName=StartGrainFill
            Constant LenthOfADay: FixedValue=1; Units=days/day
        Constant InitialGrainProportion: FixedValue=0.2
        PhaseLookup NFillingRate
          PhaseLookupValue GrainFilling: Start=Flowering; End=EndGrainFill
            FillingRateFunction
              VariableReference NumberFunction: VariableName=[Grain].NumberFunction.Value()
              AddFunction FillingDuration
                VariableReference FloweringToGrainFilling: VariableName=[Phenology].GrainDevelopment.Target.Value()
                VariableReference GrainFilling: VariableName=[Phenology].GrainFilling.Target.Value()
              VariableReference ThermalTime: VariableName=[Phenology].ThermalTime.Value()
              MultiplyFunction PotentialSizeIncrement
                Constant MaximumFinalNConc: FixedValue=0.026; Units=g/g
                VariableReference MaximumSize: VariableName=[Grain].MaximumPotentialGrainSize.Value()
        BiomassRemoval BiomassRemovalDefaults
          OrganBiomassRemovalType Harvest: FractionLiveToRemove=1; FractionDeadToRemove=0; FractionLiveToResidue=0; FractionDeadToResidue=0
          OrganBiomassRemovalType Cut: FractionLiveToRemove=1; FractionDeadToRemove=0; FractionLiveToResidue=0; FractionDeadToResidue=0
          OrganBiomassRemovalType Prune: FractionLiveToRemove=0; FractionDeadToRemove=0; FractionLiveToResidue=0.8; FractionDeadToResidue=0
          OrganBiomassRemovalType Graze: FractionLiveToRemove=0.6; FractionDeadToRemove=0; FractionLiveToResidue=0.2; FractionDeadToResidue=0
          OrganBiomassRemovalType Thin: FractionLiveToRemove=0; FractionDeadToRemove=0; FractionLiveToResidue=0.05; FractionDeadToResidue=0
        HoldFunction NumberFunction: WhenToHold=Flowering
          MultiplyFunction ValueToHold
            Constant GrainsPerGramOfStem: FixedValue=22; Units=grains
            VariableReference StemMass: VariableName=[StemPlusSpike].Wt
              VariableReference StemMass: VariableName=[StemPlusSpike].Wt
      Root: GrowthRespiration=0; MaintenanceRespiration=0
        CompositeBiomass Live: Propertys=[[Root].LayerLive]
        CompositeBiomass Dead: Propertys=[[Root].LayerDead]
        LinearInterpolationFunction KLModifier: XProperty=[Leaf].LAI
          XYPairs: X=[0, 3]; Y=[1, 1]
        Constant SoilWaterEffect: FixedValue=1
        Constant MaxDailyNUptake: FixedValue=20
        Constant SenescenceRate: FixedValue=0.005
        Constant StructuralFraction: FixedValue=1
        Constant MaximumRootDepth: FixedValue=1000000
        PhaseLookup PartitionFraction
          PhaseLookupValue PreEmergence: Start=Germination; End=Emergence
            Constant Value: FixedValue=0
          PhaseLookupValue PreFlowering: Start=Emergence; End=Flowering
            Constant Value: FixedValue=0.2
          PhaseLookupValue PostFlowering: Start=Flowering; End=EndGrainFill
            Constant Value: FixedValue=0
        Constant MaximumNConc: FixedValue=0.01
        Constant MinimumNConc: FixedValue=0.01
        PhaseLookup RootFrontVelocity
          PhaseLookupValue PreEmergence: Start=Germination; End=Emergence
            Constant Value: FixedValue=5
          PhaseLookupValue PostEmergence: Start=Emergence; End=Maturity
            Constant Value: FixedValue=20
        PhaseBasedSwitch NitrogenDemandSwitch: Start=Germination; End=Maturity
        BiomassRemoval BiomassRemovalDefaults
          OrganBiomassRemovalType Harvest: FractionLiveToRemove=0; FractionDeadToRemove=0; FractionLiveToResidue=0.2; FractionDeadToResidue=0
          OrganBiomassRemovalType Cut: FractionLiveToRemove=0; FractionDeadToRemove=0; FractionLiveToResidue=0.3; FractionDeadToResidue=0
          OrganBiomassRemovalType Prune: FractionLiveToRemove=0; FractionDeadToRemove=0; FractionLiveToResidue=0.1; FractionDeadToResidue=0
          OrganBiomassRemovalType Graze: FractionLiveToRemove=0; FractionDeadToRemove=0; FractionLiveToResidue=0.15; FractionDeadToResidue=0
          OrganBiomassRemovalType Thin: FractionLiveToRemove=0; FractionDeadToRemove=0; FractionLiveToResidue=0.05; FractionDeadToResidue=0
        LinearInterpolationFunction KNO3: XProperty=[Root].LengthDensity
          XYPairs: X=[0, 0.004]; Y=[0.002, 0.02]
        LinearInterpolationFunction KNH4: XProperty=[Root].LengthDensity
          XYPairs: X=[0, 0.004]; Y=[0.001, 0.01]
        LinearInterpolationFunction NUptakeSWFactor: XProperty=[Root].RWC
          XYPairs: X=[0, 0.2, 1]; Y=[1, 1, 1]
        Constant InitialDM: FixedValue=0.2; Units=g/plant
        Constant SpecificRootLength: FixedValue=40; Units=m/g
      Leaf: MaxCover=1; Albedo=0.2; Gsmax=0.015; R50=150; MicroClimatePresent=true; KDead=0.3; MaximumMainStemLeafNumber=30
        zero: GrowthRespiration, MaintenanceRespiration, CurrentExpandingLeaf, StartFractionExpanded, FractionNextleafExpanded, DeadNodesYesterday, FRGR, PotentialEP, DMConversionEfficiency, TipsAtEmergence, CohortsAtInitialisation, FractionDied
        LeafCohort InitialLeaves[1]: DeltaWaterConstrainedArea=0; DeltaCarbonConstrainedArea=0; Rank=1; Area=200; MaintenanceRespiration=0
        LeafCohort InitialLeaves[2]: DeltaWaterConstrainedArea=0; DeltaCarbonConstrainedArea=0; Rank=2; Area=0; MaintenanceRespiration=0
        CompositeBiomass Live: Propertys=[[Leaf].CohortLive]
        CompositeBiomass Dead: Propertys=[[Leaf].CohortDead]
        ArrayBiomass CohortArrayLive: Propertys=[[Leaf].Live]; ArraySize=[Leaf].MaxNodeNo
        ArrayBiomass CohortArrayDead: Propertys=[[Leaf].Dead]; ArraySize=[Leaf].MaxNodeNo
        LeafCohortParameters CohortParameters
          Constant NReallocationFactor: FixedValue=1
          Constant MaintenanceRespirationFunction: FixedValue=0
          Constant NRetranslocationFactor: FixedValue=0.03
          Constant DMReallocationFactor: FixedValue=0
          Constant DMRetranslocationFactor: FixedValue=0.1
          MinimumFunction CellDivisionStress
            LinearInterpolationFunction WaterStressFactor: XProperty=[Barley].WaterSupplyDemandRatio
              XYPairs: X=[0, 1]; Y=[0.5, 1]
            LinearInterpolationFunction NitrogenStressFactor: XProperty=[Barley].Leaf.Fn
              XYPairs: X=[0, 0.5, 1]; Y=[0.1, 0.1, 1]
          MinimumFunction ExpansionStress
            LinearInterpolationFunction WaterStress: XProperty=[Barley].WaterSupplyDemandRatio
              XYPairs: X=[0, 0.7, 1]; Y=[0, 1, 1]
            LinearInterpolationFunction TemperatureEffect: XProperty=[Weather].MeanT
              XYPairs: X=[0, 12, 14]; Y=[0, 1, 1]
          MultiplyFunction MaxArea
            Constant AreaLargestLeaves: FixedValue=4000; Units=mm^2
            LinearInterpolationFunction AgeFactor: XProperty=[Phenology].Stage
              XYPairs: X=[3, 4, 5, 7, 9]; Y=[1, 0.6, 0.5, 0.2, 0]
              Memo
                Growth Stages and Phenology
                1 Sowing
                2 Germination
                3 Emergence
                4 VS
                5 TS
                6 FLag leaf
                7 Flowering
                8 SGF
                9 EGF
                10 HR
                11
          MultiplyFunction GrowthDuration
            Constant Multiplier: FixedValue=4
            VariableReference Phyllochron: VariableName=[Structure].MainStemNodeAppearanceRate.Value()
          PhaseLookup LagDurationP
            PhaseLookupValue VegetativeGrowth: Start=Emergence; End=TerminalSpikelet
              MultiplyFunction LagDuration
                VariableReference Phyllochron: VariableName=[Structure].MainStemNodeAppearanceRate.Value()
                LinearInterpolationFunction AgeFactor: XProperty=[Phenology].Stage
                  XYPairs: X=[0, 4, 9, 11]; Y=[1, 7, 9, 0]
                  Memo
                    Growth Stages and Phenology
                    1 Sowing
                    2 Germination
                    3 Emergence
                    4 VS
                    5 TS
                    6 FLag leaf
                    7 Flowering
                    8 SGF
                    9 EGF
                    10 HR
                    11
                Constant Multiplier: FixedValue=1
            PhaseLookupValue StemElongation: Start=TerminalSpikelet; End=Maturity
              SubtractFunction LagDuration
                AddFunction ThermalTimeToRipe
                  VariableReference GrainDevelopment: VariableName=[Phenology].GrainDevelopment.Target.Value()
                  VariableReference GrainFilling: VariableName=[Phenology].GrainFilling.Target.Value()
                  VariableReference Maturing: VariableName=[Phenology].Maturing.Target.Value()
                  VariableReference Ripening: VariableName=[Phenology].Ripening.Target.Value()
                    VariableReference Ripening: VariableName=[Phenology].Ripening.Target.Value()
                ExpressionFunction SenescenceDuration: Expression=[Leaf].CohortParameters.SenescenceDuration.Value()
          MultiplyFunction LagDuration
            VariableReference Phyllochron: VariableName=[Structure].MainStemNodeAppearanceRate.Value()
            LinearInterpolationFunction AgeFactor: XProperty=[Phenology].Stage
              XYPairs: X=[0, 4, 9, 11]; Y=[1, 2, 3, 0]
              Memo
                Growth Stages and Phenology
                1 Sowing
                2 Germination
                3 Emergence
                4 VS
                5 TS
                6 FLag leaf
                7 Flowering
                8 SGF
                9 EGF
                10 HR
                11
            Constant Multiplier: FixedValue=1
          MultiplyFunction SenescenceDuration
            Constant Multiplier: FixedValue=1
            VariableReference Phyllochron: VariableName=[Structure].MainStemNodeAppearanceRate.Value()
            LinearInterpolationFunction: XProperty=[Leaf].CohortParameters.MaxArea.Value()
              XYPairs: X=[0, 2000, 4500, 6000]; Y=[1, 2, 3, 4]
            LinearInterpolationFunction AgeFactor: XProperty=[Phenology].Stage
              XYPairs: X=[2, 4, 9, 11]; Y=[2, 2, 6, 0]
              Memo
                Growth Stages and Phenology
                1 Sowing
                2 Germination
                3 Emergence
                4 VS
                5 TS
                6 FLag leaf
                7 Flowering
                8 SGF
                9 EGF
                10 HR
                11
          Constant DetachmentLagDuration: FixedValue=1000000
          Constant DetachmentDuration: FixedValue=1000000
          Constant RelativeBranchLeafSize: FixedValue=1
          LinearInterpolationFunction MaximumNConc: XProperty=[Phenology].Stage
            XYPairs: X=[3, 4, 6]; Y=[0.08, 0.05, 0.02]
          LinearInterpolationFunction CriticalNConc: XProperty=[Phenology].Stage
            XYPairs: X=[3, 4, 6]; Y=[0.07, 0.04, 0.015]
          LinearInterpolationFunction MinimumNConc: XProperty=[Phenology].Stage
            XYPairs: X=[3, 4]; Y=[0.01, 0.005]
            AddFunction DroughtInducedLagAcceleration
              Constant One: FixedValue=1
                AddFunction DroughtInducedLagAcceleration
                  Constant One: FixedValue=1
                  MultiplyFunction Stress
                    Constant StressResponseCoefficient: FixedValue=1
                    LinearInterpolationFunction StressFactor: XProperty=[Barley].WaterSupplyDemandRatio
                      XYPairs: X=[0, 0.7]; Y=[1, 0]
              MultiplyFunction Stress
                Constant StressResponseCoefficient: FixedValue=1
                LinearInterpolationFunction StressFactor: XProperty=[Barley].WaterSupplyDemandRatio
                  XYPairs: X=[0, 0.7]; Y=[1, 0]
          AddFunction DroughtInducedLagAcceleration: same as Replacements.Barley.Leaf.CohortParameters.MinimumNConc.DroughtInducedLagAcceleration.One.DroughtInducedLagAcceleration
          AddFunction DroughtInducedSenAcceleration: same as Replacements.Barley.Leaf.CohortParameters.MinimumNConc.DroughtInducedLagAcceleration.One.DroughtInducedLagAcceleration
          LinearInterpolationFunction SpecificLeafAreaMax: XProperty=[Phenology].Stage
            XYPairs: X=[3, 4, 5]; Y=[35000, 71000, 71000]
            Memo
              Growth Stages and Phenology
              1 Sowing
              2 Germination
              3 Emergence
              4 VS
              5 TS
              6 FLag leaf
              7 Flowering
              8 SGF
              9 EGF
              10 HR
              11
          Constant SpecificLeafAreaMin: FixedValue=30000
          Constant InitialNConc: FixedValue=0
          Constant NonStructuralFraction: FixedValue=0.5
          Constant LeafSizeShapeParameter: FixedValue=0.3
          Constant SenessingLeafRelativeSize: FixedValue=1; Units=0-1
          MultiplyFunction ShadeInducedSenescenceRate
            LinearInterpolationFunction RatePerDegDay: XProperty=[Leaf].CohortCurrentRankCoverAbove
              XYPairs: X=[0.99, 1]; Y=[0, 0]
              Memo
                1% per degree day means it takes one phyllochron for a shaded leaf to fully sceness
            VariableReference ThermalTime: VariableName=[Phenology].ThermalTime.Value()
          PhaseLookup StructuralFraction
            PhaseLookupValue VegetativeGrowth: Start=Emergence; End=StartGrainFill
              Constant: FixedValue=0.5
            PhaseLookupValue StemElongation: Start=StartGrainFill; End=Maturity
              Constant: FixedValue=0
        RUEModel Photosynthesis
          Constant RUE: FixedValue=1.5
          WeightedTemperatureFunction FT: MaximumTemperatureWeighting=1
            XYPairs: X=[0, 4, 9, 15, 40]; Y=[0, 0, 1, 1, 1]
          LinearInterpolationFunction FVPD: XProperty=[Leaf].Photosynthesis.VPD
            XYPairs: X=[0, 10, 50]; Y=[1, 1, 1]
          LinearInterpolationFunction FN: XProperty=[Leaf].Fn
            XYPairs: X=[0, 1, 1.5]; Y=[0, 1, 1]
          LinearInterpolationFunction FW: XProperty=[Leaf].Fw
            XYPairs: X=[0, 0.3, 1]; Y=[0, 1, 1]
          RUECO2Function FCO2: PhotosyntheticPathway=C3
          VariableReference RadnInt: VariableName=[Leaf].RadIntTot
        LinearInterpolationFunction FrostFraction: XProperty=[Weather].MinT
          XYPairs: X=[-1, 0]; Y=[0, 0]
        VariableReference ThermalTime: VariableName=[Phenology].ThermalTime.Value()
        MinimumFunction FRGRFunction
          VariableReference RUE_FT: VariableName=[Leaf].Photosynthesis.FT.Value()
          MinimumFunction Others
            VariableReference RUE_FN: VariableName=[Leaf].Photosynthesis.FN.Value()
            VariableReference RUE_FVPD: VariableName=[Leaf].Photosynthesis.FVPD.Value()
        BiomassRemoval BiomassRemovalDefaults
          OrganBiomassRemovalType Harvest: FractionLiveToRemove=0; FractionDeadToRemove=0; FractionLiveToResidue=0.3; FractionDeadToResidue=0.3
          OrganBiomassRemovalType Cut: FractionLiveToRemove=0.8; FractionDeadToRemove=0.8; FractionLiveToResidue=0; FractionDeadToResidue=0
          OrganBiomassRemovalType Prune: FractionLiveToRemove=0; FractionDeadToRemove=0; FractionLiveToResidue=0.6; FractionDeadToResidue=0.6
          OrganBiomassRemovalType Graze: FractionLiveToRemove=0.6; FractionDeadToRemove=0.6; FractionLiveToResidue=0.1; FractionDeadToResidue=0.1
          OrganBiomassRemovalType Thin: FractionLiveToRemove=0; FractionDeadToRemove=0; FractionLiveToResidue=0.05; FractionDeadToResidue=0.05
          VariableReference ThermalTime: VariableName=[Phenology].ThermalTime.Value()
        Constant ExtinctionCoeff: FixedValue=0.5
        Constant StructuralFraction: FixedValue=0
        Constant DMConversionEfficiencyFunction: FixedValue=1; Units=0-1
      GenericOrgan Spike
        PopulationBasedDemandFunction DMDemandFunction
          VariableReference ThermalTime: VariableName=[Phenology].ThermalTime.Value()
          Constant ExpansionStress: FixedValue=1
          VariableReference OrganPopulation: VariableName=[Spike].HeadNumber.Value()
          Constant StartStage: FixedValue=5
          Constant MaximumOrganWt: FixedValue=0.2
          AddFunction GrowthDuration
            VariableReference EarlyReproductive: VariableName=[Phenology].EarlyReproductive.Target.Value()
            VariableReference GrainDevelopment: VariableName=[Phenology].GrainDevelopment.Target.Value()
        Biomass Live
        Biomass Dead
        Constant NReallocationFactor: FixedValue=0
        Constant NRetranslocationFactor: FixedValue=0.1
        Constant MaximumNConc: FixedValue=0.01
        Constant StructuralFraction: FixedValue=0.9
        Constant SenescenceRate: FixedValue=0; Units=/d
        Constant MinimumNConc: FixedValue=0.003
        MultiplyFunction HeadNumber
          Constant FertileTillers: FixedValue=1
          VariableReference StemPopulation: VariableName=[Structure].TotalStemPopn
        BiomassRemoval BiomassRemovalDefaults
          OrganBiomassRemovalType Harvest: FractionLiveToRemove=0.5; FractionDeadToRemove=0; FractionLiveToResidue=0.1; FractionDeadToResidue=0
          OrganBiomassRemovalType Cut: FractionLiveToRemove=0.8; FractionDeadToRemove=0; FractionLiveToResidue=0; FractionDeadToResidue=0
          OrganBiomassRemovalType Prune: FractionLiveToRemove=0; FractionDeadToRemove=0; FractionLiveToResidue=0.6; FractionDeadToResidue=0
          OrganBiomassRemovalType Graze: FractionLiveToRemove=0.6; FractionDeadToRemove=0; FractionLiveToResidue=0.2; FractionDeadToResidue=0
          OrganBiomassRemovalType Thin: FractionLiveToRemove=0; FractionDeadToRemove=0; FractionLiveToResidue=0.05; FractionDeadToResidue=0
        PhaseBasedSwitch NitrogenDemandSwitch: Start=Emergence; End=StartGrainFill
        PhaseLookup DMRetranslocationFactor
          PhaseLookupValue VegetativeGrowth: Start=Emergence; End=StartGrainFill
            Constant DMRetranslocationFactor: FixedValue=0
          PhaseLookupValue ReproductiveGrowth: Start=StartGrainFill; End=EndGrainFill
            Constant DMRetranslocationFactor: FixedValue=0.5
        Constant InitialWtFunction: FixedValue=0; Units=g/m^2
        Constant DetachmentRateFunction: FixedValue=0; Units=/d
        Constant MaintenanceRespirationFunction: FixedValue=0; Units=0-1
        Constant DMConversionEfficiency: FixedValue=1; Units=0-1
      GenericOrgan Stem
        Memo
          The stem model  currently uses  a partition model to determine amount allocated

          N conc values are from Zhao et al 2009
        Biomass Live
        Biomass Dead
        PhaseLookup StructuralFraction
          PhaseLookupValue VegetativeGrowth: Start=Sowing; End=FlagLeaf
            Constant Fraction: FixedValue=0.7
          PhaseLookupValue ReproductiveGrowth: Start=FlagLeaf; End=Flowering
            Constant Fraction: FixedValue=0.7
          PhaseLookupValue GrainFilling: Start=Flowering; End=EndGrainFill
            Constant Fraction: FixedValue=0.5
          PhaseLookupValue EndStemGrowth: Start=EndGrainFill; End=Maturity
            Constant Fraction: FixedValue=0
        Constant SenescenceRate: FixedValue=0.01; Units=/d
        LinearInterpolationFunction MaximumNConc: XProperty=[Phenology].Stage
          XYPairs: X=[3, 4, 5, 6]; Y=[0.045, 0.045, 0.045, 0.045]
        LinearInterpolationFunction MinimumNConc: XProperty=[Phenology].Stage
          XYPairs: X=[3, 4, 6]; Y=[0.0025, 0.0025, 0.0025]
        PhaseBasedSwitch NitrogenDemandSwitch: Start=Emergence; End=StartGrainFill
        Constant NReallocationFactor: FixedValue=0
        PhaseLookup NRetranslocationFactor
          PhaseLookupValue VegetativeGrowth: Start=Sowing; End=Flowering
            Constant Fraction: FixedValue=0
          PhaseLookupValue ReproductiveGrowth: Start=Flowering; End=HarvestRipe
            Constant Fraction: FixedValue=0.5
        PhaseLookup DMRetranslocationFactor: same as Replacements.Barley.Spike.DMRetranslocationFactor
        PartitionFractionDemandFunction DMDemandFunction
          PhaseLookup PartitionFraction
            PhaseLookupValue PreStemElongation: Start=Emergence; End=TerminalSpikelet
              Constant StemFraction: FixedValue=0.4
            PhaseLookupValue StemElongation: Start=TerminalSpikelet; End=FlagLeaf
              Constant StemFraction: FixedValue=0.6
            PhaseLookupValue EarEmergence: Start=FlagLeaf; End=Flowering
              Constant StemFraction: FixedValue=0.4
            PhaseLookupValue PostEarEmergence: Start=Flowering; End=StartGrainFill
              Constant StemFraction: FixedValue=0.4
              SubtractFunction
                Constant: FixedValue=0
            PhaseLookupValue BGF: Start=StartGrainFill; End=EndGrainFill
              Constant StemFraction: FixedValue=0.1
              SubtractFunction
                Constant: FixedValue=0
            PhaseLookupValue PostGrainFill: Start=EndGrainFill; End=HarvestRipe
              Constant Zero: FixedValue=0
              VariableReference: VariableName=[Grain].PartitionFraction.Value()
        BiomassRemoval BiomassRemovalDefaults: same as Replacements.Barley.Spike.BiomassRemovalDefaults
        DivideFunction PercentWSC
          VariableReference WSC: VariableName=[Stem].Live.NonStructuralWt
          VariableReference StemWt: VariableName=[Stem].Live.Wt
        Constant InitialWtFunction: FixedValue=0; Units=g/m^2
        Constant DetachmentRateFunction: FixedValue=0; Units=/d
        Constant MaintenanceRespirationFunction: FixedValue=0; Units=0-1
        Constant DMConversionEfficiency: FixedValue=1; Units=0-1
      CompositeBiomass AboveGround
        Propertys=[[Leaf].Live, [Leaf].Dead, [Stem].Live, [Stem].Dead, [Spike].Live, [Spike].Dead, [Grain].Live, [Grain].Dead]
      CompositeBiomass AboveGroundLive: Propertys=[[Leaf].Live, [Stem].Live, [Spike].Live, [Grain].Live]
      CompositeBiomass AboveGroundDead: Propertys=[[Leaf].Dead, [Stem].Dead, [Spike].Dead, [Grain].Dead]
      CompositeBiomass BelowGround: Propertys=[[Root].Live, [Root].Dead]
      CompositeBiomass Total
        Propertys=[[Leaf].Live, [Leaf].Dead, [Stem].Live, [Stem].Dead, [Root].Live, [Root].Dead, [Spike].Live, [Spike].Dead, [Grain].Live, [Grain].Dead]
      CompositeBiomass TotalLive
        Propertys=[[Leaf].Live, [Stem].Live, [Root].Live, [Spike].Live, [Grain].Live]
      CompositeBiomass TotalDead
        Propertys=[[Leaf].Dead, [Stem].Dead, [Root].Dead, [Spike].Dead, [Grain].Dead]
      CompositeBiomass Ear: Propertys=[[Spike].Live, [Grain].Live, [Spike].Dead, [Grain].Dead]
        Memo
          The Ear composite biomass object includes the Live and dead pools of all organs within the Ear to allow output for total dry matter and Nutrient contents, including total structural, non-structural and metabolic pools.
      CompositeBiomass StemPlusSpike: Propertys=[[Stem].Live, [Spike].Live, [Stem].Dead, [Spike].Dead]
      CultivarFolder Cultivars
        Cultivar Valetta
          Command:
            [Phenology].MinimumLeafNumber.FixedValue = 9
            [Phenology].VrnSensitivity.FixedValue = 7
            [Phenology].PpSensitivity.FixedValue = 3
            [Structure].BasePhyllochron.FixedValue = 80
        Cultivar Triumph
          Command:
            [Phenology].MinimumLeafNumber.FixedValue = 9
            [Phenology].VrnSensitivity.FixedValue = 7
            [Phenology].PpSensitivity.FixedValue = 3
            [Structure].BasePhyllochron.FixedValue = 80
    Report EndTrialReport: EventNames=[Clock].EndOfSimulation
      VariableNames:
        [Clock].Today
        [Barley].Structure.LeafTipsAppeared
        [Barley].Structure.MainStemFinalNodeNumber
        [Barley].Phenology.FlagLeafDAS
        [Barley].Phenology.FloweringDAS
        [Barley].Phenology.MaturityDAS
        [Script].CalcVals.SowMonth
    Report DailyReport: EventNames=[Clock].DoReport
      VariableNames:
        [Clock].Today
        [Weather].MeanT
        [Soil].SoilWater.SW
        [Soil].SoilWater.SWmm
        sum([Soil].SoilWater.SWmm) as ProfileWater
        [Barley].AboveGround.N
        [Barley].AboveGroundLive.Wt as AboveGround_LiveWt
        [Barley].AboveGroundLive.N
        [Barley].AboveGroundLive.N as AboveGround_LiveN
        [Barley].AboveGround.Wt as TotalAboveGroundWt
        [Barley].AboveGroundDead.N
        [Barley].AboveGroundDead.Wt
        [Barley].Arbitrator.DMDemand
        [Barley].Arbitrator.DM.TotalFixationSupply
        [Barley].Ear.N
        [Barley].Ear.Nconc
        [Barley].Ear.Wt
        [Barley].Spike.Live.Wt
        [Barley].Grain.N
        [Barley].Grain.NConc
        [Barley].Grain.Number
        [Barley].Grain.Size
        [Barley].Grain.Wt
        [Barley].Grain.Live.Wt
        [Barley].Leaf.AppearedCohortNo
        [Barley].Leaf.CoverDead
        [Barley].Leaf.CoverGreen
        [Barley].Leaf.CoverTotal
        [Barley].Leaf.Dead.N
        [Barley].Leaf.Dead.NConc
        [Barley].Leaf.Dead.Wt
        [Barley].Leaf.DeadCohortNo
        [Barley].Leaf.SenescingCohortNo
        [Barley].Leaf.ExpandedCohortNo
        [Barley].Leaf.Fn
        [Barley].Leaf.Fw
        [Barley].Leaf.Height
        [Barley].Leaf.InitialisedCohortNo
        [Barley].Leaf.LAI
        [Barley].Leaf.Live.N
        [Barley].Leaf.Live.NConc
        [Barley].Leaf.Live.Wt
        [Barley].Leaf.SpecificArea
        [Barley].Leaf.Transpiration
        [Barley].Phenology.CurrentPhaseName
        [Barley].Phenology.CurrentStageName
        [Barley].Phenology.DailyVernalisation.Value()
        [Barley].Phenology.MeanTemp.Value()
        [Barley].Phenology.Photoperiod.Value()
        [Barley].Phenology.Stage
        [Barley].Phenology.ThermalTime.Value()
        [Barley].Phenology.AccumulatedTT.Value()
        [Barley].Phenology.Vrn1.Value()
        [Barley].Phenology.Vrn2.Value()
        [Barley].Phenology.Vrn4.Value()
        [Barley].Phenology.Zadok.Stage
        [Barley].Population
        [Barley].Root.Depth
        [Barley].Root.N
        [Barley].Root.Wt
        [Barley].Root.Nconc
        [Barley].Root.WaterUptake
        [Barley].Spike.N
        [Barley].Spike.NConc
        [Barley].Spike.Wt
        [Barley].Spike.Live.NonStructuralWt
        [Barley].Stem.N
        [Barley].Stem.NConc
        [Barley].Stem.Wt
        [Barley].Stem.PercentWSC
        [Barley].Stem.Live.NonStructuralWt
        [Barley].StemPlusSpike.Wt
        [Barley].StemPlusSpike.N
        [Barley].SowingData.Cultivar
        [Barley].Structure.HaunStage.ValueTerminalSpikelet.Value()
        [Barley].Structure.HaunStage.Value()
        [Barley].Structure.Height
        [Barley].Structure.LeafTipsAppeared
        [Barley].Structure.MainStemFinalNodeNumber.Value()
        [Barley].Structure.MainStemFinalNodeNumber.ValueToHold.PhotoPLeaves.Value()
        [Barley].Structure.MainStemPopn
        [Barley].Structure.MeanTillerGrowthRate.Value()
        [Barley].Structure.TotalStemPopn
        [Barley].Total.N
        [Barley].Total.Wt
        [SurfaceOrganicMatter].Wt
        ([Barley].Leaf.Transpiration + [Soil].SoilWater.Es + [MicroClimate].interception) as ET
        sum([Soil].SoilNitrogen.NO3) as TotalSoilN
        [Barley].Phenology.FlagLeafDAS
        [Barley].Phenology.FloweringDAS
        [Barley].Phenology.MaturityDAS
        [Barley].Phenology.PhotoPeriod
        [Barley].Phenology.PhotoPeriodDeltaFunction
        [Barley].Phenology.Stage
        [Barley].Phenology.SoilTemperatureFunction.Value()
        [Irrigation].IrrigationApplied as Irrigation
        [Fertiliser].NitrogenApplied as NFert
        [Weather].Rain
        [Barley].Leaf.Fn
        [Barley].Leaf.Fw
        [Soil].SoilNitrogen.TotalN
        [Barley].Structure.CohortParams.MaxArea
  DataStore
    Input Biomass9596: FileName=Observations\BarleyObservedData9596.txt
      ErrorMessage=The process cannot access the file 'C:\ApsimX\Prototypes\Barley\Observations\BarleyObservedData9596.txt' because it is being used by another process.
    Input Biomass8889: FileName=Observations\BarleyObservedData_8889.txt
      ErrorMessage=The process cannot access the file 'C:\ApsimX\Prototypes\Barley\Observations\BarleyObservedData_8889.txt' because it is being used by another process.
    Input Phenology9596: FileName=Observations\BarleyPhenologyData2.txt
      ErrorMessage=The number of headings and units doesn't match in file: C:\ApsimX\Prototypes\Barley\Observations\BarleyPhenologyData2.txt
    PredictedObserved PredictedObserved_9596: PredictedTableName=DailyReport; ObservedTableName=Biomass9596; FieldNameUsedForMatch=Clock.Today
      Tests
    PredictedObserved PredictedObserved_Physio: PredictedTableName=DailyReport; ObservedTableName=Phenology9596; FieldNameUsedForMatch=Clock.Today
      Tests: POName=PredictedObserved_Physio
        AcceptedStats:
          Name                               n   Slope        Intercept  SEslope      SEintercept  R2           RMSE     NSE       ME        MAE      RSR
          Barley.Phenology.FlagLeafDAS       43  2.9295       -150.601   0.328364     22.8453      0.660013     23.734   -15.3946  -16.8372  16.8372  4.00166
          Barley.Phenology.FloweringDAS      43  0            65         0            0            -            17.2202  -6.18376  -15.9767  15.9767  2.6489
          Barley.Structure.LeafTipsAppeared  31  9.54231e-14  8.71417    8.11228e-08  6.03138e-07  4.76286e-14  1.38099  -7.27059  1.29482   1.29482  2.8291
        AcceptedStatsName=Name n Slope Intercept SEslope SEintercept R2 RMSE NSE ME MAE RSR
  Simulation RS_Barley_Potential
    Weather: FileName=Weather\lincoln.met
    Clock: StartDate=1995-10-19; EndDate=1996-02-29
    Summary summaryfile
    SoilArbitrator Soil Arbitrator
    Zone Paddock: Area=1; Slope=0
      Manager DAS
        DAS = 0
```csharp
using System;
using Models.Core;
using System.Collections.Generic;
using System.Text;
using Models.PMF;
using Models;
using System.Xml.Serialization;
using APSIM.Shared.Utilities;
using System.Data;

namespace Models
{
	[Serializable] 
	//[System.Xml.Serialization.XmlInclude(typeof(Model))]
	public class Script : Model
	{
		
	
		
		
		[Description("Days after sowing")]
		public double DAS { get; set; }
		
		[EventSubscribe("DoInitialSummary")]
		private void OnDoInitialSummary(object sender, EventArgs e)
		{
			DAS = 0;
		}
		
		[EventSubscribe("DoReportCalculations")]
		private void OnDoReportCalculations(object sender, EventArgs e)
		{
			DAS += 1;
		}
	
	}
}
```
      Soil: SoilType=NZ_sedementary; Region=Plains; State=Canterbury; Country=New Zealnd; Latitude=0; Longitude=0
        Analysis: Thickness=[100, 200, 300, 300, 300, 300]; PH=[6.6, 6.2, 5.7, 5.5, 5.5, 5.5]; PHUnits=Water; BoronUnits=HotWater
        Water
          Thickness  BD    AirDry  LL15  DUL   SAT   KS
          200        1.23  0.05    0.14  0.33  0.48  4832.039
          200        1.23  0.05    0.14  0.33  0.48  389.229
          200        1.59  0.16    0.13  0.29  0.4   16.362
          200        1.57  0.17    0.11  0.28  0.38  97.995
          200        1.57  0.17    0.17  0.3   0.37  97.995
          200        1.6   0.17    0.17  0.3   0.36  97.995
          200        1.6   0.17    0.17  0.3   0.36  97.995
          200        1.6   0.12    0.12  0.3   0.32  97.995
          SoilCrop BarleySoil: LL=[0.1, 0.1, 0.157, 0.173, 0.173, 0.165, 0.165, 0.115]; KL=[0.1, 0.1, 0.1, 0.1, 0.1, 0.1, 0.1, 0.1]; XF=[1, 1, 1, 1, 1, 1, 1, 1]
        SoilWater: SummerDate=1-Nov; SummerU=6; SummerCona=2; WinterDate=1-Apr; WinterU=9; WinterCona=4.4; DiffusConst=0; DiffusSlope=0; Salb=0.18; CN2Bare=68; CNRed=20; CNCov=0.8; slope=0; discharge_width=0; catchment_area=0; max_pond=0; residueinterception=0
          Thickness  SWCON  KLAT
          200        0.9    0
          200        0.6    0
          200        0.4    0
          200        0.4    0
          200        0.4    0
          200        0.9    0
          200        0.9    0
          200        0.9    0
        SoilNitrogen: fom_type=[default, manure, mucuna, lablab, shemp, stable]; fract_carb=[0.2, 0.3, 0.54, 0.57, 0.45, 0]; fract_cell=[0.7, 0.3, 0.37, 0.37, 0.47, 0.1]; fract_lign=[0.1, 0.4, 0.09, 0.06, 0.08, 0.9]; wfpsN2N2O_x=[22, 88]; wfpsN2N2O_y=[0.1, 1]; oc=[1.83566, 1.46334, 1.19884, 1.0301, 0.470338, 0.470138]
        SoilOrganicMatter: RootCN=31.5; RootWt=1500; SoilCN=11; EnrACoeff=7.4; EnrBCoeff=0.2; OCUnits=Total
          Thickness  OC    FBiom  FInert
          100        2.68  0.025  0.45
          200        2.78  0.025  0.6
          300        1.45  0.015  0.75
          200        0.38  0.01   0.9
          100        0.24  0.01   0.96
          200        0.24  0.01   0.96
          100        0.24  0.01   0.96
          300        0.24  0.01   0.96
        Sample Initial nitrogen: NO3Units=ppm; NH4Units=ppm; SWUnits=Volumetric; OCUnits=Total; PHUnits=Water
          Thickness  NO3  NH4  SW
          100        123  2.2  0.31
          200        18   2    0.31
          300        15   1.8  0.16
          200        1.5  1    0.15
          100        1.5  1    0.1
          200        1    0.9  0.1
          100        1    0.1  0.11
          300        1    0.1  0.12
        Sample Initial water: Thickness=[200, 200, 200, 200, 200, 200, 200, 200]; SW=[0.31, 0.31, 0.16, 0.15, 0.1, 0.1, 0.11, 0.12]; NO3Units=kgha; NH4Units=ppm; SWUnits=Volumetric; OCUnits=Total; PHUnits=Water
        CERESSoilTemperature
      Plant Barley: CropType=Wheat
      SurfaceOrganicMatter Surface Organic Matter: PoolName=wheat_stubble; type=wheat; mass=1500; standing_fraction=0; cnr=80; CriticalResidueWeight=2000; OptimumDecompTemp=20; MaxCumulativeEOS=20; CNRatioDecompCoeff=0.277; CNRatioDecompThreshold=25; TotalLeachRain=25; MinRainToLeach=10; CriticalMinimumOrganicC=0.004; DefaultCPRatio=0; DefaultStandingFraction=0; StandingExtinctCoeff=0.5; FractionFaecesAdded=0.5
        Pools:
          {PoolName=wheat_stubble, ResidueType=wheat, Mass=1500, CNRatio=80, StandingFraction=0}
        ResidueTypes: LoadFromResource=ResidueTypes
      MicroClimate: a_interception=0; b_interception=1; c_interception=0; d_interception=0; soil_albedo=0.3; sun_angle=15; soil_heat_flux_fraction=0.4; night_interception_fraction=0.5; refheight=2; albedo=0.293662; emissivity=0.96; RadIntTotal=0
      Irrigation
      Fertiliser
      Folder Manager folder
        Operations SowingEvent
          1995-10-20  [Barley].Sow(population:280, cultivar:"Valetta", depth:40, rowSpacing:150);
        Operations IrrigationEvents
          1995-10-28  [Irrigation].Apply(2);
          1995-11-04  [Irrigation].Apply(3.8);
          1995-11-15  [Irrigation].Apply(5.2);
          1995-11-28  [Irrigation].Apply(49.3);
          1995-12-05  [Irrigation].Apply(5.3);
          1995-12-12  [Irrigation].Apply(32);
          1995-12-18  [Irrigation].Apply(5);
          1995-12-19  [Irrigation].Apply(40.3);
          1995-12-27  [Irrigation].Apply(5.3);
          1996-01-03  [Irrigation].Apply(80);
          1996-01-09  [Irrigation].Apply(50.3);
          1996-01-16  [Irrigation].Apply(36);
          1996-01-23  [Irrigation].Apply(24.8);
          1996-01-30  [Irrigation].Apply(21.4);
          1996-02-07  [Irrigation].Apply(15.9);
          1996-02-12  [Irrigation].Apply(11.3);
        Operations FertiliserEvents
          1995-10-28  [Fertiliser].Apply(50, Fertiliser.Types.NO3N,0);
          1995-12-05  [Fertiliser].Apply(50, Fertiliser.Types.NO3N,0);
          1995-12-18  [Fertiliser].Apply(50, Fertiliser.Types.NO3N,0);
      Manager ClimateControl
        StartDate = 1995-10-15
        EndDate = 1996-04-01
        CCOnOff = True
```csharp
using System;
using Models.Core;
using APSIM.Shared.Utilities;



using System.Collections.Generic;
using System.Text;
using Models.PMF;
using Models;
using System.Xml.Serialization;

namespace Models
{
	[Serializable] 
	[System.Xml.Serialization.XmlInclude(typeof(Model))]
	public class Script : Model
	{
		[Link] Weather Met;
		[Link] Clock Clock;
    
		[Description("Start Date")]
		public DateTime StartDate { get; set; }
        
		[Description("End Date")]
		public DateTime EndDate { get; set; }

		[Description("Turn on or off")]
		public bool CCOnOff { get; set; }
 
		[EventSubscribe("PreparingNewWeatherData")]
		private void OnPreparingNewWeatherData(object sender, EventArgs e)
		{
			if (CCOnOff == true)
			if ((Clock.Today.Date >= StartDate) && (Clock.Today.Date <= EndDate))
				Met.Rain = 0;		
		}
	}
}
```
      Manager Harvesting
```csharp
using System;
using Models.Core;
using System.Collections.Generic;
using System.Text;
using Models.Soils;
using Models.PMF;
using Models;
using System.Xml.Serialization;
using APSIM.Shared.Utilities;

namespace Models
{
	[Serializable] 
	public class Script : Model
	{
		[Link] Plant Barley;
		[EventSubscribe("DoManagement")]
		private void OnDoManagement(object sender, EventArgs e)
		{
			if (Barley.Phenology.CurrentPhaseName == "Ripening")
			{
				Barley.Harvest();
				Barley.EndCrop();
			}
		}
	}
}
```
      Report DailyReport: EventNames=[Clock].DoReport
        VariableNames:
          [Clock].Today
          [Weather].MeanT
          [Soil].SoilWater.SW
          [Soil].SoilWater.SWmm
          sum([Soil].SoilWater.SWmm) as ProfileWater
          [Barley].AboveGround.N
          [Barley].AboveGround.Wt
          [Barley].AboveGroundLive.N
          [Barley].AboveGroundLive.N as AboveGroundN
          [Barley].AboveGroundLive.Wt
          [Barley].AboveGroundDead.N
          [Barley].AboveGroundDead.Wt
          [Barley].Arbitrator.DMDemand
          [Barley].Arbitrator.DM.TotalFixationSupply
          [Barley].Ear.N
          [Barley].Ear.Nconc
          [Barley].Ear.Wt
          [Barley].Grain.N
          [Barley].Grain.NConc
          [Barley].Grain.Number
          [Barley].Grain.Size
          [Barley].Grain.Wt
          [Barley].Grain.Live.Wt
          [Barley].Leaf.AppearedCohortNo
          [Barley].Leaf.CoverDead
          [Barley].Leaf.CoverGreen
          [Barley].Leaf.CoverTotal
          [Barley].Leaf.Dead.N
          [Barley].Leaf.Dead.NConc
          [Barley].Leaf.Dead.Wt
          [Barley].Leaf.DeadCohortNo
          [Barley].Leaf.SenescingCohortNo
          [Barley].Leaf.ExpandedCohortNo
          [Barley].Leaf.Fn
          [Barley].Leaf.Fw
          [Barley].Leaf.Height
          [Barley].Leaf.InitialisedCohortNo
          [Barley].Leaf.LAI
          [Barley].Leaf.Live.N
          [Barley].Leaf.Live.NConc
          [Barley].Leaf.Live.Wt
          [Barley].Leaf.SpecificArea
          [Barley].Leaf.Transpiration
          [Barley].Phenology.CurrentPhaseName
          [Barley].Phenology.CurrentStageName
          [Barley].Phenology.DailyVernalisation.Value()
          [Barley].Phenology.MeanTemp.Value()
          [Barley].Phenology.Photoperiod.Value()
          [Barley].Phenology.Stage
          [Barley].Phenology.ThermalTime.Value()
          [Barley].Phenology.ThermalTime.Value
          [Barley].Phenology.Vrn1.Value()
          [Barley].Phenology.Vrn2.Value()
          [Barley].Phenology.Vrn4.Value()
          [Barley].Phenology.Zadok.Stage
          [Barley].Root.Depth
          [Barley].Root.N
          [Barley].Root.Wt
          [Barley].Root.Nconc
          [Barley].Root.WaterUptake
          [Barley].Spike.N
          [Barley].Spike.NConc
          [Barley].Spike.Wt
          [Barley].Spike.Live.NonStructuralWt
          [Barley].Stem.N
          [Barley].Stem.NConc
          [Barley].Stem.Wt
          [Barley].Stem.PercentWSC
          [Barley].Stem.Live.NonStructuralWt
          [Barley].StemPlusSpike.Wt
          [Barley].StemPlusSpike.N
          [Barley].SowingData.Cultivar
          [Barley].Structure.HaunStage.ValueTerminalSpikelet.Value()
          [Barley].Structure.HaunStage.Value()
          [Barley].Structure.Height
          [Barley].Structure.LeafTipsAppeared
          [Barley].Structure.MaxLN
          [Barley].Structure.MainStemFinalNodeNumber.Value()
          [Barley].Structure.MainStemFinalNodeNumber.ValueToHold.PhotoPLeaves.Value()
          [Barley].Structure.MainStemPopn
          [Barley].Structure.MeanTillerGrowthRate.Value()
          [Barley].Structure.TotalStemPopn
          [Barley].Structure.TSLN
          [Barley].Total.N
          [Barley].Total.Wt
          [SurfaceOrganicMatter].Wt
          ([Barley].Leaf.Transpiration + [Soil].SoilWater.Es + [MicroClimate].interception) as ET
          sum([Soil].SoilNitrogen.NO3) as TotalSoilNitrogen
          [Barley].Phenology.FlagLeafDAS
          [Barley].Phenology.FloweringDAS
          [Barley].Phenology.MaturityDAS
          [Barley].Phenology.PhotoPeriod
          [Barley].Phenology.PhotoPeriodDeltaFunction
          [Barley].Phenology.Stage
          [Barley].Phenology.SoilTemperatureFunction.Value()
          [Barley].Population
          [Soil].SoilNitrogen.TotalN
          [Barley].Spike.Live.Wt
          [Barley].Structure.CohortParams.MaxArea
      Report EndTrialReport: EventNames=[Clock].EndOfSimulation
        VariableNames:
          [Barley].Structure.LeafTipsAppeared
          [Barley].Structure.MainStemFinalNodeNumber
          [Barley].Phenology.FlagLeafDAS
          [Barley].Phenology.FloweringDAS
          [Barley].Phenology.MaturityDAS
          [Script].CalcVals.SowMonth
      SoluteManager
  Experiment RS_Barley_9596
    Memo Experiment
      This is a water response trial conducted inside and outside the rain shelter at the New Zealand Institute for Plant & Food Research in Lincoln and described in De Ruiter et al (1999). Briefly, a vernalisation insensitive barley, variety "Valetta", was sown at 280 plant/m^2^ on 20 October 1995 and subjected to five water treatments as follows:

      1. Full drought (located inside the rain shelter) – was not irrigated except for 17 mm rainfall as a result of shelter failure 42 days after sowing;

      2. Early drought (located inside the rain shelter) – also receive 17 mm rainfall and the drought was fully relieved at the onset stem elongation;

      3. Late drought (located inside the rain shelter) – received full irrigation (equivalent to the net crop water use + soil water evaporation) up to stem elongation and thereafter received no water until completion of the experiment;

      4. Rain-fed (located outside the rain shelter) – received all the rain but no irrigation

      5. Full irrigation (located outside the rain shelter) – received all the rain and irrigation to replace ET
    Factors
      Factor _
        Factor Rainfed_150ND3
          Specifications:
            [Water]
            [Initial water]
          Water
            Thickness  BD   AirDry  LL15  DUL   SAT
            200        1.3  0.08    0.08  0.29  0.44
            200        1.3  0.07    0.07  0.3   0.4
            200        1.3  0.07    0.07  0.28  0.4
            200        1.3  0.09    0.09  0.26  0.38
            200        1.3  0.11    0.11  0.26  0.38
            200        1.3  0.16    0.16  0.28  0.38
            200        1.3  0.15    0.15  0.27  0.38
            200        1.3  0.12    0.12  0.22  0.38
            SoilCrop BarleySoil: LL=[0.08, 0.07, 0.07, 0.09, 0.11, 0.16, 0.15, 0.12]; KL=[0.05, 0.03, 0.02, 0.03, 0.03, 0.03, 0.01, 0.01]; XF=[1, 1, 1, 1, 1, 1, 1, 1]
          Sample Initial water: Thickness=[200, 200, 200, 200, 200, 200, 200, 200]; SW=[0.27, 0.3, 0.28, 0.25, 0.24, 0.27, 0.27, 0.21]; NO3Units=ppm; NH4Units=ppm; SWUnits=Volumetric; OCUnits=Total; PHUnits=Water
        Factor Earlydrought_150NB3
          Specifications:
            [IrrigationEvents]
            [Water]
            [Initial water]
            [ClimateControl]
          Operations IrrigationEvents
            1995-10-28  [Irrigation].Apply(2);
            1995-11-04  [Irrigation].Apply(0);
            1995-11-15  [Irrigation].Apply(0);
            1995-11-28  [Irrigation].Apply(31.2);
            1995-12-05  [Irrigation].Apply(5);
            1995-12-12  [Irrigation].Apply(5);
            1995-12-18  [Irrigation].Apply(0);
            1995-12-19  [Irrigation].Apply(32.1);
            1995-12-27  [Irrigation].Apply(0);
            1996-01-03  [Irrigation].Apply(79.3);
            1996-01-09  [Irrigation].Apply(44.7);
            1996-01-16  [Irrigation].Apply(38.8);
            1996-01-23  [Irrigation].Apply(30);
            1996-01-30  [Irrigation].Apply(21.4);
            1996-02-07  [Irrigation].Apply(0);
            1996-02-12  [Irrigation].Apply(0);
          Water
            Thickness  BD   AirDry  LL15  DUL      SAT
            200        1.3  0.06    0.06  0.31     0.44
            200        1.3  0.09    0.09  0.3      0.44
            200        1.3  0.07    0.07  0.28     0.44
            200        1.3  0.12    0.12  0.31145  0.44
            200        1.3  0.16    0.16  0.3079   0.44
            200        1.3  0.16    0.16  0.3007   0.44
            200        1.3  0.15    0.15  0.28705  0.44
            200        1.3  0.16    0.16  0.3117   0.44
            SoilCrop BarleySoil: LL=[0.06, 0.09, 0.07, 0.12, 0.16, 0.16, 0.15, 0.16]; KL=[0.05, 0.03, 0.02, 0.03, 0.03, 0.03, 0.01, 0.01]; XF=[1, 1, 1, 1, 1, 1, 1, 1]
          Sample Initial water: Thickness=[200, 200, 200, 200, 200, 200, 200, 200]; NO3Units=ppm; NH4Units=ppm; SWUnits=Volumetric; OCUnits=Total; PHUnits=Water
            SW=[0.2655, 0.27, 0.209, 0.31145, 0.3079, 0.3007, 0.28705, 0.3117]
          Manager ClimateControl
            StartDate = 1995-10-20
            EndDate = 1996-04-01
            CCOnOff = True
            script: same as in RS_Barley_Potential.Paddock.ClimateControl
        Factor Latedrought_150NC3
          Specifications:
            [IrrigationEvents]
            [Water]
            [Initial water]
            [ClimateControl]
          Operations IrrigationEvents
            1995-10-28  [Irrigation].Apply(2);
            1995-11-04  [Irrigation].Apply(0);
            1995-11-15  [Irrigation].Apply(0);
            1995-11-28  [Irrigation].Apply(47);
            1995-12-05  [Irrigation].Apply(5);
            1995-12-12  [Irrigation].Apply(30.5);
            1995-12-18  [Irrigation].Apply(5);
            1995-12-19  [Irrigation].Apply(3.1);
            1995-12-27  [Irrigation].Apply(0);
            1996-01-03  [Irrigation].Apply(0);
            1996-01-09  [Irrigation].Apply(0);
            1996-01-16  [Irrigation].Apply(0);
            1996-01-23  [Irrigation].Apply(0);
            1996-01-30  [Irrigation].Apply(0);
            1996-02-07  [Irrigation].Apply(0);
            1996-02-12  [Irrigation].Apply(0);
          Water
            Thickness  BD   AirDry  LL15  DUL    SAT
            200        1.3  0.08    0.08  0.281  0.44
            200        1.3  0.08    0.08  0.28   0.44
            200        1.3  0.09    0.09  0.27   0.44
            200        1.3  0.12    0.12  0.296  0.44
            200        1.3  0.11    0.11  0.231  0.44
            200        1.3  0.16    0.16  0.245  0.44
            200        1.3  0.1     0.1   0.204  0.44
            200        1.3  0.08    0.08  0.156  0.44
            SoilCrop BarleySoil: LL=[0.08, 0.08, 0.09, 0.12, 0.11, 0.16, 0.1, 0.08]; KL=[0.05, 0.03, 0.02, 0.03, 0.03, 0.03, 0.01, 0.01]; XF=[1, 1, 1, 1, 1, 1, 1, 1]
          Sample Initial water: Thickness=[200, 200, 200, 200, 200, 200, 200, 200]; NO3Units=ppm; NH4Units=ppm; SWUnits=Volumetric; OCUnits=Total; PHUnits=Water
            SW=[0.2805, 0.27965, 0.27, 0.296, 0.23105, 0.2453, 0.2042, 0.15605]
          Manager ClimateControl: same as RS_Barley_9596.Factors._.Earlydrought_150NB3.ClimateControl
        Factor Fulldrought_150NA3
          Specifications:
            [IrrigationEvents]
            [Water]
            [Initial water]
            [ClimateControl]
          Operations IrrigationEvents
            1995-10-28  [Irrigation].Apply(2);
            1995-11-28  [Irrigation].Apply(31.2);
            1995-12-05  [Irrigation].Apply(5);
            1995-12-18  [Irrigation].Apply(5);
            1995-12-19  [Irrigation].Apply(3.1);
          Water
            Thickness  BD   AirDry  LL15  DUL      SAT
            200        1.3  0.08    0.08  0.31     0.44
            200        1.3  0.07    0.07  0.27     0.44
            200        1.3  0.06    0.06  0.25355  0.44
            200        1.3  0.09    0.09  0.2364   0.44
            200        1.3  0.15    0.15  0.2635   0.44
            200        1.3  0.16    0.16  0.27705  0.44
            200        1.3  0.15    0.15  0.3392   0.44
            200        1.3  0.08    0.08  0.2      0.44
            SoilCrop BarleySoil: LL=[0.08, 0.07, 0.06, 0.09, 0.15, 0.16, 0.15, 0.08]; KL=[0.05, 0.03, 0.02, 0.03, 0.03, 0.03, 0.01, 0.01]; XF=[1, 1, 1, 1, 1, 1, 1, 1]
          Sample Initial water: Thickness=[200, 200, 200, 200, 200, 200, 200, 200]; NO3Units=ppm; NH4Units=ppm; SWUnits=Volumetric; OCUnits=Total; PHUnits=Water
            SW=[0.278, 0.26825, 0.25355, 0.2364, 0.2635, 0.27705, 0.3392, 0.2]
          Manager ClimateControl: same as RS_Barley_9596.Factors._.Earlydrought_150NB3.ClimateControl
    Simulation Base_Rainfed
      Weather: FileName=Weather\lincoln.met
      Clock: StartDate=1995-10-19; EndDate=1996-02-29
      Summary summaryfile
      SoilArbitrator Soil Arbitrator
      Zone Paddock: Area=1; Slope=0
        Manager DAS: same as RS_Barley_Potential.Paddock.DAS
        Soil: same as RS_Barley_Potential.Paddock.Soil
        Plant Barley: CropType=Wheat
        SurfaceOrganicMatter Surface Organic Matter: same as RS_Barley_Potential.Paddock.Surface Organic Matter
        MicroClimate: a_interception=0; b_interception=1; c_interception=0; d_interception=0; soil_albedo=0.3; sun_angle=15; soil_heat_flux_fraction=0.4; night_interception_fraction=0.5; refheight=2; albedo=0.293662; emissivity=0.96; RadIntTotal=0
        Irrigation
        Fertiliser
        Folder Manager folder
          Operations SowingEvent
            1995-10-20  [Barley].Sow(population:280, cultivar:"Valetta", depth:40, rowSpacing:150);
          Operations IrrigationEvents
            1995-10-28  [Irrigation].Apply(2);
            1995-11-04  [Irrigation].Apply(0);
            1995-11-15  [Irrigation].Apply(0);
            1995-11-28  [Irrigation].Apply(21.3);
            1995-12-05  [Irrigation].Apply(5.3);
            1995-12-12  [Irrigation].Apply(1.5);
            1995-12-18  [Irrigation].Apply(5);
            1995-12-19  [Irrigation].Apply(11.3);
            1995-12-27  [Irrigation].Apply(5.3);
            1996-01-03  [Irrigation].Apply(2.8);
            1996-01-09  [Irrigation].Apply(8.4);
            1996-01-16  [Irrigation].Apply(5.9);
            1996-01-23  [Irrigation].Apply(0.7);
            1996-01-30  [Irrigation].Apply(0.7);
            1996-02-07  [Irrigation].Apply(0);
            1996-02-12  [Irrigation].Apply(0);
          Operations FertiliserEvents
            1995-10-28  [Fertiliser].Apply(50, Fertiliser.Types.NO3N,0);
            1995-12-05  [Fertiliser].Apply(50, Fertiliser.Types.NO3N,0);
            1995-12-18  [Fertiliser].Apply(50, Fertiliser.Types.NO3N,0);
        Manager ClimateControl: same as RS_Barley_Potential.Paddock.ClimateControl
        Manager Harvesting: same as RS_Barley_Potential.Paddock.Harvesting
        Report DailyReport: EventNames=[Clock].DoReport
          VariableNames:
            [Clock].Today
            [Weather].MeanT
            [Soil].SoilWater.SW
            [Soil].SoilWater.SWmm
            sum([Soil].SoilWater.SWmm) as ProfileWater
            [Barley].AboveGround.N
            [Barley].AboveGround.Wt
            [Barley].AboveGroundLive.N
            [Barley].AboveGroundLive.N*10 as AboveGroundN
            [Barley].AboveGroundLive.Wt
            [Barley].AboveGroundDead.N
            [Barley].AboveGroundDead.Wt
            [Barley].Arbitrator.DMDemand
            [Barley].Arbitrator.DM.TotalFixationSupply
            [Barley].Ear.N
            [Barley].Ear.Nconc
            [Barley].Ear.Wt
            [Barley].Grain.N
            [Barley].Grain.NConc
            [Barley].Grain.Number
            [Barley].Grain.Size
            [Barley].Grain.Wt
            [Barley].Grain.Live.Wt
            [Barley].Leaf.AppearedCohortNo
            [Barley].Leaf.CoverDead
            [Barley].Leaf.CoverGreen
            [Barley].Leaf.CoverTotal
            [Barley].Leaf.Dead.N
            [Barley].Leaf.Dead.NConc
            [Barley].Leaf.Dead.Wt
            [Barley].Leaf.DeadCohortNo
            [Barley].Leaf.SenescingCohortNo
            [Barley].Leaf.ExpandedCohortNo
            [Barley].Leaf.Fn
            [Barley].Leaf.Fw
            [Barley].Leaf.Height
            [Barley].Leaf.InitialisedCohortNo
            [Barley].Leaf.LAI
            [Barley].Leaf.Live.N
            [Barley].Leaf.Live.NConc
            [Barley].Leaf.Live.Wt
            [Barley].Leaf.SpecificArea
            [Barley].Leaf.Transpiration
            [Barley].Phenology.CurrentPhaseName
            [Barley].Phenology.CurrentStageName
            [Barley].Phenology.DailyVernalisation.Value()
            [Barley].Phenology.MeanTemp.Value()
            [Barley].Phenology.Photoperiod.Value()
            [Barley].Phenology.Stage
            [Barley].Phenology.ThermalTime.Value()
            [Barley].Phenology.ThermalTime.Value
            [Barley].Phenology.Vrn1.Value()
            [Barley].Phenology.Vrn2.Value()
            [Barley].Phenology.Vrn4.Value()
            [Barley].Phenology.Zadok.Stage
            [Barley].Root.Depth
            [Barley].Root.N
            [Barley].Root.Wt
            [Barley].Root.Nconc
            [Barley].Root.WaterUptake
            [Barley].Spike.N
            [Barley].Spike.NConc
            [Barley].Spike.Wt
            [Barley].Spike.Live.NonStructuralWt
            [Barley].Stem.N
            [Barley].Stem.NConc
            [Barley].Stem.Wt
            [Barley].Stem.PercentWSC
            [Barley].Stem.Live.NonStructuralWt
            [Barley].StemPlusSpike.Wt
            [Barley].StemPlusSpike.N
            [Barley].SowingData.Cultivar
            [Barley].Structure.HaunStage.ValueTerminalSpikelet.Value()
            [Barley].Structure.HaunStage.Value()
            [Barley].Structure.Height
            [Barley].Structure.LeafTipsAppeared
            [Barley].Structure.MainStemFinalNodeNumber.Value()
            [Barley].Structure.MainStemFinalNodeNumber.ValueToHold.PhotoPLeaves.Value()
            [Barley].Structure.MainStemPopn
            [Barley].Structure.MeanTillerGrowthRate.Value()
            [Barley].Structure.TotalStemPopn
            [Barley].Total.N
            [Barley].Total.Wt
            [SurfaceOrganicMatter].Wt
            ([Barley].Leaf.Transpiration + [Soil].SoilWater.Es + [MicroClimate].interception) as ET
            sum([Soil].SoilNitrogen.NO3) as TotalSoilNitrogen
            [Barley].Phenology.FlagLeafDAS
            [Barley].Phenology.FloweringDAS
            [Barley].Phenology.MaturityDAS
            [Barley].Phenology.PhotoPeriod
            [Barley].Phenology.PhotoPeriodDeltaFunction
            [Barley].Phenology.Stage
            [Barley].Phenology.SoilTemperatureFunction.Value()
            [Barley].Population
            [Soil].SoilNitrogen.TotalN
        Report EndTrialReport: EventNames=[Clock].EndOfSimulation
          VariableNames:
            [Barley].Structure.LeafTipsAppeared
            [Barley].Structure.MainStemFinalNodeNumber
            [Barley].Phenology.FlagLeafDAS
            [Barley].Phenology.FloweringDAS
            [Barley].Phenology.MaturityDAS
            [Script].CalcVals.SowMonth
        SoluteManager
  Experiment RS_Barley_8889
    Memo
      This experiment was conducted in the rainshelter at Plant and Food Research in Lincoln, New Zealand. The objective was to evaluate the effect of drought on the yield of barley crops. The experiment is fully described by Jamieson et al (1995).  Briefly, 'Triumph' barley was sown at 188kg/ha on 07 September 1988. This sowing rate resulted in a population of 291 ± 6 plants/m2.  Plants were evaluated for their response to drought of varying duration. Six of these treatments have been included in this validation:

      1.	Full irrigation – measured ET replaced weekly (06 October to 29 December)
      2.	Early Drought 1 – irrigated from 03 November to 05 January
      3.	Early Drought 2 – irrigated from 17 November to 19 January
      4.	Early Drought 3 – irrigated from 24 November to 19 January
      5.	Early Drought 3 – irrigated from 01 December to 09 February
      6.	Middle Drought 1 – irrigated (06/10/1988 to 03/11/1988) and (24/11/1988 to 29/12/1989)
      7.	Middle Drought 2 – irrigated (06/10/1988 to 03/11/1988) and (01/12/1988 to 29/12/1989)
      8.	Middle Drought 3 – irrigated (06/10/1988 to 03/11/1988) and (15/12/1988 to 29/12/1989)
      9.	Middle Drought 3 – irrigated (06/10/1988 to 03/11/1988)
      10.	Late Drought 1 – irrigated (06/10/1988 to 17/11/1988)
      11.	Late Drought 2 – irrigated (06/10/1988 to 24/11/1988)
      12.	Late Drought 3 – irrigated (06/10/1988 to 01/12/1989)
    Factors
      Factor _
        Factor Control
          Specifications:
            [Water]
            [Initial water]
          Water
            Thickness  BD   AirDry  LL15  DUL   SAT
            200        1.3  0.08    0.08  0.29  0.44
            200        1.3  0.07    0.07  0.3   0.4
            200        1.3  0.07    0.07  0.28  0.4
            200        1.3  0.09    0.09  0.26  0.38
            200        1.3  0.11    0.11  0.26  0.38
            200        1.3  0.16    0.16  0.28  0.38
            200        1.3  0.15    0.15  0.27  0.38
            200        1.3  0.12    0.12  0.22  0.38
            SoilCrop BarleySoil: LL=[0.08, 0.07, 0.07, 0.09, 0.11, 0.16, 0.15, 0.12]; KL=[0.05, 0.03, 0.02, 0.03, 0.03, 0.03, 0.01, 0.01]; XF=[1, 0.2, 0.3, 1, 1, 1, 1, 1]
          Sample Initial water: Thickness=[200, 200, 200, 200, 200, 200, 200, 200]; SW=[0.27, 0.3, 0.28, 0.25, 0.24, 0.27, 0.27, 0.21]; NO3Units=ppm; NH4Units=ppm; SWUnits=Volumetric; OCUnits=Total; PHUnits=Water
        Factor EarlyDrought2
          Specifications:
            [IrrigationEvents]
            [Water]
            [Initial water]
          Operations IrrigationEvents
            1988-11-17  [Irrigation].Apply(57);
            1988-10-24  [Irrigation].Apply(18);
            1988-12-01  [Irrigation].Apply(35);
            1988-12-08  [Irrigation].Apply(24);
            1988-12-15  [Irrigation].Apply(43);
            1988-12-22  [Irrigation].Apply(32);
            1988-12-29  [Irrigation].Apply(36);
            1989-01-05  [Irrigation].Apply(35);
            1989-01-12  [Irrigation].Apply(26);
            1989-01-19  [Irrigation].Apply(22);
          Water
            Thickness  BD   AirDry  LL15  DUL      SAT
            200        1.3  0.06    0.06  0.31     0.44
            200        1.3  0.09    0.09  0.3      0.44
            200        1.3  0.07    0.07  0.28     0.44
            200        1.3  0.12    0.12  0.31145  0.44
            200        1.3  0.16    0.16  0.3079   0.44
            200        1.3  0.16    0.16  0.3007   0.44
            200        1.3  0.15    0.15  0.28705  0.44
            200        1.3  0.16    0.16  0.3117   0.44
            SoilCrop BarleySoil: LL=[0.06, 0.09, 0.07, 0.12, 0.16, 0.16, 0.15, 0.16]; KL=[0.05, 0.03, 0.02, 0.03, 0.03, 0.03, 0.01, 0.01]; XF=[1, 0.2, 0.3, 1, 1, 1, 1, 1]
          Sample Initial water: Thickness=[200, 200, 200, 200, 200, 200, 200, 200]; NO3Units=ppm; NH4Units=ppm; SWUnits=Volumetric; OCUnits=Total; PHUnits=Water
            SW=[0.2655, 0.27, 0.209, 0.31145, 0.3079, 0.3007, 0.28705, 0.3117]
        Factor EarlyDrought4
          Specifications:
            [IrrigationEvents]
            [Water]
            [Initial water]
          Operations IrrigationEvents
            1988-12-01  [Irrigation].Apply(35);
            1988-12-08  [Irrigation].Apply(50);
            1988-12-15  [Irrigation].Apply(43);
            1988-12-22  [Irrigation].Apply(32);
            1988-12-29  [Irrigation].Apply(36);
            1989-01-05  [Irrigation].Apply(35);
            1989-01-12  [Irrigation].Apply(26);
            1989-01-19  [Irrigation].Apply(22);
            1989-01-26  [Irrigation].Apply(20);
            1989-02-02  [Irrigation].Apply(17);
            1989-02-09  [Irrigation].Apply(15);
          Water: same as RS_Barley_8889.Factors._.EarlyDrought2.Water
          Sample Initial water: Thickness=[200, 200, 200, 200, 200, 200, 200, 200]; NO3Units=ppm; NH4Units=ppm; SWUnits=Volumetric; OCUnits=Total; PHUnits=Water
            SW=[0.2655, 0.27, 0.209, 0.31145, 0.3079, 0.3007, 0.28705, 0.3117]
        Factor MiddleDrought2
          Specifications:
            [IrrigationEvents]
            [Water]
            [Initial water]
          Operations IrrigationEvents
            1988-10-06  [Irrigation].Apply(27);
            1988-10-13  [Irrigation].Apply(10);
            1988-10-20  [Irrigation].Apply(30);
            1988-10-27  [Irrigation].Apply(25);
            1988-11-03  [Irrigation].Apply(25);
            1988-11-24  [Irrigation].Apply(0);
            1988-12-01  [Irrigation].Apply(35);
            1988-12-08  [Irrigation].Apply(50);
            1988-12-15  [Irrigation].Apply(43);
            1988-12-22  [Irrigation].Apply(32);
            1988-12-29  [Irrigation].Apply(36);
          Water: same as RS_Barley_8889.Factors._.EarlyDrought2.Water
          Sample Initial water: Thickness=[200, 200, 200, 200, 200, 200, 200, 200]; NO3Units=ppm; NH4Units=ppm; SWUnits=Volumetric; OCUnits=Total; PHUnits=Water
            SW=[0.2655, 0.27, 0.209, 0.31145, 0.3079, 0.3007, 0.28705, 0.3117]
        Factor LateDrought3
          Specifications:
            [IrrigationEvents]
            [Water]
            [Initial water]
          Operations IrrigationEvents
            1988-10-06  [Irrigation].Apply(27);
            1988-10-13  [Irrigation].Apply(10);
            1988-10-20  [Irrigation].Apply(30);
            1988-10-27  [Irrigation].Apply(25);
            1988-11-03  [Irrigation].Apply(25);
            1988-11-10  [Irrigation].Apply(47);
            1988-11-17  [Irrigation].Apply(32);
            1988-11-24  [Irrigation].Apply(18);
            1988-12-01  [Irrigation].Apply(35);
          Water: same as RS_Barley_8889.Factors._.EarlyDrought2.Water
          Sample Initial water: Thickness=[200, 200, 200, 200, 200, 200, 200, 200]; NO3Units=ppm; NH4Units=ppm; SWUnits=Volumetric; OCUnits=Total; PHUnits=Water
            SW=[0.2655, 0.27, 0.209, 0.31145, 0.3079, 0.3007, 0.28705, 0.3117]
        Factor FullOut
          Specifications:
            [Water]
            [Initial water]
            [ClimateControl].Script.CCOnOff = false
          Water: same as RS_Barley_8889.Factors._.Control.Water
          Sample Initial water: Thickness=[200, 200, 200, 200, 200, 200, 200, 200]; SW=[0.27, 0.3, 0.28, 0.25, 0.24, 0.27, 0.27, 0.21]; NO3Units=ppm; NH4Units=ppm; SWUnits=Volumetric; OCUnits=Total; PHUnits=Water
    Simulation Base_Control
      Weather: FileName=Weather\lincoln.met
      Clock: StartDate=1988-09-01; EndDate=1989-03-01
      Summary summaryfile
      SoilArbitrator Soil Arbitrator
      Zone Paddock: Area=1; Slope=0
        Soil: Region=Plains; State=Canterbury; Country=New Zealand; Latitude=0; Longitude=0
          DataSource=Generic profile descriptions provided by Trevor Webb and data for functional horizions based on SWAMP project results
          Comments=Bulk density values were measured on the fine earth fraction so values entered into apsim soil are adjusted down to account for stone content (assuming stones are inert from all soil process so their mass and volume is removed from model paramaters).  SAT, DUL, LL15 and Air dry have been adjusted down to account for stone content.  OC has not been adjusted so the model will get the correct carbon and N amounts using the adjusted BD.
          Analysis: Thickness=[100, 200, 200, 100, 300, 200, 100, 300]; PH=[6, 6, 6, 6, 6, 6, 6, 6]; PHUnits=Water; BoronUnits=HotWater
          Water
            Thickness  BD     AirDry  LL15   DUL   SAT
            100        1.23   0.05    0.14   0.33  0.48
            200        1.23   0.05    0.14   0.33  0.48
            300        1.59   0.157   0.13   0.29  0.4
            200        1.57   0.173   0.11   0.28  0.38
            100        1.57   0.173   0.173  0.3   0.366
            200        1.6    0.165   0.165  0.3   0.358
            100        1.6    0.165   0.165  0.3   0.358
            300        1.601  0.115   0.115  0.3   0.316
            SoilCrop BarleySoil: LL=[0.1, 0.1, 0.157, 0.173, 0.173, 0.165, 0.165, 0.115]; KL=[0.1, 0.1, 0.1, 0.1, 0.1, 0.1, 0.1, 0.1]; XF=[1, 1, 1, 1, 1, 1, 1, 1]
          SoilWater: SummerDate=1-oct; SummerU=9; SummerCona=4.4; WinterDate=1-Apr; WinterU=2; WinterCona=1.5; DiffusConst=88; DiffusSlope=35; Salb=0.13; CN2Bare=73; CNRed=20; CNCov=0.8; max_pond=0; Thickness=[100, 200, 300, 200, 100, 200, 100, 300]; SWCON=[0.9, 0.6, 0.4, 0.4, 0.4, 0.9, 0.9, 0.9]; residueinterception=0
          SoilNitrogen: fom_type=[default, manure, mucuna, lablab, shemp, stable]; fract_carb=[0.2, 0.3, 0.54, 0.57, 0.45, 0]; fract_cell=[0.7, 0.3, 0.37, 0.37, 0.47, 0.1]; fract_lign=[0.1, 0.4, 0.09, 0.06, 0.08, 0.9]; wfpsN2N2O_x=[22, 88]; wfpsN2N2O_y=[0.1, 1]
          SoilOrganicMatter: RootCN=31.5; RootWt=1500; SoilCN=11; EnrACoeff=7.4; EnrBCoeff=0.2; OCUnits=Total
            Thickness  OC     FBiom  FInert
            100        2.677  0.025  0.45
            200        2.784  0.025  0.6
            300        1.454  0.015  0.75
            200        0.383  0.01   0.9
            100        0.243  0.01   0.96
            200        0.243  0.01   0.96
            100        0.243  0.01   0.96
            300        0.243  0.01   0.96
          Sample Initial N: NO3Units=kgha; NH4Units=kgha; SWUnits=Volumetric; OCUnits=Total; PHUnits=Water
            Thickness  NO3  NH4
            100        23   2.2
            200        18   2
            300        15   1.8
            200        1.5  1
            100        1.5  1
            200        1    0.9
            100        1    0.1
            300        1    0.1
          InitialWater: PercentMethod=FilledFromTop; FractionFull=0.9
          Sample Initial water: Thickness=[200, 200, 200, 200, 200, 200, 200, 200]; SW=[0.31, 0.31, 0.16, 0.15, 0.1, 0.1, 0.11, 0.12]; NO3Units=kgha; NH4Units=ppm; SWUnits=Volumetric; OCUnits=Total; PHUnits=Water
          CERESSoilTemperature
        Plant Barley: CropType=Wheat
        SurfaceOrganicMatter Surface Organic Matter: PoolName=wheat_stubble; type=wheat; mass=1000; standing_fraction=0; cnr=80; CriticalResidueWeight=2000; OptimumDecompTemp=20; MaxCumulativeEOS=20; CNRatioDecompCoeff=0.277; CNRatioDecompThreshold=25; TotalLeachRain=25; MinRainToLeach=10; CriticalMinimumOrganicC=0.004; DefaultCPRatio=0; DefaultStandingFraction=0; StandingExtinctCoeff=0.5; FractionFaecesAdded=0.5
          Pools:
            {PoolName=wheat_stubble, ResidueType=wheat, Mass=1000, CNRatio=80, StandingFraction=0}
          ResidueTypes: LoadFromResource=ResidueTypes
        MicroClimate: a_interception=0; b_interception=1; c_interception=0; d_interception=0; soil_albedo=0.3; sun_angle=15; soil_heat_flux_fraction=0.4; night_interception_fraction=0.5; refheight=2; albedo=0.293662; emissivity=0.96; RadIntTotal=0
        Irrigation
        Fertiliser
        Folder Manager folder
          Operations SowingEvent
            1988-09-07  [Barley].Sow(population:250, cultivar:"Triumph", depth:40, rowSpacing:150);
          Operations IrrigationEvents
            1988-10-06  [Irrigation].Apply(27);
            1988-10-13  [Irrigation].Apply(10);
            1988-10-20  [Irrigation].Apply(30);
            1988-10-27  [Irrigation].Apply(25);
            1988-11-03  [Irrigation].Apply(25);
            1988-11-10  [Irrigation].Apply(47);
            1988-11-17  [Irrigation].Apply(32);
            1988-11-24  [Irrigation].Apply(18);
            1988-12-01  [Irrigation].Apply(35);
            1988-12-08  [Irrigation].Apply(24);
            1988-12-15  [Irrigation].Apply(43);
            1988-12-22  [Irrigation].Apply(32);
            1988-12-29  [Irrigation].Apply(36);
          Operations FertiliserEvents
            1988-09-26  [Fertiliser].Apply(50, Fertiliser.Types.NO3N,10);
            1988-11-02  [Fertiliser].Apply(70, Fertiliser.Types.NO3N,10);
        Manager ClimateControl
          StartDate = 1988-10-15
          EndDate = 1989-04-01
          CCOnOff = True
          script: same as in RS_Barley_Potential.Paddock.ClimateControl
        Manager Harvesting: same as RS_Barley_Potential.Paddock.Harvesting
        Report DailyReport: EventNames=[Clock].DoReport
          VariableNames:
            [Clock].Today
            [Weather].MeanT
            [Soil].SoilWater.SW
            [Soil].SoilWater.SWmm
            sum([Soil].SoilWater.SWmm) as ProfileWater
            [Barley].AboveGround.N
            [Barley].AboveGround.Wt
            [Barley].AboveGroundLive.N
            [Barley].AboveGroundLive.N*10 as AboveGroundN
            [Barley].AboveGroundLive.Wt
            [Barley].AboveGroundDead.N
            [Barley].AboveGroundDead.Wt
            [Barley].Arbitrator.DMDemand
            [Barley].Arbitrator.DM.TotalFixationSupply
            [Barley].Ear.N
            [Barley].Ear.Nconc
            [Barley].Ear.Wt
            [Barley].Grain.N
            [Barley].Grain.NConc
            [Barley].Grain.Number
            [Barley].Grain.Size
            [Barley].Grain.Wt
            [Barley].Grain.Live.Wt
            [Barley].Leaf.AppearedCohortNo
            [Barley].Leaf.CoverDead
            [Barley].Leaf.CoverGreen
            [Barley].Leaf.CoverTotal
            [Barley].Leaf.Dead.N
            [Barley].Leaf.Dead.NConc
            [Barley].Leaf.Dead.Wt
            [Barley].Leaf.DeadCohortNo
            [Barley].Leaf.SenescingCohortNo
            [Barley].Leaf.ExpandedCohortNo
            [Barley].Leaf.Fn
            [Barley].Leaf.Fw
            [Barley].Leaf.Height
            [Barley].Leaf.InitialisedCohortNo
            [Barley].Leaf.LAI
            [Barley].Leaf.Live.N
            [Barley].Leaf.Live.NConc
            [Barley].Leaf.Live.Wt
            [Barley].Leaf.SpecificArea
            [Barley].Leaf.Transpiration
            [Barley].Phenology.CurrentPhaseName
            [Barley].Phenology.CurrentStageName
            [Barley].Phenology.DailyVernalisation.Value()
            [Barley].Phenology.MeanTemp.Value()
            [Barley].Phenology.Photoperiod.Value()
            [Barley].Phenology.Stage
            [Barley].Phenology.ThermalTime.Value()
            [Barley].Phenology.ThermalTime.Value
            [Barley].Phenology.Vrn1.Value()
            [Barley].Phenology.Vrn2.Value()
            [Barley].Phenology.Vrn4.Value()
            [Barley].Phenology.Zadok.Stage
            [Barley].Root.Depth
            [Barley].Root.N
            [Barley].Root.Wt
            [Barley].Root.Nconc
            [Barley].Root.WaterUptake
            [Barley].Spike.N
            [Barley].Spike.NConc
            [Barley].Spike.Wt
            [Barley].Spike.Live.NonStructuralWt
            [Barley].Stem.N
            [Barley].Stem.NConc
            [Barley].Stem.Wt
            [Barley].Stem.PercentWSC
            [Barley].Stem.Live.NonStructuralWt
            [Barley].StemPlusSpike.Wt
            [Barley].StemPlusSpike.N
            [Barley].SowingData.Cultivar
            [Barley].Structure.HaunStage.ValueTerminalSpikelet.Value()
            [Barley].Structure.HaunStage.Value()
            [Barley].Structure.Height
            [Barley].Structure.LeafTipsAppeared
            [Barley].Structure.MainStemFinalNodeNumber.Value()
            [Barley].Structure.MainStemFinalNodeNumber.ValueToHold.PhotoPLeaves.Value()
            [Barley].Structure.MainStemPopn
            [Barley].Structure.MeanTillerGrowthRate.Value()
            [Barley].Structure.TotalStemPopn
            [Barley].Total.N
            [Barley].Total.Wt
            [SurfaceOrganicMatter].Wt
            ([Barley].Leaf.Transpiration + [Soil].SoilWater.Es + [MicroClimate].interception) as ET
            sum([Soil].SoilNitrogen.NO3) as TotalSoilNitrogen
            [Barley].Phenology.FlagLeafDAS
            [Barley].Phenology.FloweringDAS
            [Barley].Phenology.MaturityDAS
            [Barley].Phenology.PhotoPeriod
            [Barley].Phenology.PhotoPeriodDeltaFunction
            [Barley].Phenology.Stage
            [Barley].Phenology.SoilTemperatureFunction.Value()
        Report EndTrialReport: EventNames=[Clock].EndOfSimulation
          VariableNames:
            [Barley].Structure.LeafTipsAppeared
            [Barley].Structure.MainStemFinalNodeNumber
            [Barley].Phenology.FlagLeafDAS
            [Barley].Phenology.FloweringDAS
            [Barley].Phenology.MaturityDAS
            [Script].CalcVals.SowMonth
        SoluteManager
  Experiment RS_Barley_8889_All_TRTs
    Memo: same as RS_Barley_8889.Memo
    Factors
      Factor _
        Factor Control: same as RS_Barley_8889.Factors._.Control
        Factor Early_Drought
          Specifications:
            [IrrigationEvents]
            [Water]
            [Initial water]
          Factor 1
            Specifications:
              [IrrigationEvents]
              [Water]
              [Initial water]
            Operations IrrigationEvents
              1988-11-03  [Irrigation].Apply(45);
              1988-11-10  [Irrigation].Apply(47);
              1988-11-17  [Irrigation].Apply(32);
              1988-10-24  [Irrigation].Apply(18);
              1988-12-01  [Irrigation].Apply(35);
              1988-12-08  [Irrigation].Apply(24);
              1988-12-15  [Irrigation].Apply(43);
              1988-12-22  [Irrigation].Apply(32);
              1988-12-29  [Irrigation].Apply(36);
              1989-01-05  [Irrigation].Apply(35);
            Water: same as RS_Barley_8889.Factors._.EarlyDrought2.Water
            Sample Initial water: Thickness=[200, 200, 200, 200, 200, 200, 200, 200]; NO3Units=ppm; NH4Units=ppm; SWUnits=Volumetric; OCUnits=Total; PHUnits=Water
              SW=[0.2655, 0.27, 0.209, 0.31145, 0.3079, 0.3007, 0.28705, 0.3117]
          Factor 2: same as RS_Barley_8889.Factors._.EarlyDrought2
          Factor 3
            Specifications:
              [IrrigationEvents]
              [Water]
              [Initial water]
            Operations IrrigationEvents
              1988-10-24  [Irrigation].Apply(43);
              1988-12-01  [Irrigation].Apply(35);
              1988-12-08  [Irrigation].Apply(24);
              1988-12-15  [Irrigation].Apply(43);
              1988-12-22  [Irrigation].Apply(32);
              1988-12-29  [Irrigation].Apply(36);
              1989-01-05  [Irrigation].Apply(35);
              1989-01-12  [Irrigation].Apply(26);
              1989-01-19  [Irrigation].Apply(22);
            Water: same as RS_Barley_8889.Factors._.EarlyDrought2.Water
            Sample Initial water: Thickness=[200, 200, 200, 200, 200, 200, 200, 200]; NO3Units=ppm; NH4Units=ppm; SWUnits=Volumetric; OCUnits=Total; PHUnits=Water
              SW=[0.2655, 0.27, 0.209, 0.31145, 0.3079, 0.3007, 0.28705, 0.3117]
          Factor 4: same as RS_Barley_8889.Factors._.EarlyDrought4
        Factor Middle_Drought
          Specifications:
            [IrrigationEvents]
            [Water]
            [Initial water]
          Factor 1
            Specifications:
              [IrrigationEvents]
              [Water]
              [Initial water]
            Operations IrrigationEvents
              1988-10-06  [Irrigation].Apply(27);
              1988-10-13  [Irrigation].Apply(10);
              1988-10-20  [Irrigation].Apply(30);
              1988-10-27  [Irrigation].Apply(25);
              1988-11-03  [Irrigation].Apply(25);
              1988-11-24  [Irrigation].Apply(43);
              1988-12-01  [Irrigation].Apply(35);
              1988-12-08  [Irrigation].Apply(24);
              1988-12-15  [Irrigation].Apply(43);
              1988-12-22  [Irrigation].Apply(32);
              1988-12-29  [Irrigation].Apply(36);
            Water: same as RS_Barley_8889.Factors._.EarlyDrought2.Water
            Sample Initial water: Thickness=[200, 200, 200, 200, 200, 200, 200, 200]; NO3Units=ppm; NH4Units=ppm; SWUnits=Volumetric; OCUnits=Total; PHUnits=Water
              SW=[0.2655, 0.27, 0.209, 0.31145, 0.3079, 0.3007, 0.28705, 0.3117]
          Factor 2: same as RS_Barley_8889.Factors._.MiddleDrought2
          Factor 3
            Specifications:
              [IrrigationEvents]
              [Water]
              [Initial water]
            Operations IrrigationEvents
              1988-10-06  [Irrigation].Apply(27);
              1988-10-13  [Irrigation].Apply(10);
              1988-10-20  [Irrigation].Apply(30);
              1988-10-27  [Irrigation].Apply(25);
              1988-11-03  [Irrigation].Apply(25);
              1988-11-24  [Irrigation].Apply(0);
              1988-12-01  [Irrigation].Apply(0);
              1988-12-08  [Irrigation].Apply(0);
              1988-12-15  [Irrigation].Apply(43);
              1988-12-22  [Irrigation].Apply(32);
              1988-12-29  [Irrigation].Apply(36);
            Water: same as RS_Barley_8889.Factors._.EarlyDrought2.Water
            Sample Initial water: Thickness=[200, 200, 200, 200, 200, 200, 200, 200]; NO3Units=ppm; NH4Units=ppm; SWUnits=Volumetric; OCUnits=Total; PHUnits=Water
              SW=[0.2655, 0.27, 0.209, 0.31145, 0.3079, 0.3007, 0.28705, 0.3117]
          Factor 4
            Specifications:
              [IrrigationEvents]
              [Water]
              [Initial water]
            Operations IrrigationEvents
              1988-10-06  [Irrigation].Apply(27);
              1988-10-13  [Irrigation].Apply(10);
              1988-10-20  [Irrigation].Apply(30);
              1988-10-27  [Irrigation].Apply(25);
              1988-11-03  [Irrigation].Apply(0);
              1988-11-24  [Irrigation].Apply(0);
              1988-12-01  [Irrigation].Apply(0);
              1988-12-08  [Irrigation].Apply(0);
              1988-12-15  [Irrigation].Apply(0);
              1988-12-22  [Irrigation].Apply(0);
              1988-12-29  [Irrigation].Apply(0);
            Water: same as RS_Barley_8889.Factors._.EarlyDrought2.Water
            Sample Initial water: Thickness=[200, 200, 200, 200, 200, 200, 200, 200]; NO3Units=ppm; NH4Units=ppm; SWUnits=Volumetric; OCUnits=Total; PHUnits=Water
              SW=[0.2655, 0.27, 0.209, 0.31145, 0.3079, 0.3007, 0.28705, 0.3117]
        Factor Late_Drought
          Specifications:
            [IrrigationEvents]
            [Water]
            [Initial water]
          Factor 1
            Specifications:
              [IrrigationEvents]
              [Water]
              [Initial water]
            Operations IrrigationEvents
              1988-10-06  [Irrigation].Apply(27);
              1988-10-13  [Irrigation].Apply(10);
              1988-10-20  [Irrigation].Apply(30);
              1988-10-27  [Irrigation].Apply(25);
              1988-11-03  [Irrigation].Apply(25);
              1988-11-10  [Irrigation].Apply(47);
              1988-11-17  [Irrigation].Apply(32);
            Water: same as RS_Barley_8889.Factors._.EarlyDrought2.Water
            Sample Initial water: Thickness=[200, 200, 200, 200, 200, 200, 200, 200]; NO3Units=ppm; NH4Units=ppm; SWUnits=Volumetric; OCUnits=Total; PHUnits=Water
              SW=[0.2655, 0.27, 0.209, 0.31145, 0.3079, 0.3007, 0.28705, 0.3117]
          Factor 2
            Specifications:
              [IrrigationEvents]
              [Water]
              [Initial water]
            Operations IrrigationEvents
              1988-10-06  [Irrigation].Apply(27);
              1988-10-13  [Irrigation].Apply(10);
              1988-10-20  [Irrigation].Apply(30);
              1988-10-27  [Irrigation].Apply(25);
              1988-11-03  [Irrigation].Apply(25);
              1988-11-10  [Irrigation].Apply(47);
              1988-11-17  [Irrigation].Apply(32);
              1988-11-24  [Irrigation].Apply(18);
            Water: same as RS_Barley_8889.Factors._.EarlyDrought2.Water
            Sample Initial water: Thickness=[200, 200, 200, 200, 200, 200, 200, 200]; NO3Units=ppm; NH4Units=ppm; SWUnits=Volumetric; OCUnits=Total; PHUnits=Water
              SW=[0.2655, 0.27, 0.209, 0.31145, 0.3079, 0.3007, 0.28705, 0.3117]
          Factor 3: same as RS_Barley_8889.Factors._.LateDrought3
    Simulation Base_Control_FullIrrig
      Weather: FileName=Weather\lincoln.met
      Clock: StartDate=1988-09-01; EndDate=1989-03-01
      Summary summaryfile
      SoilArbitrator Soil Arbitrator
      Zone Paddock: Area=1; Slope=0
        Soil: same as RS_Barley_8889.Base_Control.Paddock.Soil
        Plant Barley: CropType=Wheat
        SurfaceOrganicMatter Surface Organic Matter: same as RS_Barley_8889.Base_Control.Paddock.Surface Organic Matter
        MicroClimate: a_interception=0; b_interception=1; c_interception=0; d_interception=0; soil_albedo=0.3; sun_angle=15; soil_heat_flux_fraction=0.4; night_interception_fraction=0.5; refheight=2; albedo=0.293662; emissivity=0.96; RadIntTotal=0
        Irrigation
        Fertiliser
        Folder Manager folder: same as RS_Barley_8889.Base_Control.Paddock.Manager folder
        Manager ClimateControl
          StartDate = 1988-10-15
          EndDate = 1989-04-01
```csharp
using System;
using Models.Core;
using APSIM.Shared.Utilities;



using System.Collections.Generic;
using System.Text;
using Models.PMF;
using Models;
using System.Xml.Serialization;

namespace Models
{
	[Serializable] 
	[System.Xml.Serialization.XmlInclude(typeof(Model))]
	public class Script : Model
	{
		[Link] Weather Met;
		[Link] Clock Clock;
    
		[Description("Start Date")]
		public DateTime StartDate { get; set; }
        
		[Description("End Date")]
		public DateTime EndDate { get; set; }
 
    
		[EventSubscribe("PreparingNewWeatherData")]
		private void OnPreparingNewWeatherData(object sender, EventArgs e)
		{
			if ((Clock.Today.Date >= StartDate) && (Clock.Today.Date <= EndDate))
				Met.Rain = 0;		
		}
	}
}
```
        Manager Harvesting: same as RS_Barley_Potential.Paddock.Harvesting
        Report DailyReport: same as RS_Barley_8889.Base_Control.Paddock.DailyReport
        Report EndTrialReport: EventNames=[Clock].EndOfSimulation
          VariableNames:
            [Barley].Structure.LeafTipsAppeared
            [Barley].Structure.MainStemFinalNodeNumber
            [Barley].Phenology.FlagLeafDAS
            [Barley].Phenology.FloweringDAS
            [Barley].Phenology.MaturityDAS
            [Script].CalcVals.SowMonth
        SoluteManager
  Memo References
    Alzueta I, Abeledo LG, Mignonea CM, Miralles DJ 2012. Differences between wheat and barley in leaf and tillering coordination under contrasting nitrogen and sulfur conditions. Europ. J. Agronomy 4: 92-102.

    Brown HE, Huth NI, Holzworth DP et al. 2014. "Plant Modelling Framework: Software for building and running crop models on the APSIM platform. Environmental Modelling & Software 62: 385-398.

    De Ruiter JM 1999. Yield and quality of malting barley (Hordeum vulgare L. ‘Valetta') in response to irrigation and nitrogen fertilisation. New Zealand Journal of Crop and Horticultural Science 24: 307-317

    Jamieson PD, Munro CA 1999. A simple method for the phenological evaluation of new cereal cultivars. Proceeding of the 29th Agronomy Society of New Zealand 29: 63-68.

    Jamieson PD, Martin RJ, Francis GS 1995. Drought influences on grain yield of barley, wheat, and maize. New Zealand Journal of Crop and Horticultural Science 23: 55-66

    Jamieson PD, Francis GS, Wilson DR, Martin RJ 1994. Effects of water deficits on evapotranspiration from barley. Agricultural and Forest Meteorology 76 (1995) 41-58

    Jamieson PD, Martin RJ, Francis GS, Wilson DR 1995. Drought effects on biomass production and radiation use efficiency in barley. Field Crops Research 43: 77-86

    Kirby EJM 1995. Factors affecting rate of leaf emergence in barley and wheat. Crop Science 35: 11-19.

    Mirschel W, Wenkel K, Schultz A, Pommerening J, Verch G 2005. Dynamic phenological model for winter rye and winter barley. European Journal of Agronomy 23: 123-135.
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