Simulations: Version=2
  Memo Introduction
    The APSIM Wheat model has been tested on a range of datasets to provide tests across a range of environmental conditions.
  Replacements
    Plant Wheat: CropType=Wheat
      Memo TitlePage
        # The APSIM Wheat Model

        _Brown, H.E., Huth, N.I. and Holzworth, D.P._

        The APSIM wheat model has been developed using the Plant Modelling Framework (PMF) of [brown_plant_2014]. This new framework provides a library of plant organ and process submodels that can be coupled, at runtime, to construct a model in much the same way that models can be coupled to construct a simulation. This means that dynamic composition of lower level process and organ classes (e.g. photosynthesis, leaf) into larger constructions (e.g. maize, wheat, sorghum) can be achieved by the model developer without additional coding.

        The model consists of:

        * a phenology model to simulate development between growth phases
        * a structure model to simulate plant morphology
        * a collection of organs to simulate the various plant parts
        * an arbitrator to allocate resources (N, biomass) to the various plant organs
      OrganArbitrator Arbitrator: NArbitrationOption=PriorityThenRelativeAllocation; DMArbitrationOption=PriorityThenRelativeAllocation
      Phenology
        MultiplyFunction ThermalTime
          PhaseLookup Temperature
            PhaseLookupValue SoilTemperature: Start=Sowing; End=TerminalSpikelet
              AirTemperatureFunction AirThermalTime
                XYPairs: X=[0, 26, 37]; Y=[0, 26, 0]
            PhaseLookupValue AirTemperature: Start=TerminalSpikelet; End=HarvestRipe
              AirTemperatureFunction AirThermalTime
                XYPairs: X=[0, 26, 37]; Y=[0, 26, 0]
          AddFunction DroughtPhenologyAcelleration
            Constant One: Value=1
            MultiplyFunction Stress
              Constant StressResponseCoefficient: Value=2
              LinearInterpolationFunction StressFactor: XProperty=[Wheat].WaterSupplyDemandRatio
                XYPairs: X=[0, 1]; Y=[0, 0]
        GerminatingPhase Germinating: Start=Sowing; End=Germination
        EmergingPhase Emerging: Start=Germination; End=Emergence; ShootLag=40; ShootRate=1.5
          VariableReference ThermalTime: VariableName=[Phenology].ThermalTime.Value
        GenericPhase Vegetative: Start=Emergence; End=TerminalSpikelet
          Constant Target: Value=401
          VariableReference ThermalTime: VariableName=[Phenology].ThermalTime.Value
          MinimumFunction Stress
            VariableReference VernalisationEffect: VariableName=[Phenology].Vernalisation.VernEff
            VariableReference PhotoperiodEffect: VariableName=[Phenology].Vernalisation.PhotopEff
        GenericPhase EarlyReproductive: Start=TerminalSpikelet; End=Flowering
          Constant Target: Value=555
          LinearInterpolationFunction ThermalTime: XProperty=[Vernalisation].CrownTemperature
            XYPairs: X=[0, 26, 34]; Y=[0, 26, 0]
          MultiplyFunction Stress
            MinimumFunction
              VariableReference: VariableName=[Vernalisation].VernEff
              VariableReference Variable1: VariableName=[Vernalisation].PhotopEff
        GenericPhase GrainDevelopment: Start=Flowering; End=StartGrainFill
          Constant Target: Value=120
          VariableReference ThermalTime: VariableName=[Phenology].ThermalTime.Value
        GenericPhase GrainFilling: Start=StartGrainFill; End=EndGrainFill
          Constant Target: Value=545
          VariableReference ThermalTime: VariableName=[Phenology].ThermalTime.Value
        GenericPhase Maturing: Start=EndGrainFill; End=Maturity
          Constant Target: Value=35
          VariableReference ThermalTime: VariableName=[Phenology].ThermalTime.Value
        GenericPhase Ripening: Start=Maturity; End=HarvestRipe
          Constant Target: Value=300
          VariableReference ThermalTime: VariableName=[Phenology].ThermalTime.Value
        EndPhase ReadyForHarvesting: Start=HarvestRipe; End=Unused
          VariableReference ThermalTime: VariableName=[Phenology].ThermalTime.Value
        PhotoperiodFunction Photoperiod: Twilight=-6
        VernalisationCW Vernalisation: VernSens=2.5; PhotopSens=2; StartStageForEffects=Emergence; EndStageForEffects=TerminalSpikelet; StartStageForCumulativeVD=Germination; EndStageForCumulativeVD=TerminalSpikelet
          AirTemperatureFunction VDModel
            XYPairs: X=[0, 2, 15]; Y=[0, 1, 0]
          PhotoperiodFunction Photoperiod: Twilight=-6
        ZadokPMF Zadok
      Structure: InitialiseStage=Emergence; PrimaryBudNo=1
        PhaseLookup MainStemPrimordiaInitiationRate
          PhaseLookupValue VegetativePrimordiaInitiationRate: Start=Emergence; End=TerminalSpikelet
            DivideFunction RelativeToPyllochron
              VariableReference Phyllochron
                VariableName=[Structure].MainStemNodeAppearanceRate.BasePhyllochron.Value
              Constant PrimordiaPerMainstemNode: Value=1.1
          Memo Rational
            [Brown_Anthesis_2013] showed final leaf number (FLN) could be estimated as 2.86 + HSTS * 1.1 where HS<sup>TS</sup> is the the Haun stage at terminal spikelet.  To caputre this in the wheat model we have set the initial number of primordia (determined by the number of initialleaf objects on the leaf class) to 3 and have set this function to produce primordia 10% faster than mainstem leaves.  Primordia are initiated until the therminal spikelet stage and then the number remains fixed, giving final leaf number.
        MultiplyFunction MainStemNodeAppearanceRate
          LinearInterpolationFunction LeafStageFactor: XProperty=[Structure].MainStemNodeNo
            XYPairs: X=[0, 2, 3, 7, 8, 14]; Y=[0.6, 0.6, 1, 1, 1.3, 1.3]
          Constant BasePhyllochron: Value=100
          Memo Rational
            Based on [Jamieson_SIRIUS_1998] where leaf appearace could be described by a base phyllochron determined between leaves 2 and 7 and a phyllochron that was 70% of base phyllochron for leaves < 2 and 130% of base phyllochron for leaves > 7
        HeightFunction HeightModel
          LinearInterpolationFunction PotentialHeight: XProperty=[Phenology].Stage
            XYPairs: X=[3, 4, 4.8, 6, 7]; Y=[10, 50, 100, 1100, 1200]
          LinearInterpolationFunction WaterStress: XProperty=[Wheat].WaterSupplyDemandRatio
            XYPairs: X=[0.3, 1]; Y=[0, 1]
        MultiplyFunction BranchingRate
          PhaseLookup PotentialBranchingRate
            PhaseLookupValue Vegetative: Start=Emergence; End=TerminalSpikelet
              LinearInterpolationFunction PotentialBranchingRate: XProperty=[Leaf].AppearedCohortNo
                XYPairs: X=[1, 2, 5, 14]; Y=[0, 1, 2, 2]
            PhaseLookupValue Reproductive: Start=TerminalSpikelet; End=HarvestRipe
              Constant Zero: Value=0
          MinimumFunction StressFactors
            LinearInterpolationFunction WaterStress: XProperty=[Wheat].WaterSupplyDemandRatio
              XYPairs: X=[0, 1]; Y=[0, 1]
            LinearInterpolationFunction Shading: XProperty=[Leaf].CoverGreen
              XYPairs: X=[0, 0.6, 0.7]; Y=[1, 1, 0]
            LinearInterpolationFunction Nitrogen: XProperty=[Arbitrator].FN
              XYPairs: X=[0, 1.5, 2]; Y=[0, 0, 1]
            LinearInterpolationFunction Biomass: XProperty=[Arbitrator].FDM
              XYPairs: X=[0.4, 0.8, 1]; Y=[0, 1, 1]
        PhaseLookup ShadeInducedBranchMortality
          PhaseLookupValue Vegetative: Start=Emergence; End=StartGrainFill
            LinearInterpolationFunction ShadeInducedBranchMortality: XProperty=[Leaf].CoverGreen
              XYPairs: X=[0, 0.98, 0.99, 1]; Y=[0, 0, 0.01, 0.01]
        PhaseLookup DroughtInducedBranchMortality
          PhaseLookupValue Vegetative: Start=Emergence; End=StartGrainFill
            LinearInterpolationFunction DroughtInducedBranchMortality: XProperty=[Wheat].WaterSupplyDemandRatio
              XYPairs: X=[0.1, 0.6]; Y=[0.1, 0]
        VariableReference ThermalTime: VariableName=[Phenology].ThermalTime.Value
        Constant MaximumMainStemNodeNumber: Value=18
        MainStemFinalNodeNumberFunction MainStemFinalNodeNumber: MaximumMainStemNodeNumber=30
          OnEventFunction FinalLeafNumber: SetEvent=TerminalSpikelet
            AddFunction PreEventValue
              Constant PrimordiaAtEmergence: Value=2
              DivideFunction PrimordiaDuringJuvenilePhase
                VariableReference JuvenilePhaseDuration: VariableName=[Phenology].Vegetative.Target.Value
                Constant ApproximatePlastochron: Value=30
            VariableReference PostEventValue: VariableName=[Structure].MainStemPrimordiaNo
      ReproductiveOrgan Grain: FractionRemoved=0; FractionToResidue=0; RipeStage=Ripe
        Biomass Live
        Biomass Dead
        Constant MaxNConcDailyGrowth: Value=0.03
        Constant WaterContent: Value=0.12
        Constant MinimumNConc: Value=0.006
        Constant MaximumNConc: Value=0.022
        Constant MaximumPotentialGrainSize: Value=1
        PhaseBasedSwitch NitrogenDemandSwitch: Start=Germination; End=Maturity
        AccumulateFunction AccumThermalTime: StartStageName=Flowering; EndStageName=Maturity
          VariableReference DailyThermalTimeValue: VariableName=[Phenology].ThermalTime.Value
        AirTemperatureFunction FillingRate
          XYPairs: X=[0, 26, 30, 35]; Y=[0, 0.0015, 0.0015, 0.0015]
        AirTemperatureFunction NFillingRate
          XYPairs: X=[0, 25, 30, 35]; Y=[0, 55, 55, 55]
        PhaseLookup DMDemandFunction
          PhaseLookupValue Grainfilling: Start=StartGrainFill; End=EndGrainFill
            MinimumFunction
              MultiplyFunction Demand
                VariableReference GrainNumber: VariableName=[Grain].NumberFunction.Value
                AirTemperatureFunction FillingRate
                  XYPairs: X=[0, 26, 30, 35]; Y=[0, 0.0015, 0.0015, 0.0015]
              MultiplyFunction Capacity
                SubtractFunction IndividualGrainCapacity
                  Constant MaximumGrainSize: Value=0.042
                  DivideFunction CurrentSize
                    VariableReference Wt: VariableName=[Grain].Live.Wt
                    VariableReference GrainNumber: VariableName=[Grain].NumberFunction.Value
                VariableReference GrainNumber: VariableName=[Grain].NumberFunction.Value
        MultiplyFunction NumberFunction
          VariableReference HeadNumber: VariableName=[Spike].HeadNumber.Value
          LinearInterpolationFunction GrainsPerSpike: XProperty=[Spike].Live.Wt
            XYPairs: X=[0, 1]; Y=[0, 80]
        ExpressionFunction Protein
          Expression=([Grain].Live.N + [Grain].Dead.N)/([Grain].Live.Wt + [Grain].Dead.Wt) * 100 * 5.71
      Root: FractionRemoved=0; FractionToResidue=0; InitialDM=0.2; SpecificRootLength=40000; KNO3_yProperty=[0.03, 0.03]; KNO3_xRootLength=[0, 0.003]; KNH4_yProperty=[0, 0]; KNH4_xRootLength=[0, 0.003]; NuptakeSupply=0
        CompositeBiomass Live: Propertys=[[Root].LayerLive]
        CompositeBiomass Dead: Propertys=[[Root].LayerDead]
        LinearInterpolationFunction KLModifier: XProperty=[Leaf].LAI
          XYPairs: X=[0, 3]; Y=[1, 1]
        Constant SoilWaterEffect: Value=1
        AirTemperatureFunction TemperatureEffect
          XYPairs: X=[0, 26, 35]; Y=[1, 1, 1]
        Constant MaxDailyNUptake: Value=20
        Constant SenescenceRate: Value=0
        Constant StructuralFraction: Value=1
        Constant MaximumNConc: Value=0.01
        Constant MinimumNConc: Value=0.01
        Constant PartitionFraction: Value=0.1
        PhaseLookup RootFrontVelocity
          PhaseLookupValue PreEmergence: Start=Germination; End=Emergence
            Constant Function: Value=5
          PhaseLookupValue PostEmergence: Start=Emergence; End=Maturity
            Constant Function: Value=30
        PhaseBasedSwitch NitrogenDemandSwitch: Start=Germination; End=Maturity
      Leaf: MaxCover=1; Albedo=0.26; Gsmax=0.011; R50=200; KDead=0.03
        zero: FractionRemoved, FractionToResidue, CurrentExpandingLeaf, StartFractionExpanded, FractionNextleafExpanded, _ExpandedNodeNo, DeadNodesYesterday, FRGR, PotentialEP, FractionDied
        LeafCohort InitialLeaves[1]: Rank=1; Area=200
        LeafCohort InitialLeaves[2]: Rank=2; Area=0
        LeafCohort InitialLeaves[3]: Rank=3; Area=0
        CompositeBiomass Live: Propertys=[[Leaf].CohortLive]
        CompositeBiomass Dead: Propertys=[[Leaf].CohortDead]
        ArrayBiomass CohortArrayLive: Propertys=[[Leaf].Live]; ArraySize=[Leaf].MaxNodeNo
        ArrayBiomass CohortArrayDead: Propertys=[[Leaf].Dead]; ArraySize=[Leaf].MaxNodeNo
        LeafCohortParameters CohortParameters
          Constant NReallocationFactor: Value=0.05
          Constant NRetranslocationFactor: Value=0.1
          Constant DMReallocationFactor: Value=1
          Constant DMRetranslocationFactor: Value=0.5
          LinearInterpolationFunction CellDivisionStress: XProperty=[Wheat].WaterSupplyDemandRatio
            XYPairs: X=[0.5, 1]; Y=[0.1, 1]
          LinearInterpolationFunction ExpansionStress: XProperty=[Wheat].WaterSupplyDemandRatio
            XYPairs: X=[0.3, 1]; Y=[0, 1]
          MultiplyFunction GrowthDuration
            VariableReference Phyllochron
              VariableName=[Structure].MainStemNodeAppearanceRate.BasePhyllochron.Value
            LinearInterpolationFunction NumberOfExpandingLeaves: XProperty=[Structure].RelativeNodeApperance
              XYPairs: X=[0, 1]; Y=[1, 1]
          Constant LagDuration: Value=900
          Constant SenescenceDuration: Value=200
          Constant DetachmentLagDuration: Value=1000000
          Constant DetachmentDuration: Value=1000000
          Constant RelativeBranchLeafSize: Value=1
          Constant MaximumNConc: Value=0.063
          Constant CriticalNConc: Value=0.05
          Constant MinimumNConc: Value=0.01
          AddFunction DroughtInducedSenAcceleration
            Constant One: Value=1
            MultiplyFunction Stress
              Constant StressResponseCoefficient: Value=1
              LinearInterpolationFunction StressFactor: XProperty=[Wheat].WaterSupplyDemandRatio
                XYPairs: X=[0, 0.7]; Y=[1, 0]
          LinearInterpolationFunction SpecificLeafAreaMax: XProperty=[Structure].RelativeNodeApperance
            XYPairs: X=[0, 1]; Y=[22000, 22000]
          LinearInterpolationFunction SpecificLeafAreaMin: XProperty=[Structure].RelativeNodeApperance
            XYPairs: X=[0, 0.5, 1]; Y=[10000, 20000, 20000]
          Constant InitialNConc: Value=0
          Constant StructuralFraction: Value=0.5
          Constant NonStructuralFraction: Value=0
          LinearInterpolationFunction ShadeInducedSenescenceRate: XProperty=[Leaf].CohortCurrentRankCoverAbove
            XYPairs: X=[0, 0.7, 0.8, 0.97, 0.98]; Y=[0, 0, 0, 0, 0]
          LinearInterpolationFunction MaxArea: XProperty=[Structure].RelativeNodeApperance
            XYPairs: X=[0, 0.3, 0.5, 0.7, 1]; Y=[300, 1000, 1600, 2600, 2600]
          Constant LeafSizeShapeParameter: Value=0.01
        RUEModel Photosynthesis
          Constant RUE: Value=1.37
          WeightedTemperatureFunction FT: MaximumTemperatureWeighting=0.5
            XYPairs: X=[0, 10, 25, 35]; Y=[0, 1, 1, 0]
          LinearInterpolationFunction FVPD: XProperty=[Leaf].Photosynthesis.VPD
            XYPairs: X=[0, 10, 50]; Y=[1, 1, 1]
          LinearInterpolationFunction FN: XProperty=[Leaf].Fn
            XYPairs: X=[0, 1, 1.5]; Y=[0, 1, 1]
          LinearInterpolationFunction FW: XProperty=[Leaf].Fw
            XYPairs: X=[0, 0.3]; Y=[0, 1]
          RUECO2Function FCO2: PhotosyntheticPathway=C3
          VariableReference RadnInt: VariableName=[Leaf].RadIntTot
        MultiplyFunction ExtinctionCoeff
          LinearInterpolationFunction PotentialExtinctionCoeff: XProperty=[Leaf].LAI
            XYPairs: X=[0, 0.5]; Y=[0.5, 0.5]
          LinearInterpolationFunction WaterStress: XProperty=[Wheat].WaterSupplyDemandRatio
            XYPairs: X=[0, 0.7]; Y=[0.5, 1]
        LinearInterpolationFunction FrostFraction: XProperty=[Weather].MinT
          XYPairs: X=[-1, 0]; Y=[0, 0]
        VariableReference ThermalTime: VariableName=[Phenology].ThermalTime.Value
        MinimumFunction FRGRFunction
          VariableReference RUE_FT: VariableName=[Leaf].Photosynthesis.FT.Value
          MinimumFunction Others
            VariableReference RUE_FN: VariableName=[Leaf].Photosynthesis.FN.Value
            VariableReference RUE_FVPD: VariableName=[Leaf].Photosynthesis.FVPD.Value
      GenericAboveGroundOrgan Spike: FractionRemoved=0; FractionToResidue=0
        PopulationBasedDemandFunction DMDemandFunction
          VariableReference ThermalTime: VariableName=[Phenology].ThermalTime.Value
          Constant ExpansionStress: Value=1
          VariableReference OrganPopulation: VariableName=[Spike].HeadNumber.Value
          Constant StartStage: Value=5.2
          Constant MaximumOrganWt: Value=0.7
          Constant GrowthDuration: Value=453
        Biomass Live
        Biomass Dead
        Constant NReallocationFactor: Value=0
        Constant NRetranslocationFactor: Value=0.1
        Constant MaximumNConc: Value=0.01
        Constant StructuralFraction: Value=1
        Constant MinimumNConc: Value=0.01
        MultiplyFunction HeadNumber
          Constant FertileTillers: Value=1
          VariableReference StemPopulation: VariableName=[Structure].TotalStemPopn
      GenericAboveGroundOrgan Stem: FractionRemoved=0; FractionToResidue=0
        Biomass Live
        Biomass Dead
        MinimumFunction DMDemandFunction
          MultiplyFunction NodeNumberLimitedDemand
            LinearInterpolationFunction SpecificStemDensityMax: XProperty=[Phenology].Stage
              XYPairs: X=[3, 4, 6]; Y=[0, 10, 40]
            VariableReference DeltaNodes: VariableName=[Structure].DeltaNodeNumber
            VariableReference Stems: VariableName=[Structure].TotalStemPopn
          MultiplyFunction HeightLimitedDemand
            Constant SpecificStemLengthMax: Value=0.022
            VariableReference DeltaHeight: VariableName=[Structure].HeightModel.DeltaHeight
            VariableReference Stems: VariableName=[Structure].TotalStemPopn
        Constant StructuralFraction: Value=0.7
        LinearInterpolationFunction MaximumNConc: XProperty=[Phenology].Stage
          XYPairs: X=[3, 4, 5.3]; Y=[0.06, 0.06, 0.025]
        Constant MinimumNConc: Value=0.006
        PhaseBasedSwitch NitrogenDemandSwitch: Start=Emergence; End=StartGrainFill
        Constant NReallocationFactor: Value=0
        Constant NRetranslocationFactor: Value=0.5
        Constant DMRetranslocationFactor: Value=0.5
      CompositeBiomass AboveGround
        Propertys=[[Leaf].Live, [Leaf].Dead, [Stem].Live, [Stem].Dead, [Spike].Live, [Spike].Dead, [Grain].Live, [Grain].Dead]
      CompositeBiomass BelowGround: Propertys=[[Root].Live, [Root].Dead]
      CompositeBiomass Total
        Propertys=[[Leaf].Live, [Leaf].Dead, [Stem].Live, [Stem].Dead, [Root].Live, [Root].Dead, [Spike].Live, [Spike].Dead, [Grain].Live, [Grain].Dead]
      CompositeBiomass TotalLive
        Propertys=[[Leaf].Live, [Stem].Live, [Root].Live, [Spike].Live, [Grain].Live]
      CompositeBiomass TotalDead
        Propertys=[[Leaf].Dead, [Stem].Dead, [Root].Dead, [Spike].Dead, [Grain].Dead]
      CompositeBiomass AboveGroundLive: Propertys=[[Leaf].Live, [Stem].Live, [Spike].Live, [Grain].Live]
      Cultivar Wakanui
        Command:
          [Phenology].Vernalisation.VernSens = 4
          [Phenology].Vernalisation.PhotopSens = 3
          [Structure].MainStemNodeAppearanceRate.BasePhyllochron.Value = 100
      Cultivar GattonHartog
        Command:
          [Phenology].Vernalisation.VernSens = 2.5
          [Phenology].Vernalisation.PhotopSens = 3.5
      Cultivar h45
        Command:
          [Phenology].Vernalisation.VernSens = 1.5
          [Phenology].Vernalisation.PhotopSens = 1.5
      Cultivar Rongotea
        Command:
          [Phenology].Vernalisation.VernSens = 2.0
          [Phenology].Vernalisation.PhotopSens = 4.0
          [Grain].NumberFunction.GrainsPerSpike.XYPairs.X = 0, 1
          [Grain].NumberFunction.GrainsPerSpike.XYPairs.Y = 0, 50
          [Grain].MaximumPotentialGrainSize.Value = 1
      Cultivar Hartog
        Command:
          [Phenology].Vernalisation.VernSens = 1.5
          [Phenology].Vernalisation.PhotopSens = 3.0
      Cultivar Gamenya
        Command:
          [Phenology].Vernalisation.VernSens = 1.6
          [Phenology].Vernalisation.PhotopSens = 2.0
          [Phenology].EarlyReproductive.Target.Value = 630.0
      Cultivar Spear
        Command:
          [Phenology].Vernalisation.VernSens = 1.5
          [Phenology].Vernalisation.PhotopSens = 3.5
          [Grain].NumberFunction.GrainsPerSpike.XYPairs.X = 0, 1
          [Grain].NumberFunction.GrainsPerSpike.XYPairs.Y = 0, 50
          [Grain].MaximumPotentialGrainSize.Value = 1
          [Phenology].GrainFilling.Target.Value = 580
          [Phenology].EarlyReproductive.Target.Value = 555.0
      Cultivar Gutha
        Command:
          [Phenology].Vernalisation.VernSens = 1.5
          [Phenology].Vernalisation.PhotopSens = 3.0
          [Grain].NumberFunction.GrainsPerSpike.XYPairs.X = 0, 1
          [Grain].NumberFunction.GrainsPerSpike.XYPairs.Y = 0, 50
      Cultivar Wilgoyne
        Command:
          [Phenology].Vernalisation.VernSens = 1.4
          [Phenology].Vernalisation.PhotopSens = 1.8
          [Grain].NumberFunction.GrainsPerSpike.XYPairs.X = 0, 1
          [Grain].NumberFunction.GrainsPerSpike.XYPairs.Y = 0, 50
          [Grain].MaximumPotentialGrainSize.Value = 1
          [Phenology].GrainFilling.Target.Value = 580
          [Phenology].EarlyReproductive.Target.Value = 555.0
      Cultivar BattenWinter
        Command:
          [Phenology].Vernalisation.VernSens = 2.0
          [Phenology].Vernalisation.PhotopSens = 4.0
          [Grain].NumberFunction.GrainsPerSpike.XYPairs.X = 0, 1
          [Grain].NumberFunction.GrainsPerSpike.XYPairs.Y = 0, 50
          [Grain].MaximumPotentialGrainSize.Value = 1
      Cultivar Bolac
        Command:
          [Phenology].Vernalisation.VernSens = 2.5
          [Phenology].Vernalisation.PhotopSens = 4.0
      Cultivar EGAGregory
        Command:
          [Phenology].Vernalisation.VernSens = 2.7
          [Phenology].Vernalisation.PhotopSens = 3.2
      Cultivar Kelallac
        Command:
          [Phenology].Vernalisation.VernSens = 2.5
          [Phenology].Vernalisation.PhotopSens = 4.0
      Cultivar Mckellar
        Command:
          [Phenology].Vernalisation.VernSens = 5.0
          [Phenology].Vernalisation.PhotopSens = 4.0
      Cultivar Kennedy
        Command:
          [Phenology].Vernalisation.VernSens = 2.5
          [Phenology].Vernalisation.PhotopSens = 4.0
      Cultivar Derrimut
        Command:
          [Phenology].Vernalisation.VernSens = 1.5
          [Phenology].Vernalisation.PhotopSens = 3.5
      Cultivar Janz
        Command:
          [Phenology].Vernalisation.VernSens = 1.5
          [Phenology].Vernalisation.PhotopSens = 3.5
      Cultivar Gladius
        Command:
          [Phenology].Vernalisation.VernSens = 1.5
          [Phenology].Vernalisation.PhotopSens = 3.0
      Cultivar Ventura
        Command:
          [Phenology].Vernalisation.VernSens = 1.5
          [Phenology].Vernalisation.PhotopSens = 3.0
      Cultivar Young
        Command:
          [Phenology].Vernalisation.VernSens = 2.3
          [Phenology].Vernalisation.PhotopSens = 3.2
      Cultivar Yitpi
        Command:
          [Phenology].Vernalisation.VernSens = 1.5
          [Phenology].Vernalisation.PhotopSens = 3.0
      Cultivar Ruby
        Command:
          [Phenology].Vernalisation.VernSens = 2.3
          [Phenology].Vernalisation.PhotopSens = 3.2
      Cultivar Wyalkatchem
        Command:
          [Phenology].Vernalisation.VernSens = 2.3
          [Phenology].Vernalisation.PhotopSens = 3.2
          [Phenology].EarlyReproductive.Target.Value = 380
      Cultivar Wedgetail
        Command:
          [Phenology].Vernalisation.VernSens = 3.9
          [Phenology].Vernalisation.PhotopSens = 3.9
      Cultivar H46
        Command:
          [Phenology].Vernalisation.VernSens = 1.5
          [Phenology].Vernalisation.PhotopSens = 1.5
      Cultivar Mercury
        Command:
          [Phenology].Vernalisation.VernSens = 1.5
          [Phenology].Vernalisation.PhotopSens = 2.5
      Cultivar Gregory
        Command:
          [Phenology].Vernalisation.VernSens = 2.7
          [Phenology].Vernalisation.PhotopSens = 3.2
      Cultivar Livingston
        Command:
          [Phenology].Vernalisation.VernSens = 2.3
          [Phenology].Vernalisation.PhotopSens = 3.2
      Cultivar ega_gregory
        Command:
          [Phenology].Vernalisation.VernSens = 2.7
          [Phenology].Vernalisation.PhotopSens = 3.2
      Cultivar hartog1
        Command:
          [Phenology].Vernalisation.VernSens = 1.5
          [Phenology].Vernalisation.PhotopSens = 3.0
  DataStore
    ExcelInput Observed: FileName=Observed.xlsx
      SheetNames=[Observed, TimeSeries, LeafAppearance, Zadok, SoilWater, ET]
    PredictedObserved: PredictedTableName=Report; ObservedTableName=Observed; FieldNameUsedForMatch=Wheat.Phenology.CurrentStageName
      Tests: POName=PredictedObserved
        AcceptedStats:
          Name                  n    Slope        Intercept  SEslope     SEintercept  R2           RMSE      NSE          ME         MAE       RSR
          Wheat.AboveGround.N   33   1.10029      2.72318    0.0892145   1.36253      0.830698     5.95878   0.536706     3.97822    4.34368   0.670265
          Wheat.AboveGround.Wt  137  0.418279     458.074    0.0412994   52.022       0.43176      453.384   0.285292     -204.95    358.777   0.842313
          Wheat.Grain.Live.N    74   0.582337     2.87876    0.0557491   0.48383      0.602456     2.95876   0.600408     -0.173666  2.25336   0.627848
          Wheat.Grain.Number    128  1.20148      66012.4    0.428817    4752.93      0.0586503    70874.5   -300.142     68088.5    68088.5   17.2855
          Wheat.Grain.Protein   108  0.000320694  12.5436    0.00180684  0.023511     0.000297104  2.42332   -0.00952569  -0.239017  1.87735   1.00009
          Wheat.Grain.Wt        157  0.335208     172.596    0.0527899   22.8769      0.206433     185.905   -0.153391    -91.5143   150.48    1.07053
          Wheat.Leaf.LAI        1    -            -          -           -            -            0.925016  -INF         0.925016   0.925016  -
          Wheat.Stem.Live.Wt    6    0.762044     -12.1116   0.170955    73.0438      0.832426     130.15    0.534229     -103.094   106.065   0.623011
        AcceptedStatsName=Name n Slope Intercept SEslope SEintercept R2 RMSE NSE ME MAE RSR
    Input NZObservations: FileName=%root%\Tests\Validation\Wheat\RainShelterBiomass.txt
    TimeSeriesStats: TableName=PredictedObserved
    PredictedObserved PreVsObsPhenology: PredictedTableName=Report; ObservedTableName=Zadok; FieldNameUsedForMatch=Clock.Today
      Tests: POName=PreVsObsPhenology
        AcceptedStats:
          {Name=Wheat.Phenology.Zadok.Stage, n=402, Slope=0.700383, Intercept=15.6085, SEslope=0.0376523, SEintercept=2.20889, R2=0.463813, RMSE=20.4795, NSE=0.343049, ME=-0.254825, MAE=9.55289, RSR=0.809517}
        AcceptedStatsName=Name n Slope Intercept SEslope SEintercept R2 RMSE NSE ME MAE RSR
    PredictedObserved PreVsObsLeafNumber: PredictedTableName=Report; ObservedTableName=LeafAppearance; FieldNameUsedForMatch=Clock.Today
      Tests: POName=PreVsObsLeafNumber
        AcceptedStats:
          Name                          n    Slope     Intercept  SEslope    SEintercept  R2        RMSE     NSE         ME        MAE      RSR
          Wheat.Leaf.AppearedCohortNo   325  1.0919    1.30594    0.0335485  0.294854     0.766333  2.59218  -0.0431856  2.07927   2.16915  1.01979
          Wheat.Leaf.ExpandedCohortNo   99   1.2485    -0.578548  0.0259073  0.245323     0.959907  2.03012  0.657382    1.61103   1.72506  0.582372
          Wheat.Leaf.SenescingCohortNo  10   0.751655  -1.74276   0.21263    1.15736      0.60969   3.35862  -0.83712    -2.94632  2.94632  1.28585
        AcceptedStatsName=Name n Slope Intercept SEslope SEintercept R2 RMSE NSE ME MAE RSR
    PredictedObserved PreVsObsET: PredictedTableName=Report; ObservedTableName=ET; FieldNameUsedForMatch=Clock.Today
      Tests: POName=PreVsObsET
        AcceptedStats:
          {Name=ET, n=123, Slope=0.147814, Intercept=0.538791, SEslope=0.0290663, SEintercept=0.11275, R2=0.176093, RMSE=2.85904, NSE=-2.55544, ME=-2.50389, MAE=2.50929, RSR=1.87791}
        AcceptedStatsName=Name n Slope Intercept SEslope SEintercept R2 RMSE NSE ME MAE RSR
    PredictedObserved PredictedObservedAll: PredictedTableName=Report; ObservedTableName=Observed; FieldNameUsedForMatch=Clock.Today
      Tests: POName=PredictedObservedAll
        AcceptedStats:
          Name                  n   Slope     Intercept  SEslope    SEintercept  R2        RMSE     NSE        ME        MAE       RSR
          Wheat.AboveGround.N   74  1.35559   0.619226   0.0330472  0.284036     0.958965  3.89467  0.550905   2.87087   2.88768   0.665602
          Wheat.AboveGround.Wt  74  0.653322  41.86      0.0232068  16.0837      0.916719  230.872  0.759324   -134.525  150.648   0.487261
          Wheat.Grain.Live.N    13  0.922758  -2.21462   0.125985   1.09512      0.829843  3.26631  0.298592   -2.81467  2.81467   0.804645
          Wheat.Grain.Number    14  -2.68113  125006     0.544209   6022.83      0.669166  90259.2  -366.704   88134.9   88134.9   18.4781
          Wheat.Grain.Protein   6   0         12.562     0          0            -         3.52396  -1.82965   2.83367   3.24633   1.53559
          Wheat.Grain.Wt        44  0.589161  -14.5016   0.0493058  13.065       0.772705  136.081  0.584184   -80.3373  82.8001   0.637468
          Wheat.Leaf.Dead.Wt    24  1.3849    34.2601    0.262829   15.8324      0.557917  71.3949  -2.6134    52.3873   58.1421   1.86087
          Wheat.Leaf.LAI        60  1.00564   0.836305   0.0531095  0.132511     0.860758  1.11119  0.610529   0.846163  0.859116  0.618853
          Wheat.Leaf.Live.N     35  1.59656   1.02748    0.0994501  0.345023     0.886492  3.21909  -0.528643  2.39531   2.39531   1.21859
          Wheat.Leaf.Live.Wt    35  1.38162   13.0949    0.0483585  5.0837       0.961143  54.279   0.428165   42.4058   42.4058   0.745317
          Wheat.Stem.Live.N     36  1.64354   0.754915   0.083066   0.23504      0.920091  2.5978   -0.382802  1.89274   1.90551   1.15948
          Wheat.Stem.Live.Wt    42  0.505435  11.1344    0.0341915  12.2039      0.845275  176.76   0.480931   -117.076  121.428   0.711836
        AcceptedStatsName=Name n Slope Intercept SEslope SEintercept R2 RMSE NSE ME MAE RSR
  Experiment APS26
    Factors
      Factor NRate: Specifications=[ApplyFertiliser].Script.Amount=0,40,80,160
      Factor Water: Specifications=[IrrigationSchedule]
        Operations Wet
          1995-05-31  [Irrigation].Apply(amount:31);
          1995-06-01  [Irrigation].Apply(amount:13);
          1995-06-02  [Irrigation].Apply(amount:26);
          1995-06-05  [Irrigation].Apply(amount:26);
          1995-06-06  [Irrigation].Apply(amount:26);
          1995-06-07  [Irrigation].Apply(amount:26);
          1995-06-08  [Irrigation].Apply(amount:26);
          1995-06-15  [Wheat].Sow(population:120, cultivar:"GattonHartog", depth:40, rowSpacing:250);
          1995-07-05  [Irrigation].Apply(amount:26);
          1995-07-21  [Irrigation].Apply(amount:14);
          1995-08-01  [Irrigation].Apply(amount:28);
          1995-08-11  [Irrigation].Apply(amount:30);
          1995-08-25  [Irrigation].Apply(amount:15);
          1995-08-31  [Irrigation].Apply(amount:14);
          1995-09-04  [Irrigation].Apply(amount:15);
          1995-09-15  [Irrigation].Apply(amount:25);
          1995-09-22  [Irrigation].Apply(amount:20);
          1995-10-02  [Irrigation].Apply(amount:11);
        Operations Dry
          1995-06-15  [Wheat].Sow(population:120, cultivar:"GattonHartog", depth:40, rowSpacing:250);
    Simulation APS26NRate160WaterWet: Area=0; Slope=0
      Clock: StartDate=1995-06-13; EndDate=1995-10-31
      Summary summaryfile
      Weather: FileName=APS26.met
      SoilArbitrator Soil Arbitrator
      Zone paddock: Area=1; Slope=0
        Irrigation
        Fertiliser
        Manager ApplyFertiliser
          FertDayOfYear = 186
          Amount = 160
```csharp
using System;
using Models.Core;
using Models.PMF;
using APSIM.Shared.Utilities;

namespace Models
{
	[Serializable]
	public class Script : Model
	{
		[Link] Clock Clock;
		[Link] Fertiliser Fertiliser;
		[Link] Summary Summary;
		
		[Description("Day of year fertiliser is to be applied")]
		public int FertDayOfYear { get; set; }

		[Description("Amount of fertiliser to be applied")]
		public double Amount { get; set; }

		[EventSubscribe("DoManagement")]
		private void OnDoManagement(object sender, EventArgs e)
		{
			if (Clock.Today.DayOfYear == FertDayOfYear)
			{
				Fertiliser.Apply(Amount: Amount, Type: Fertiliser.Types.NO3N);
			}
		
		}
		
	}
}
```
        Soil APS26Field: SoilType=APS26Soil; LocalName=APS26Site; Site=APS26Site; NearestTown=Unknown; Region=Lawes; NaturalVegetation=Unknown; Latitude=0; Longitude=0
          Water
            Thickness  BD    AirDry  LL15   DUL       SAT
            150        1.38  0.1     0.235  0.37277   0.44
            150        1.38  0.1     0.235  0.37277   0.44
            300        1.38  0.1     0.22   0.389017  0.44
            300        1.46  0.1     0.24   0.35      0.43
            300        1.51  0.1     0.23   0.36      0.42
            300        1.49  0.1     0.23   0.35      0.43
            300        1.47  0.1     0.19   0.33      0.43
            SoilCrop WheatSoil: LL=[0.24, 0.24, 0.22, 0.24, 0.23, 0.23, 0.19]; KL=[0.1, 0.1, 0.06, 0.06, 0.06, 0.06, 0.06]; XF=[1, 1, 1, 1, 1, 1, 1]
          SoilWater: residueinterception=0; SummerDate=1-Nov; SummerU=6; SummerCona=3.5; WinterDate=1-Apr; WinterU=6; WinterCona=3.5; DiffusConst=40; DiffusSlope=16; Salb=0.13; CN2Bare=60; CNRed=20; CNCov=0.8; slope=0; discharge_width=0; catchment_area=0; max_pond=0
            Thickness  SWCON  KLAT
            150        0.3    0
            150        0.3    0
            150        0.3    0
            150        0.3    0
            300        0.3    0
            300        0.3    0
            300        0.3    0
            300        0.3    0
          SoilNitrogen: fom_type=[default, manure, mucuna, lablab, shemp, stable]; fract_carb=[0.2, 0.3, 0.54, 0.57, 0.45, 0]; fract_cell=[0.7, 0.3, 0.37, 0.37, 0.47, 0.1]; fract_lign=[0.1, 0.4, 0.09, 0.06, 0.08, 0.9]; wfpsN2N2O_x=[22, 88]; wfpsN2N2O_y=[0.1, 1]
          SoilOrganicMatter: RootCN=40; RootWt=500; SoilCN=14.5; EnrACoeff=1; EnrBCoeff=1; OCUnits=Total
            Thickness  OC    FBiom  FInert
            150        2.2   0.024  0.45
            150        1.6   0.024  0.6
            150        1.35  0.01   0.7
            150        0.95  0.01   0.85
            300        1     0.01   0.9
            300        0.8   0.01   0.95
            300        0.45  0.01   0.95
            300        0.45  0.01   0.95
          Analysis: Thickness=[150, 150, 150, 150, 300, 300, 300, 300]; PH=[7.5, 8, 8, 8, 8, 8, 8, 8]; PHUnits=Water; BoronUnits=HotWater
          Sample Initial Water: Thickness=[150, 150, 150, 150, 300, 300, 300, 300]; NO3Units=ppm; NH4Units=ppm; SWUnits=Volumetric; OCUnits=Total; PHUnits=Water
            SW=[0.327449, 0.34295, 0.334038, 0.334038, 0.330344, 0.310632, 0.30604, 0.269447]
          Sample Initial Nitrogen: NO3Units=ppm; NH4Units=ppm; SWUnits=Volumetric; OCUnits=Total; PHUnits=Water
            Thickness  NO3  NH4
            150        1.5  0.5
            150        1.8  0.8
            150        1.5  0.5
            150        1.5  0.5
            300        0.4  0.42
            300        0.2  0.42
            300        0.4  0.37
            300        0.3  0.25
        SurfaceOrganicMatter: PoolName=wheat_stubble; type=Wheat; mass=0; standing_fraction=0; cpr=0; cnr=80; CriticalResidueWeight=2000; OptimumDecompTemp=20; MaxCumulativeEOS=20; CNRatioDecompCoeff=0.277; CNRatioDecompThreshold=25; TotalLeachRain=25; MinRainToLeach=10; CriticalMinimumOrganicC=0.004; DefaultCPRatio=0; DefaultStandingFraction=0; StandingExtinctCoeff=0.5; FractionFaecesAdded=0.5
          Pools:
            {PoolName=wheat_stubble, ResidueType=Wheat, Mass=0, CNRatio=80, CPRatio=0, StandingFraction=0}
          ResidueTypes: LoadFromResource=ResidueTypes
        Plant Wheat: CropType=Wheat
        Operations IrrigationSchedule: same as APS26.Factors.Water.Wet
        MicroClimate: a_interception=0; b_interception=1; c_interception=0; d_interception=0; soil_albedo=0.3; air_pressure=1010; soil_emissivity=0.96; sun_angle=15; soil_heat_flux_fraction=0.4; night_interception_fraction=0.5; windspeed_default=3; refheight=2; albedo=0.15; emissivity=0.96; gsmax=0.01; r50=200
        Manager Calculations
          NitTot = 27077.4
          CarbonTot = 0
```csharp
using System;
using Models.Core;
using Models.PMF;
using Models.PMF.OilPalm;
using Models.Soils;
using Models.SurfaceOM;
using APSIM.Shared.Utilities;

namespace Models
{
	[Serializable]
	[System.Xml.Serialization.XmlInclude(typeof(Model))]
	public class Script : Model
	{
		[Link] Clock Clock;
		[Link] Soil Soil;
		[Link] SurfaceOrganicMatter SurfaceOM;
		[Link] Summary Summary;
		
		public double NitTot { get; set; }
		public double CarbonTot { get; set; }
		
		[EventSubscribe("Commencing")]
		private void OnSimulationCommencing(object sender, EventArgs e)
		{	
			NitTot = 0;
			CarbonTot = 0;
		}
		
		
		[EventSubscribe("DoManagement")]
		private void OnDoManagement(object sender, EventArgs e)
		{
			NitTot = MathUtilities.Sum(Soil.SoilNitrogen.TotalN);
			CarbonTot = MathUtilities.Sum(Soil.SoilNitrogen.TotalC);
		}
	}
}
```
        Report
          VariableNames:
            [Clock].Today
            Wheat.Zadok.Stage
            Wheat.Phenology.CurrentStageName
            Wheat.AboveGround.Wt
            Wheat.AboveGround.N
            Wheat.Grain.Wt
            Wheat.Grain.Protein
            Wheat.Grain.Size
            Wheat.Grain.Number
            Wheat.Grain.Live.Wt
            Wheat.Grain.Live.N
            Wheat.Leaf.LAI
            Wheat.Leaf.Live.Wt
            Wheat.Leaf.Live.N
            Wheat.Spike.Wt
            Wheat.Spike.N
            Wheat.Stem.Live.Wt
            Wheat.Stem.Live.N
            Wheat.Root.Depth
            [Wheat].Root.WaterUptake
            [Wheat].Leaf.Fw
            [Wheat].Leaf.Fn
            [Wheat].Total.Wt
            sum([Soil].SoilWater.SWmm[2:7]) as TotalSoilWater
            [Soil].SoilWater.SW
          EventNames:
            [Clock].DoReport
  Experiment APS6
    Factors
      Factor NRate: Specifications=[ApplyFertiliser]
        Operations 0
        Operations 40
          1992-06-16  [Fertiliser].Apply(Amount: 40, Type: Fertiliser.Types.NO3N);
        Operations 80
          1992-06-16  [Fertiliser].Apply(Amount: 80, Type: Fertiliser.Types.NO3N);
        Operations 120
          1992-06-16  [Fertiliser].Apply(Amount: 60, Type: Fertiliser.Types.NO3N);
          1992-08-05  [Fertiliser].Apply(Amount: 60, Type: Fertiliser.Types.NO3N);
        Operations 160
          1992-06-16  [Fertiliser].Apply(Amount: 40, Type: Fertiliser.Types.NO3N);
          1992-08-05  [Fertiliser].Apply(Amount: 120, Type: Fertiliser.Types.NO3N);
        Operations 360
          1992-06-16  [Fertiliser].Apply(Amount: 120, Type: Fertiliser.Types.NO3N);
          1992-08-05  [Fertiliser].Apply(Amount: 120, Type: Fertiliser.Types.NO3N);
          1992-09-08  [Fertiliser].Apply(Amount: 120, Type: Fertiliser.Types.NO3N);
    Simulation APS6NRate0: Area=0; Slope=0
      Clock: StartDate=1992-06-14; EndDate=1992-11-17
      Summary summaryfile
      Weather: FileName=APS6.met
      Zone paddock: Area=1; Slope=0
        Irrigation
        Fertiliser
        Soil APS6Field: SoilType=APS6Soil; LocalName=APS6Site; Site=APS6Site; NearestTown=Unknown; Region=Lawes; NaturalVegetation=Unknown; Latitude=0; Longitude=0
          Water
            Thickness  BD    AirDry  LL15  DUL   SAT
            150        1.38  0.1     0.2   0.38  0.43
            150        1.34  0.1     0.2   0.38  0.43
            300        1.35  0.1     0.22  0.4   0.43
            300        1.5   0.1     0.18  0.4   0.43
            300        1.49  0.1     0.14  0.39  0.42
            300        1.46  0.1     0.2   0.38  0.4
            300        1.46  0.1     0.2   0.38  0.4
            SoilCrop WheatSoil: LL=[0.2, 0.2, 0.22, 0.18, 0.14, 0.25, 0.28]; KL=[0.06, 0.06, 0.06, 0.06, 0.06, 0.06, 0.06]; XF=[1, 1, 1, 1, 1, 1, 1]
          SoilWater: residueinterception=0; SummerDate=1-Nov; SummerU=6; SummerCona=3.5; WinterDate=1-Apr; WinterU=6; WinterCona=3.5; DiffusConst=88; DiffusSlope=35.4; Salb=0.13; CN2Bare=60; CNRed=20; CNCov=0.8; slope=0; discharge_width=0; catchment_area=0; max_pond=0
            Thickness  SWCON  KLAT
            150        0.3    0
            150        0.3    0
            300        0.3    0
            300        0.3    0
            300        0.3    0
            300        0.3    0
            300        0.3    0
          SoilNitrogen: fom_type=[default, manure, mucuna, lablab, shemp, stable]; fract_carb=[0.2, 0.3, 0.54, 0.57, 0.45, 0]; fract_cell=[0.7, 0.3, 0.37, 0.37, 0.47, 0.1]; fract_lign=[0.1, 0.4, 0.09, 0.06, 0.08, 0.9]; wfpsN2N2O_x=[22, 88]; wfpsN2N2O_y=[0.1, 1]
          SoilOrganicMatter: RootCN=60; RootWt=2000; SoilCN=14.5; EnrACoeff=1; EnrBCoeff=1; OCUnits=Total
            Thickness  OC    FBiom  FInert
            150        2.2   0.03   0.45
            150        1.6   0.02   0.6
            300        1.15  0.01   0.78
            300        1     0.01   0.9
            300        0.8   0.01   0.99
            300        0.45  0.01   0.99
            300        0.45  0.01   0.99
          Analysis: Thickness=[150, 150, 300, 300, 300, 300, 300]; PH=[7.5, 8, 8, 8, 8, 8, 8]; PHUnits=Water; BoronUnits=HotWater
          Sample Initial Water: Thickness=[150, 150, 300, 300, 300, 300, 300]; SW=[0.326, 0.326, 0.346, 0.333, 0.315, 0.326, 0.326]; NO3Units=ppm; NH4Units=ppm; SWUnits=Volumetric; OCUnits=Total; PHUnits=Water
          Sample Initial Nitrogen: NO3Units=ppm; NH4Units=ppm; SWUnits=Volumetric; OCUnits=Total; PHUnits=Water
            Thickness  NO3   NH4
            150        1.3   1.3
            150        0.6   1
            300        0.25  1
            300        0.2   0.8
            300        0.1   0.8
            300        0.1   0.5
            300        0.1   0.5
        SurfaceOrganicMatter: PoolName=wheat_stubble; type=wheat; mass=500; standing_fraction=0; cnr=100; CriticalResidueWeight=2000; OptimumDecompTemp=20; MaxCumulativeEOS=20; CNRatioDecompCoeff=0.277; CNRatioDecompThreshold=25; TotalLeachRain=25; MinRainToLeach=10; CriticalMinimumOrganicC=0.004; DefaultCPRatio=0; DefaultStandingFraction=0; StandingExtinctCoeff=0.5; FractionFaecesAdded=0.5
          Pools:
            {PoolName=wheat_stubble, ResidueType=wheat, Mass=500, CNRatio=100, StandingFraction=0}
          ResidueTypes: LoadFromResource=ResidueTypes
        Plant Wheat: CropType=Wheat
        Operations ApplyFertiliser
          1992-06-16  [Fertiliser].Apply(Amount: 0, Type: Fertiliser.Types.NO3N);
        Operations IrrigationSchedule
          1992-06-17  [Wheat].Sow(population:121.61, cultivar:"GattonHartog", depth:30, rowSpacing:250);
          1992-06-24  [Irrigation].Apply(amount:10);
          1992-06-26  [Irrigation].Apply(amount:10);
          1992-07-28  [Irrigation].Apply(amount:30);
          1992-08-05  [Irrigation].Apply(amount:30);
          1992-08-19  [Irrigation].Apply(amount:40);
          1992-08-26  [Irrigation].Apply(amount:40);
          1992-09-09  [Irrigation].Apply(amount:40);
          1992-09-21  [Irrigation].Apply(amount:40);
          1992-10-01  [Irrigation].Apply(amount:50);
          1992-10-07  [Irrigation].Apply(amount:20);
          1992-10-08  [Irrigation].Apply(amount:20);
          1992-10-09  [Irrigation].Apply(amount:20);
          1992-10-13  [Irrigation].Apply(amount:20);
        MicroClimate: same as APS26.APS26NRate160WaterWet.paddock.MicroClimate
        Report
          VariableNames:
            [Clock].Today
            Wheat.Zadok.Stage
            Wheat.Phenology.CurrentStageName
            Wheat.AboveGround.Wt
            Wheat.AboveGround.N
            Wheat.Grain.Wt
            Wheat.Grain.Protein
            Wheat.Grain.Size
            Wheat.Grain.Number
            Wheat.Grain.Live.Wt
            Wheat.Grain.Live.N
            Wheat.Leaf.LAI
            Wheat.Leaf.Live.Wt
            Wheat.Leaf.Dead.Wt
            Wheat.Leaf.Live.N
            Wheat.Spike.Wt
            Wheat.Spike.N
            Wheat.Stem.Live.Wt
            Wheat.Stem.Live.N
            Wheat.Root.Depth
            [Wheat].Root.WaterUptake
            [Wheat].Leaf.Fw
            [Wheat].Leaf.Fn
            [Wheat].Total.Wt
            Wheat.Structure.TotalStemPopn
          EventNames:
            [Clock].DoReport
      SoilArbitrator Soil Arbitrator
  Experiment APS14
    Factors
      Factor Stubble: Specifications=[OMSchedule]
        Operations Bare
          1993-06-03  [SurfaceOrganicMatter].Incorporate(fraction: 1.0, depth:100);
        Operations Lucerne
          1993-06-03  [SurfaceOrganicMatter].Add(mass: 3560, N: 108.8, P:0.0, type: "lucerne", name: "");
          1993-06-03  [SurfaceOrganicMatter].Incorporate(fraction: 1.0, depth:100);
        Operations Straw
          1993-06-03  [SurfaceOrganicMatter].Add(mass: 3584, N: 28.8, P:0.0, type: "barley", name: "");
          1993-06-03  [SurfaceOrganicMatter].Incorporate(fraction: 1.0, depth:100);
      Factor NRate: Specifications=[FertiliserSchedule]
        Operations 000
          1993-06-18  [Fertiliser].Apply(Amount: 0, Type: Fertiliser.Types.NO3N);
        Operations 040
          1993-06-18  [Fertiliser].Apply(Amount: 40, Type: Fertiliser.Types.NO3N);
        Operations 080
          1993-06-18  [Fertiliser].Apply(Amount: 80, Type: Fertiliser.Types.NO3N);
        Operations 200
          1993-06-18  [Fertiliser].Apply(Amount: 120, Type: Fertiliser.Types.NO3N);
          1993-08-18  [Fertiliser].Apply(Amount: 80, Type: Fertiliser.Types.NO3N);
    Simulation APS14StubbleBareNRate0: Area=0; Slope=0
      Clock: StartDate=1993-06-02; EndDate=1993-11-26
      Summary summaryfile
      Weather: FileName=APS14.met
      Zone paddock: Area=1; Slope=0
        Irrigation
        Fertiliser
        Soil APS14Field: SoilType=Clay Loam; LocalName=Gatton; Site=Gatton; NearestTown=Gatton; Region=Lockyer Valley; State=Qld; Country=Australia; NaturalVegetation=Unknown; Latitude=0; Longitude=0
          Water
            Thickness  BD    AirDry  LL15  DUL   SAT
            150        1.38  0.1     0.2   0.38  0.43
            150        1.34  0.2     0.2   0.38  0.43
            150        1.31  0.24    0.24  0.4   0.45
            150        1.4   0.19    0.19  0.41  0.45
            300        1.5   0.18    0.18  0.4   0.43
            300        1.49  0.14    0.14  0.39  0.43
            300        1.46  0.2     0.2   0.38  0.4
            300        1.46  0.2     0.2   0.38  0.4
            SoilCrop WheatSoil: LL=[0.2, 0.2, 0.24, 0.19, 0.18, 0.14, 0.25, 0.28]; KL=[0.06, 0.06, 0.06, 0.05, 0.04, 0.03, 0.02, 0.02]; XF=[1, 1, 1, 1, 1, 1, 1, 1]
          SoilWater: same as APS26.APS26NRate160WaterWet.paddock.APS26Field.SoilWater
          SoilNitrogen: fom_type=[default, manure, mucuna, lablab, shemp, stable]; fract_carb=[0.2, 0.3, 0.54, 0.57, 0.45, 0]; fract_cell=[0.7, 0.3, 0.37, 0.37, 0.47, 0.1]; fract_lign=[0.1, 0.4, 0.09, 0.06, 0.08, 0.9]; wfpsN2N2O_x=[22, 88]; wfpsN2N2O_y=[0.1, 1]
          SoilOrganicMatter: RootCN=40; RootWt=1500; SoilCN=14.5; EnrACoeff=0; EnrBCoeff=0; OCUnits=Total
            Thickness  OC    FBiom  FInert
            150        2.2   0.02   0.4
            150        1.6   0.02   0.6
            150        1.35  0.01   0.7
            150        0.95  0.01   0.8
            300        1     0.01   0.9
            300        0.8   0.01   0.9
            300        0.45  0.01   0.9
            300        0.45  0.01   0.9
          Analysis: Thickness=[150, 150, 150, 150, 300, 300, 300, 300]; PH=[7.5, 8, 8, 8, 8, 8, 8, 8]; PHUnits=Water; BoronUnits=HotWater
          Sample Initial Water: Thickness=[150, 150, 150, 150, 300, 300, 300, 300]; SW=[0.336, 0.336, 0.302, 0.302, 0.319, 0.345, 0.294, 0.264]; NO3Units=ppm; NH4Units=ppm; SWUnits=Volumetric; OCUnits=Total; PHUnits=Water
          Sample Initial Nitrogen: NO3Units=ppm; NH4Units=ppm; SWUnits=Volumetric; OCUnits=Total; PHUnits=Water
            Thickness  NO3  NH4
            150        2    0.3
            150        0.5  0.3
            150        0.2  0.2
            150        0.2  0.1
            300        0.2  0.1
            300        0.2  0.1
            300        0.2  0.1
            300        0.2  0.1
        SurfaceOrganicMatter: PoolName=wheat_stubble; type=Wheat; mass=500; standing_fraction=0; cpr=0; cnr=120; CriticalResidueWeight=2000; OptimumDecompTemp=20; MaxCumulativeEOS=20; CNRatioDecompCoeff=0.277; CNRatioDecompThreshold=25; TotalLeachRain=25; MinRainToLeach=10; CriticalMinimumOrganicC=0.004; DefaultCPRatio=0; DefaultStandingFraction=0; StandingExtinctCoeff=0.5; FractionFaecesAdded=0.5
          Pools:
            {PoolName=wheat_stubble, ResidueType=Wheat, Mass=500, CNRatio=120, CPRatio=0, StandingFraction=0}
          ResidueTypes: LoadFromResource=ResidueTypes
        Plant Wheat: CropType=Wheat
        Operations IrrigationSchedule
          1993-06-04  [Irrigation].Apply(amount:14);
          1993-06-18  [Irrigation].Apply(amount:26);
          1993-06-23  [Irrigation].Apply(amount:13);
          1993-07-09  [Irrigation].Apply(amount:25);
          1993-07-22  [Irrigation].Apply(amount:20);
          1993-08-06  [Irrigation].Apply(amount:31);
          1993-08-18  [Irrigation].Apply(amount:36);
          1993-08-27  [Irrigation].Apply(amount:38);
          1993-09-06  [Irrigation].Apply(amount:33);
          1993-09-24  [Irrigation].Apply(amount:35);
          1993-10-01  [Irrigation].Apply(amount:36);
        MicroClimate: same as APS26.APS26NRate160WaterWet.paddock.MicroClimate
        Operations FertiliserSchedule
          1993-06-18  [Fertiliser].Apply(Amount: 0, Type: Fertiliser.Types.NO3N);
        Operations OMSchedule
          1993-06-03  [SurfaceOrganicMatter].Add(mass: 0, N: 0, P:0.0, type: "wheat", name: "");
          1993-06-03  [SurfaceOrganicMatter].Incorporate(fraction: 1.0, depth:100);
        Operations SowingSchedule
          1993-06-29  [Wheat].Sow(population:114, cultivar:"GattonHartog", depth:30, rowSpacing:250);
        PredictedObserved: FieldNameUsedForMatch=Wheat.Zadok.Stage
        Manager ExtraVariables
```csharp
        using System;
        using Models.Core;
		using System.Collections.Generic;
        using System.Text;
        using Models.PMF.OldPlant;
        using Models.PMF;
        using Models.Soils;
        using Models;
        using System.Xml.Serialization;
        using APSIM.Shared.Utilities;

        namespace Models
        {
[Serializable] 
public class Script : Model
{      
[Link] Clock Clock;
[Link] Soils.Soil Soil;
[Link] Models.SurfaceOM.SurfaceOrganicMatter SOM;
[Link] Plant Plant;          
[Link] Weather Met;   
[Link] Fertiliser Fert;
[Link] Irrigation Irrig;  
               
[XmlIgnore] public bool InitialDay { get; set; }

[XmlIgnore] public double AccumPlantN { get; set; }
[XmlIgnore] public double AccumMineralisation { get; set; }
[XmlIgnore] public double AccumDenit { get; set; }
[XmlIgnore] public double AccumFert { get; set; }
[XmlIgnore] public double AccumLeach { get; set; }
[XmlIgnore] public double AccumDetach { get; set; }
[XmlIgnore] public double DeltaSoilOMN { get; set; }
[XmlIgnore] public double DeltaSurfaceOMN { get; set; }
[XmlIgnore] public double DeltaSoilMineralN { get; set; }
[XmlIgnore] public double SoilNitrogenContent { get; set; }

[XmlIgnore] public double AccumEO { get; set; }
[XmlIgnore] public double AccumEP { get; set; }
[XmlIgnore] public double AccumES { get; set; }
[XmlIgnore] public double AccumDrainage { get; set; }
[XmlIgnore] public double AccumRunoff { get; set; }
[XmlIgnore] public double AccumOutflowLat { get; set; }
[XmlIgnore] public double AccumIrrigation { get; set; }
[XmlIgnore] public double AccumRainfall { get; set; }
[XmlIgnore] public double SoilWaterDeficit { get; set; }

[XmlIgnore] public double AccumTtemerg { get; set; }

[XmlIgnore] public double  InitialSoilOMN { get; set; }
[XmlIgnore] public double  InitialSurfaceOMN { get; set; }
[XmlIgnore] public double  InitialMineralN { get; set; }

[XmlIgnore] public double SWC { get; set; }
[XmlIgnore] public double DUL { get; set; }
[XmlIgnore] public double OutFlowLat { get; set; }
[XmlIgnore] public double MineralN {get; set;}
[XmlIgnore] public double TotalNO3 {get; set;}
[XmlIgnore] public double TotalNH4 {get; set;}

[EventSubscribe("Initialised")]
private void OnInitialised(object sender, EventArgs e)
{
InitialDay = true;
AccumPlantN = 0;
AccumMineralisation = 0;
AccumDenit = 0;
AccumFert = 0;
AccumLeach = 0;
AccumDetach = 0;
DeltaSoilOMN = 0;
DeltaSurfaceOMN = 0;
DeltaSoilMineralN = 0;
SoilNitrogenContent = 0;

AccumEO = 0;
AccumEP = 0;
AccumES = 0;
AccumDrainage = 0;
AccumRunoff = 0;
AccumOutflowLat = 0;
AccumIrrigation = 0;
AccumRainfall = 0;
SoilWaterDeficit = 0;

AccumTtemerg = 0;

SWC = 0;
DUL = 0;
}	   

[EventSubscribe("DoManagementCalculations")]
private void OnDoManagementCalculations(object sender, EventArgs e)
{
	int layers = Soil.Thickness.Length;
    if (InitialDay)
	{
      InitialSurfaceOMN = SOM.N;
      for (int layer = 0; layer < layers; layer++)
      { 
      InitialSoilOMN += (Soil.SoilNitrogen.MicrobialN[layer] + Soil.SoilNitrogen.FOMN[layer] + Soil.SoilNitrogen.HumicN[layer]);
      InitialMineralN += (Soil.NO3N[layer] + Soil.NH4N[layer] + Soil.SoilNitrogen.urea[layer]);
      }
      InitialDay = false;
    }

//!!!!!! Nitrogen balance components !!!!!!
//!!!!!!^^^^^^^^^^^^^^^^^^^^^^^^^^^^^!!!!!!
//AccumPlantN -= (double)this.Get("[Plant].Root.NUptake");
AccumFert += Fert.NitrogenApplied;
DeltaSurfaceOMN = SOM.N - InitialSurfaceOMN;
AccumDetach = 0; //plant2 doesn't detach yet
MineralN = 0;
TotalNO3 = 0;
TotalNH4 = 0;
double OrganicN = 0;
//AccumLeach = AccumLeach - Soil.SoilNitrogen.leach_urea - Soil.SoilNitrogen.leach_no3 - Soil.SoilNitrogen.leach_nh4; //Fails
   for (int layer = 0; layer < layers; layer++)
    { 
    AccumMineralisation += (Soil.SoilNitrogen.MineralisedN[layer] + Soil.SoilNitrogen.dlt_n_min_res[layer]);
    AccumDenit -= MathUtilities.Sum(Soil.SoilNitrogen.Denitrification);
    OrganicN += (Soil.SoilNitrogen.MicrobialN[layer] + Soil.SoilNitrogen.FOMN[layer] + Soil.SoilNitrogen.HumicN[layer]);
    MineralN += (Soil.NO3N[layer] + Soil.NH4N[layer] + Soil.SoilNitrogen.urea[layer]);
    TotalNO3 += Soil.NO3N[layer];
    TotalNH4 += Soil.NH4N[layer];
    }
DeltaSoilOMN = OrganicN - InitialSoilOMN;
DeltaSoilMineralN = MineralN - InitialMineralN;
SoilNitrogenContent = MineralN;
//!!!!!! Water balance components !!!!!!
//!!!!!!^^^^^^^^^^^^^^^^^^^^^^^^^^!!!!!!
AccumEO -= Soil.SoilWater.Eo;
//AccumEP -= (double)this.Get("[Plant].Leaf.Transpiration");
AccumES -= Soil.SoilWater.Es; 
AccumDrainage -= Soil.SoilWater.Drainage; 
AccumRunoff -= Soil.SoilWater.Runoff; 
AccumIrrigation += Irrig.IrrigationApplied; 
AccumRainfall += Met.Rain;
SWC = 0;
DUL = 0;
double OutFlowLat = 0;
   for (int layer = 0; layer < layers; layer++)
   {
     SWC += Soil.SoilWater.SWmm[layer];
     DUL += Soil.SoilWater.DULmm[layer];
     OutFlowLat = Soil.SoilWater.outflow_lat[layer];
   }
AccumOutflowLat -= OutFlowLat;
SoilWaterDeficit =  (SWC - DUL);
}

[EventSubscribe("DoManagement")]
private void OnDoManagement(object sender, EventArgs e)
{
//!!!!!! Thermal time calculation !!!!!!
//!!!!!! ^^^^^^^^^^^^^^^^^^^^^^^^ !!!!!!

}
}
}
```
        Report
          VariableNames:
            [Clock].Today
            Wheat.Zadok.Stage
            Wheat.Phenology.CurrentStageName
            Wheat.AboveGround.Wt
            Wheat.AboveGround.N
            Wheat.Grain.Wt
            Wheat.Grain.Protein
            Wheat.Grain.Size
            Wheat.Grain.Number
            Wheat.Grain.Live.Wt
            Wheat.Grain.Live.N
            Wheat.Leaf.LAI
            Wheat.Leaf.Live.Wt
            Wheat.Leaf.Live.N
            Wheat.Spike.Wt
            Wheat.Spike.N
            Wheat.Stem.Live.Wt
            Wheat.Stem.Live.N
            Wheat.Root.Depth
            [Wheat].Root.WaterUptake
            [Wheat].Leaf.Fw
            [Wheat].Leaf.Fn
            [Wheat].Total.Wt
          EventNames:
            [Clock].DoReport
      SoilArbitrator Soil Arbitrator
  Experiment Mer86
    Factors
      Factor NRate: Specifications=[FertiliserOperations]
        Operations 15
          1986-06-14  [Fertiliser].Apply(Amount: 15, Type: Fertiliser.Types.NO3N, Depth: 50);
        Operations 60
          1986-05-29  [Fertiliser].Apply(Amount: 30, Type: Fertiliser.Types.NO3N, Depth: 50);
      Factor Water: Specifications=[IrrigationOperations]
        Operations Dry
          1986-09-03  [Irrigation].Apply (amount:0);
          1986-09-05  [Irrigation].Apply (amount:0);
          1986-09-10  [Irrigation].Apply (amount:0);
          1986-09-11  [Irrigation].Apply (amount:0);
          1986-09-14  [Irrigation].Apply (amount:0);
          1986-09-16  [Irrigation].Apply (amount:0);
          1986-09-18  [Irrigation].Apply (amount:0);
          1986-09-21  [Irrigation].Apply (amount:0);
          1986-09-23  [Irrigation].Apply (amount:0);
          1986-09-24  [Irrigation].Apply (amount:0);
          1986-09-30  [Irrigation].Apply (amount:0);
          1986-10-02  [Irrigation].Apply (amount:0);
          1986-10-04  [Irrigation].Apply (amount:0);
          1986-10-10  [Irrigation].Apply (amount:0);
          1986-10-12  [Irrigation].Apply (amount:0);
          1986-10-14  [Irrigation].Apply (amount:0);
          1986-10-16  [Irrigation].Apply (amount:0);
          1986-10-18  [Irrigation].Apply (amount:0);
          1986-10-20  [Irrigation].Apply (amount:0);
          1986-10-22  [Irrigation].Apply (amount:0);
          1986-10-25  [Irrigation].Apply (amount:0);
          1986-10-26  [Irrigation].Apply (amount:0);
          1986-10-28  [Irrigation].Apply (amount:0);
          1986-10-30  [Irrigation].Apply (amount:0);
          1986-11-01  [Irrigation].Apply (amount:0);
          1986-11-03  [Irrigation].Apply (amount:0);
          1986-11-05  [Irrigation].Apply (amount:0);
          1986-11-07  [Irrigation].Apply (amount:0);
        Operations Wet
          1986-09-03  [Irrigation].Apply (amount:10);
          1986-09-05  [Irrigation].Apply (amount:20);
          1986-09-10  [Irrigation].Apply (amount:20);
          1986-09-11  [Irrigation].Apply (amount:10);
          1986-09-14  [Irrigation].Apply (amount:10);
          1986-09-16  [Irrigation].Apply (amount:10);
          1986-09-18  [Irrigation].Apply (amount:10);
          1986-09-21  [Irrigation].Apply (amount:10);
          1986-09-23  [Irrigation].Apply (amount:10);
          1986-09-24  [Irrigation].Apply (amount:20);
          1986-09-30  [Irrigation].Apply (amount:30);
          1986-10-02  [Irrigation].Apply (amount:20);
          1986-10-04  [Irrigation].Apply (amount:20);
          1986-10-10  [Irrigation].Apply (amount:20);
          1986-10-12  [Irrigation].Apply (amount:20);
          1986-10-14  [Irrigation].Apply (amount:20);
          1986-10-16  [Irrigation].Apply (amount:20);
          1986-10-18  [Irrigation].Apply (amount:20);
          1986-10-20  [Irrigation].Apply (amount:20);
          1986-10-22  [Irrigation].Apply (amount:20);
          1986-10-25  [Irrigation].Apply (amount:20);
          1986-10-26  [Irrigation].Apply (amount:20);
          1986-10-28  [Irrigation].Apply (amount:20);
          1986-10-30  [Irrigation].Apply (amount:20);
          1986-11-01  [Irrigation].Apply (amount:20);
          1986-11-03  [Irrigation].Apply (amount:20);
          1986-11-05  [Irrigation].Apply (amount:20);
          1986-11-07  [Irrigation].Apply (amount:20);
    Simulation Mer86Base: Area=0; Slope=0
      Clock: StartDate=1986-05-01; EndDate=1986-11-30
      Summary summaryfile
      Weather: FileName=MER-86.met
      Zone paddock: Area=1; Slope=0
        Soil MER-86Field: SoilType=sand; LocalName=Merredin; Site=Merredin; NearestTown=Unknown; Region=WA; NaturalVegetation=Unknown; Latitude=0; Longitude=0
          Water
            Thickness  BD    AirDry  LL15  DUL   SAT
            100        1.7   0.03    0.03  0.16  0.26
            100        1.75  0.03    0.03  0.21  0.26
            100        1.8   0.03    0.03  0.22  0.25
            100        1.85  0.04    0.05  0.23  0.24
            100        1.85  0.04    0.1   0.22  0.23
            100        1.85  0.04    0.12  0.22  0.22
            100        1.85  0.04    0.17  0.22  0.22
            200        1.85  0.04    0.17  0.22  0.23
            200        1.85  0.04    0.17  0.22  0.23
            200        1.85  0.04    0.17  0.22  0.23
            SoilCrop WheatSoil
              LL=[0.03, 0.03, 0.03, 0.05, 0.1, 0.12, 0.17, 0.17, 0.17, 0.17]
              KL=[0.06, 0.06, 0.06, 0.06, 0.06, 0.06, 0.06, 0.06, 0.06, 0.06]
              XF=[0.2, 0.6, 0.6, 0.6, 0.6, 0.6, 0.6, 0.6, 0.6, 0.6]
          SoilWater: residueinterception=0; SummerDate=1-Nov; SummerU=6; SummerCona=2; WinterDate=1-Apr; WinterU=6; WinterCona=2; DiffusConst=88; DiffusSlope=35; Salb=0.13; CN2Bare=60; CNRed=20; CNCov=0.8; slope=0; discharge_width=0; catchment_area=0; max_pond=0
            Thickness  SWCON  KLAT
            100        1      0
            100        1      0
            100        1      0
            100        1      0
            100        0.3    0
            100        1      0
            100        1      0
            200        1      0
            200        1      0
            200        1      0
          SoilNitrogen: fom_type=[default, manure, mucuna, lablab, shemp, stable]; fract_carb=[0.2, 0.3, 0.54, 0.57, 0.45, 0]; fract_cell=[0.7, 0.3, 0.37, 0.37, 0.47, 0.1]; fract_lign=[0.1, 0.4, 0.09, 0.06, 0.08, 0.9]; wfpsN2N2O_x=[22, 88]; wfpsN2N2O_y=[0.1, 1]
          SoilOrganicMatter: RootCN=40; RootWt=1000; SoilCN=13; EnrACoeff=1; EnrBCoeff=1; OCUnits=Total
            Thickness  OC    FBiom  FInert
            100        0.5   0.04   0.1
            100        0.1   0.03   0.1
            100        0.1   0.02   0.2
            100        0.05  0.01   0.8
            100        0.05  0.01   0.9
            100        0.05  0.01   0.9
            100        0.05  0.01   0.9
            200        0.05  0.01   0.9
            200        0.05  0.01   0.9
            200        0.05  0.01   0.9
          Analysis: Thickness=[100, 100, 100, 100, 100, 100, 100, 200, 200, 200]; PH=[4.7, 4.7, 4.7, 6, 6, 6, 6, 6, 6, 6]; PHUnits=Water; BoronUnits=HotWater
          Sample Initial Water: Thickness=[100, 100, 100, 100, 100, 100, 100, 200, 200, 200]; SW=[0.03, 0.03, 0.07, 0.1, 0.22, 0.22, 0.22, 0.22, 0.21, 0.19]; NO3Units=ppm; NH4Units=ppm; SWUnits=Volumetric; OCUnits=Total; PHUnits=Water
          Sample Initial Nitrogen: NO3Units=ppm; NH4Units=ppm; SWUnits=Volumetric; OCUnits=Total; PHUnits=Water
            Thickness  NO3  NH4
            100        10   5
            100        5    3
            100        0.3  1
            100        0    0
            100        0    0
            100        0    0
            100        0    0
            200        0    0
            200        0    0
            200        0    0
        Irrigation
        SurfaceOrganicMatter: PoolName=wheat_stubble; type=wheat; mass=0; standing_fraction=0; cpr=0; cnr=80; CriticalResidueWeight=2000; OptimumDecompTemp=20; MaxCumulativeEOS=20; CNRatioDecompCoeff=0.277; CNRatioDecompThreshold=25; TotalLeachRain=25; MinRainToLeach=10; CriticalMinimumOrganicC=0.004; DefaultCPRatio=0; DefaultStandingFraction=0; StandingExtinctCoeff=0.5; FractionFaecesAdded=0.5
          Pools:
            {PoolName=wheat_stubble, ResidueType=wheat, Mass=0, CNRatio=80, CPRatio=0, StandingFraction=0}
          ResidueTypes: LoadFromResource=ResidueTypes
        Operations SowingOperations
          1986-05-29  [Wheat].Sow(population:149, cultivar:"Gutha", depth:30, rowSpacing:250);
        Plant Wheat: CropType=Wheat
        MicroClimate: same as APS26.APS26NRate160WaterWet.paddock.MicroClimate
        Fertiliser
        Operations FertiliserOperations
          1986-06-14  [Fertiliser].Apply(Amount: 15, Type: Fertiliser.Types.NO3N, Depth: 50);
        Operations IrrigationOperations: same as Mer86.Factors.Water.Wet
        MicroClimate: same as APS26.APS26NRate160WaterWet.paddock.MicroClimate
        Report: same as APS14.APS14StubbleBareNRate0.paddock.Report
      SoilArbitrator Soil Arbitrator
  Experiment Mer73
    Factors
      Factor NRate: Specifications=[FertiliserOperations]
        Operations 0
          1986-06-14  [Fertiliser].Apply(Amount: 0, Type: Fertiliser.Types.NO3N, Depth: 50);
        Operations 15
          1973-06-21  [Fertiliser].Apply(Amount: 15, Type: Fertiliser.Types.NO3N, Depth: 50);
      Factor Water: Specifications=[IrrigationOperations]
        Operations Dry: same as Mer86.Factors.Water.Dry
        Operations 40
          1973-09-21  [Irrigation].Apply (amount:40);
        Operations 150
          1973-08-28  [Irrigation].Apply (amount:20);
          1973-09-21  [Irrigation].Apply (amount:30);
          1973-10-12  [Irrigation].Apply (amount:50);
          1973-10-28  [Irrigation].Apply (amount:50);
    Simulation Mer73Base: Area=0; Slope=0
      Clock: StartDate=1973-05-01; EndDate=1973-11-30
      Summary summaryfile
      Weather: FileName=MER-73.met
      Zone paddock: Area=1; Slope=0
        Soil MER-73Field: SoilType=sand; LocalName=Merredin; Site=Merredin; NearestTown=Unknown; Region=WA; NaturalVegetation=Unknown; Latitude=0; Longitude=0
          Water
            Thickness  BD    AirDry  LL15  DUL   SAT
            100        1.7   0.03    0.03  0.15  0.28
            100        1.85  0.03    0.04  0.2   0.27
            100        1.75  0.03    0.04  0.2   0.27
            100        1.7   0.04    0.05  0.2   0.25
            100        1.7   0.04    0.05  0.21  0.25
            100        1.85  0.04    0.08  0.21  0.25
            100        1.95  0.04    0.11  0.21  0.25
            200        2     0.04    0.14  0.21  0.23
            200        2     0.04    0.16  0.23  0.23
            200        2     0.04    0.14  0.23  0.23
            SoilCrop WheatSoil
              LL=[0.03, 0.03, 0.03, 0.05, 0.1, 0.12, 0.17, 0.17, 0.17, 0.17]
              KL=[0.06, 0.06, 0.06, 0.06, 0.06, 0.06, 0.06, 0.06, 0.06, 0.06]
              XF=[0.2, 0.2, 0.4, 0.4, 0.4, 0.4, 0.4, 0.4, 0.2, 0]
          SoilWater: residueinterception=0; SummerDate=1-Nov; SummerU=6; SummerCona=2; WinterDate=1-Apr; WinterU=6; WinterCona=2; DiffusConst=88; DiffusSlope=35; Salb=0.13; CN2Bare=60; CNRed=20; CNCov=0.8; slope=0; discharge_width=0; catchment_area=0; max_pond=0
            Thickness  SWCON  KLAT
            100        1      0
            100        1      0
            100        1      0
            100        1      0
            100        0.1    0
            100        1      0
            100        1      0
            200        1      0
            200        1      0
            200        1      0
          SoilNitrogen: fom_type=[default, manure, mucuna, lablab, shemp, stable]; fract_carb=[0.2, 0.3, 0.54, 0.57, 0.45, 0]; fract_cell=[0.7, 0.3, 0.37, 0.37, 0.47, 0.1]; fract_lign=[0.1, 0.4, 0.09, 0.06, 0.08, 0.9]; wfpsN2N2O_x=[22, 88]; wfpsN2N2O_y=[0.1, 1]
            oc=[1.2033, 0.792285, 0.299009, 0.0513806, 0.0510005, 0.0506757, 0.0504969, 0.0501203, 0.0500588, 0.05002]
          SoilOrganicMatter: RootCN=20; RootWt=1500; SoilCN=13; EnrACoeff=1; EnrBCoeff=1; OCUnits=Total
            Thickness  OC    FBiom  FInert
            100        1.2   0.04   0.1
            100        0.8   0.03   0.1
            100        0.3   0.02   0.2
            100        0.05  0.01   0.8
            100        0.05  0.01   0.9
            100        0.05  0.01   0.9
            100        0.05  0.01   0.9
            200        0.05  0.01   0.9
            200        0.05  0.01   0.9
            200        0.05  0.01   0.9
          Analysis: Thickness=[100, 100, 100, 100, 100, 100, 100, 200, 200, 200]; PH=[4.7, 4.7, 4.7, 6, 6, 6, 6, 6, 6, 6]; PHUnits=Water; BoronUnits=HotWater
          Sample Initial Water: Thickness=[100, 100, 100, 100, 100, 100, 100, 200, 200, 200]; SW=[0.03, 0.03, 0.07, 0.1, 0.22, 0.22, 0.22, 0.22, 0.21, 0.19]; NO3Units=ppm; NH4Units=ppm; SWUnits=Volumetric; OCUnits=Total; PHUnits=Water
          Sample Initial Nitrogen: NO3Units=ppm; NH4Units=ppm; SWUnits=Volumetric; OCUnits=Total; PHUnits=Water
            Thickness  NO3  NH4
            100        2    1
            100        1    0
            100        0    0
            100        0    0
            100        0    0
            100        0    0
            100        0    0
            200        0    0
            200        0    0
            200        0    0
        Irrigation
        SurfaceOrganicMatter: PondActive=no; ReportAdditions=no; ReportRemovals=no; PoolName=wheat_stubble; type=wheat; mass=2500; standing_fraction=0; cpr=0; cnr=30; CriticalResidueWeight=2000; OptimumDecompTemp=20; MaxCumulativeEOS=20; CNRatioDecompCoeff=0.277; CNRatioDecompThreshold=25; TotalLeachRain=25; MinRainToLeach=10; CriticalMinimumOrganicC=0.004; DefaultCPRatio=0; DefaultStandingFraction=0; StandingExtinctCoeff=0.5; FractionFaecesAdded=0.5
          Pools:
            {PoolName=wheat_stubble, ResidueType=wheat, Mass=2500, CNRatio=30, CPRatio=0, StandingFraction=0}
          ResidueTypes: LoadFromResource=ResidueTypes
          TillageTypes TillageTypesList
        Operations SowingOperations
          1973-06-21  [Wheat].Sow(population:100, cultivar:"Gamenya", depth:30, rowSpacing:250);
        Plant Wheat: CropType=Wheat
        MicroClimate: same as APS26.APS26NRate160WaterWet.paddock.MicroClimate
        Fertiliser
        Operations FertiliserOperations
          1986-06-14  [Fertiliser].Apply(Amount: 15, Type: Fertiliser.Types.NO3N, Depth: 50);
        Operations IrrigationOperations: same as Mer86.Factors.Water.Wet
        Manager ExtraVariables: same as APS14.APS14StubbleBareNRate0.paddock.ExtraVariables
        Report: same as APS14.APS14StubbleBareNRate0.paddock.Report
      SoilArbitrator Soil Arbitrator
  Experiment RainShelter
    Factors
      Factor Irrig: Specifications=[IrrigationEvents]
        Operations Control
          1991-08-30  [Irrigation].Apply(20);
          1991-09-08  [Irrigation].Apply(12);
          1991-09-13  [Irrigation].Apply(22);
          1991-09-20  [Irrigation].Apply(14);
          1991-10-04  [Irrigation].Apply(27);
          1991-10-11  [Irrigation].Apply(18);
          1991-10-18  [Irrigation].Apply(30);
          1991-10-25  [Irrigation].Apply(42);
          1991-11-01  [Irrigation].Apply(33);
          1991-11-08  [Irrigation].Apply(24);
          1991-11-15  [Irrigation].Apply(28);
          1991-11-22  [Irrigation].Apply(37);
          1991-11-28  [Irrigation].Apply(51);
          1991-12-06  [Irrigation].Apply(36);
          1991-12-13  [Irrigation].Apply(38);
          1991-12-20  [Irrigation].Apply(35);
          1991-12-27  [Irrigation].Apply(47);
          1992-01-04  [Irrigation].Apply(40);
          1992-01-10  [Irrigation].Apply(41);
        Operations SpringD1
          1991-08-30  [Irrigation].Apply(0);
          1991-09-08  [Irrigation].Apply(0);
          1991-09-13  [Irrigation].Apply(0);
          1991-09-20  [Irrigation].Apply(0);
          1991-10-04  [Irrigation].Apply(0);
          1991-10-11  [Irrigation].Apply(18);
          1991-10-18  [Irrigation].Apply(30);
          1991-10-25  [Irrigation].Apply(42);
          1991-11-01  [Irrigation].Apply(33);
          1991-11-08  [Irrigation].Apply(24);
          1991-11-15  [Irrigation].Apply(28);
          1991-11-22  [Irrigation].Apply(37);
          1991-11-28  [Irrigation].Apply(51);
          1991-12-06  [Irrigation].Apply(36);
          1991-12-13  [Irrigation].Apply(38);
          1991-12-20  [Irrigation].Apply(35);
          1991-12-27  [Irrigation].Apply(47);
          1992-01-04  [Irrigation].Apply(40);
          1992-01-10  [Irrigation].Apply(41);
        Operations SpringD2
          1991-08-30  [Irrigation].Apply(0);
          1991-09-08  [Irrigation].Apply(0);
          1991-09-13  [Irrigation].Apply(0);
          1991-09-20  [Irrigation].Apply(0);
          1991-10-04  [Irrigation].Apply(0);
          1991-10-11  [Irrigation].Apply(0);
          1991-10-18  [Irrigation].Apply(0);
          1991-10-25  [Irrigation].Apply(42);
          1991-11-01  [Irrigation].Apply(33);
          1991-11-08  [Irrigation].Apply(24);
          1991-11-15  [Irrigation].Apply(28);
          1991-11-22  [Irrigation].Apply(37);
          1991-11-28  [Irrigation].Apply(51);
          1991-12-06  [Irrigation].Apply(36);
          1991-12-13  [Irrigation].Apply(38);
          1991-12-20  [Irrigation].Apply(35);
          1991-12-27  [Irrigation].Apply(47);
          1992-01-04  [Irrigation].Apply(40);
          1992-01-10  [Irrigation].Apply(41);
        Operations SpringD3
          1991-08-30  [Irrigation].Apply(20);
          1991-09-08  [Irrigation].Apply(0);
          1991-09-13  [Irrigation].Apply(0);
          1991-09-20  [Irrigation].Apply(0);
          1991-10-04  [Irrigation].Apply(0);
          1991-10-11  [Irrigation].Apply(0);
          1991-10-18  [Irrigation].Apply(0);
          1991-10-25  [Irrigation].Apply(0);
          1991-11-01  [Irrigation].Apply(0);
          1991-11-08  [Irrigation].Apply(0);
          1991-11-15  [Irrigation].Apply(0);
          1991-11-22  [Irrigation].Apply(37);
          1991-11-28  [Irrigation].Apply(51);
          1991-12-06  [Irrigation].Apply(36);
          1991-12-13  [Irrigation].Apply(38);
          1991-12-20  [Irrigation].Apply(35);
          1991-12-27  [Irrigation].Apply(47);
          1992-01-04  [Irrigation].Apply(40);
          1992-01-10  [Irrigation].Apply(41);
        Operations SpringD4
          1991-08-30  [Irrigation].Apply(20);
          1991-09-08  [Irrigation].Apply(12);
          1991-09-13  [Irrigation].Apply(24);
          1991-09-20  [Irrigation].Apply(14);
          1991-10-04  [Irrigation].Apply(0);
          1991-10-11  [Irrigation].Apply(0);
          1991-10-18  [Irrigation].Apply(0);
          1991-10-25  [Irrigation].Apply(0);
          1991-11-01  [Irrigation].Apply(0);
          1991-11-08  [Irrigation].Apply(0);
          1991-11-15  [Irrigation].Apply(0);
          1991-11-22  [Irrigation].Apply(0);
          1991-11-28  [Irrigation].Apply(0);
          1991-12-06  [Irrigation].Apply(0);
          1991-12-13  [Irrigation].Apply(0);
          1991-12-20  [Irrigation].Apply(35);
          1991-12-27  [Irrigation].Apply(47);
          1992-01-04  [Irrigation].Apply(40);
          1992-01-10  [Irrigation].Apply(41);
        Operations SummerD1
          1991-08-30  [Irrigation].Apply(20);
          1991-09-08  [Irrigation].Apply(12);
          1991-09-13  [Irrigation].Apply(24);
          1991-09-20  [Irrigation].Apply(14);
          1991-10-04  [Irrigation].Apply(0);
          1991-10-11  [Irrigation].Apply(0);
          1991-10-18  [Irrigation].Apply(0);
          1991-10-25  [Irrigation].Apply(0);
          1991-11-01  [Irrigation].Apply(0);
          1991-11-08  [Irrigation].Apply(0);
          1991-11-15  [Irrigation].Apply(0);
          1991-11-22  [Irrigation].Apply(0);
          1991-11-28  [Irrigation].Apply(0);
          1991-12-06  [Irrigation].Apply(0);
          1991-12-13  [Irrigation].Apply(0);
          1991-12-20  [Irrigation].Apply(0);
          1991-12-27  [Irrigation].Apply(0);
          1992-01-04  [Irrigation].Apply(0);
          1992-01-10  [Irrigation].Apply(0);
        Operations SummerD2
          1991-08-30  [Irrigation].Apply(20);
          1991-09-08  [Irrigation].Apply(12);
          1991-09-13  [Irrigation].Apply(24);
          1991-09-20  [Irrigation].Apply(14);
          1991-10-04  [Irrigation].Apply(27);
          1991-10-11  [Irrigation].Apply(18);
          1991-10-18  [Irrigation].Apply(30);
          1991-10-25  [Irrigation].Apply(0);
          1991-11-01  [Irrigation].Apply(0);
          1991-11-08  [Irrigation].Apply(0);
          1991-11-15  [Irrigation].Apply(0);
          1991-11-22  [Irrigation].Apply(0);
          1991-11-28  [Irrigation].Apply(0);
          1991-12-06  [Irrigation].Apply(0);
          1991-12-13  [Irrigation].Apply(0);
          1991-12-20  [Irrigation].Apply(0);
          1991-12-27  [Irrigation].Apply(0);
          1992-01-04  [Irrigation].Apply(0);
          1992-01-10  [Irrigation].Apply(0);
        Operations SummerD3
          1991-08-30  [Irrigation].Apply(20);
          1991-09-08  [Irrigation].Apply(12);
          1991-09-13  [Irrigation].Apply(24);
          1991-09-20  [Irrigation].Apply(14);
          1991-10-04  [Irrigation].Apply(27);
          1991-10-11  [Irrigation].Apply(18);
          1991-10-18  [Irrigation].Apply(30);
          1991-10-25  [Irrigation].Apply(42);
          1991-11-01  [Irrigation].Apply(33);
          1991-11-08  [Irrigation].Apply(24);
          1991-11-15  [Irrigation].Apply(0);
          1991-11-22  [Irrigation].Apply(0);
          1991-11-28  [Irrigation].Apply(0);
          1991-12-06  [Irrigation].Apply(0);
          1991-12-13  [Irrigation].Apply(0);
          1991-12-20  [Irrigation].Apply(0);
          1991-12-27  [Irrigation].Apply(0);
          1992-01-04  [Irrigation].Apply(0);
          1992-01-10  [Irrigation].Apply(0);
        Operations SummerD4
          1991-08-30  [Irrigation].Apply(20);
          1991-09-08  [Irrigation].Apply(12);
          1991-09-13  [Irrigation].Apply(24);
          1991-09-20  [Irrigation].Apply(14);
          1991-10-04  [Irrigation].Apply(27);
          1991-10-11  [Irrigation].Apply(18);
          1991-10-18  [Irrigation].Apply(30);
          1991-10-25  [Irrigation].Apply(42);
          1991-11-01  [Irrigation].Apply(33);
          1991-11-08  [Irrigation].Apply(24);
          1991-11-15  [Irrigation].Apply(28);
          1991-11-22  [Irrigation].Apply(37);
          1991-11-28  [Irrigation].Apply(51);
          1991-12-06  [Irrigation].Apply(0);
          1991-12-13  [Irrigation].Apply(0);
          1991-12-20  [Irrigation].Apply(0);
          1991-12-27  [Irrigation].Apply(0);
          1992-01-04  [Irrigation].Apply(0);
          1992-01-10  [Irrigation].Apply(0);
        Operations SummerD5
          1991-08-30  [Irrigation].Apply(20);
          1991-09-08  [Irrigation].Apply(12);
          1991-09-13  [Irrigation].Apply(24);
          1991-09-20  [Irrigation].Apply(14);
          1991-10-04  [Irrigation].Apply(27);
          1991-10-11  [Irrigation].Apply(18);
          1991-10-18  [Irrigation].Apply(30);
          1991-10-25  [Irrigation].Apply(42);
          1991-11-01  [Irrigation].Apply(33);
          1991-11-08  [Irrigation].Apply(24);
          1991-11-15  [Irrigation].Apply(28);
          1991-11-22  [Irrigation].Apply(37);
          1991-11-28  [Irrigation].Apply(51);
          1991-12-06  [Irrigation].Apply(36);
          1991-12-13  [Irrigation].Apply(38);
          1991-12-20  [Irrigation].Apply(0);
          1991-12-27  [Irrigation].Apply(0);
          1992-01-04  [Irrigation].Apply(0);
          1992-01-10  [Irrigation].Apply(0);
        Operations Nil
          1991-08-30  [Irrigation].Apply(0);
          1991-09-08  [Irrigation].Apply(0);
          1991-09-13  [Irrigation].Apply(0);
          1991-09-20  [Irrigation].Apply(0);
          1991-10-04  [Irrigation].Apply(0);
          1991-10-11  [Irrigation].Apply(0);
          1991-10-18  [Irrigation].Apply(0);
          1991-10-25  [Irrigation].Apply(0);
          1991-11-01  [Irrigation].Apply(0);
          1991-11-08  [Irrigation].Apply(0);
          1991-11-15  [Irrigation].Apply(0);
          1991-11-22  [Irrigation].Apply(0);
          1991-11-28  [Irrigation].Apply(0);
          1991-12-06  [Irrigation].Apply(0);
          1991-12-13  [Irrigation].Apply(0);
          1991-12-20  [Irrigation].Apply(0);
          1991-12-27  [Irrigation].Apply(0);
          1992-01-04  [Irrigation].Apply(0);
          1992-01-10  [Irrigation].Apply(0);
        Operations Half
          1991-08-30  [Irrigation].Apply(20);
          1991-09-08  [Irrigation].Apply(0);
          1991-09-13  [Irrigation].Apply(22);
          1991-09-20  [Irrigation].Apply(0);
          1991-10-04  [Irrigation].Apply(0);
          1991-10-11  [Irrigation].Apply(18);
          1991-10-18  [Irrigation].Apply(0);
          1991-10-25  [Irrigation].Apply(42);
          1991-11-01  [Irrigation].Apply(0);
          1991-11-08  [Irrigation].Apply(24);
          1991-11-15  [Irrigation].Apply(0);
          1991-11-22  [Irrigation].Apply(37);
          1991-11-28  [Irrigation].Apply(0);
          1991-12-06  [Irrigation].Apply(36);
          1991-12-13  [Irrigation].Apply(0);
          1991-12-20  [Irrigation].Apply(35);
          1991-12-27  [Irrigation].Apply(0);
          1992-01-04  [Irrigation].Apply(40);
          1992-01-10  [Irrigation].Apply(0);
    Simulation Control_full_irrig: Area=0; Slope=0
      Clock: StartDate=1991-06-08; EndDate=1992-01-26
      Summary summaryfile
      Weather: FileName=lincoln.met
      Zone paddock: Area=1; Slope=0
        Folder Manager folder
          Operations
            1991-06-08  [Wheat].Sow(population:300, cultivar:"BattenWinter", depth:40, rowSpacing:250);
          Operations IrrigationEvents: same as RainShelter.Factors.Irrig.Control
          Operations FertiliserEvents
            1991-06-10  [Fertiliser].Apply(60, Fertiliser.Types.UreaN, 0);
            1991-06-10  [Irrigation].Apply(7);
            1991-08-16  [Fertiliser].Apply(100, Fertiliser.Types.UreaN,0);
            1991-08-16  [Irrigation].Apply(7);
            1991-09-26  [Fertiliser].Apply(50, Fertiliser.Types.UreaN,0);
            1991-09-26  [Irrigation].Apply(7);
          Manager RainShelter
```csharp
using System;
using Models.Core;
using APSIM.Shared.Utilities;

namespace Models
{
	[Serializable] 
	[System.Xml.Serialization.XmlInclude(typeof(Model))]
	public class Script : Model
	{
		[Link] Weather Met;
               
		[EventSubscribe("PreparingNewWeatherData")]
		private void OnPreparingNewWeatherData(object sender, EventArgs e)
		{
			Met.Rain = 0;		
		}
	}
}
```
        Irrigation
        Soil LincolnField: SoilType=LincolnSoil; LocalName=Lincoln; Site=Lincoln; NearestTown=Unknown; Region=NZ; NaturalVegetation=Unknown; Latitude=0; Longitude=0
          Water
            Thickness  BD   AirDry  LL15  DUL   SAT
            100        1.3  0.05    0.08  0.31  0.44
            200        1.3  0.05    0.07  0.3   0.44
            200        1.3  0.05    0.07  0.28  0.44
            200        1.3  0.05    0.09  0.31  0.44
            200        1.3  0.05    0.11  0.3   0.44
            200        1.3  0.05    0.16  0.28  0.44
            200        1.3  0.05    0.15  0.3   0.44
            200        1.3  0.05    0.12  0.34  0.44
            SoilCrop WheatSoil: LL=[0.08, 0.07, 0.07, 0.09, 0.11, 0.16, 0.15, 0.12]; KL=[0.06, 0.06, 0.06, 0.04, 0.03, 0.02, 0.02, 0.02]; XF=[1, 1, 1, 1, 0.6, 0.4, 0.4, 0.4]
          SoilWater: residueinterception=0; SummerDate=1-Nov; SummerU=7; SummerCona=3; WinterDate=1-Apr; WinterU=7; WinterCona=3; DiffusConst=40; DiffusSlope=16; Salb=0.2; CN2Bare=75; CNRed=20; CNCov=0.8; slope=0; discharge_width=0; catchment_area=0; max_pond=0
            Thickness  SWCON  KLAT
            100        0.6    0
            200        0.6    0
            200        0.6    0
            200        0.6    0
            200        0.6    0
            200        0.6    0
            200        0.6    0
            200        0.6    0
          SoilNitrogen: fom_type=[default, manure, mucuna, lablab, shemp, stable]; fract_carb=[0.2, 0.3, 0.54, 0.57, 0.45, 0]; fract_cell=[0.7, 0.3, 0.37, 0.37, 0.47, 0.1]; fract_lign=[0.1, 0.4, 0.09, 0.06, 0.08, 0.9]; wfpsN2N2O_x=[22, 88]; wfpsN2N2O_y=[0.1, 1]
          SoilOrganicMatter: RootCN=0; RootWt=0; SoilCN=0; EnrACoeff=0; EnrBCoeff=0; OCUnits=Total
            Thickness  OC    FBiom  FInert
            100        0.35  0.04   0.31
            200        0.27  0.03   0.31
            200        0.24  0.02   0.31
            200        0.16  0.01   0.31
            200        0.16  0.01   0.31
            200        0.3   0.01   0.25
            200        0.1   0.01   0.2
            200        0.1   0.01   0.2
          Analysis: Thickness=[100, 200, 200, 200, 200, 200, 200, 200]; PH=[8.5, 8.5, 8.6, 8.6, 8.6, 8.6, 8.6, 8.6]; PHUnits=Water; BoronUnits=HotWater
          Sample Initial nitrogen: NO3Units=ppm; NH4Units=ppm; SWUnits=Volumetric; OCUnits=Total; PHUnits=Water
            Thickness  NO3   NH4
            100        24.9  1.3
            200        16    1
            200        9.8   1
            200        9.8   0.8
            200        2.1   0.8
            200        2.1   0.5
            200        2.1   0.5
            200        2.1   0.5
          Sample Initial water: Thickness=[100, 200, 200, 200, 200, 200, 200, 200]; SW=[0.24, 0.27, 0.26, 0.23, 0.24, 0.23, 0.23, 0.18]; NO3Units=ppm; NH4Units=ppm; SWUnits=Volumetric; OCUnits=Total; PHUnits=Water
        SurfaceOrganicMatter Surface Organic Matter: PoolName=wheat_stubble; type=wheat; mass=1000; standing_fraction=0; cnr=80; CriticalResidueWeight=2000; OptimumDecompTemp=20; MaxCumulativeEOS=20; CNRatioDecompCoeff=0.277; CNRatioDecompThreshold=25; TotalLeachRain=25; MinRainToLeach=10; CriticalMinimumOrganicC=0.004; DefaultCPRatio=0; DefaultStandingFraction=0; StandingExtinctCoeff=0.5; FractionFaecesAdded=0.5
          Pools:
            {PoolName=wheat_stubble, ResidueType=wheat, Mass=1000, CNRatio=80, StandingFraction=0}
          ResidueTypes: LoadFromResource=ResidueTypes
        Plant Wheat: CropType=Wheat
        Fertiliser
        MicroClimate: a_interception=0; b_interception=1; c_interception=0; d_interception=0; soil_albedo=0.3; air_pressure=1010; soil_emissivity=0.96; sun_angle=15; soil_heat_flux_fraction=0.4; night_interception_fraction=0.5; windspeed_default=3; refheight=2; albedo=0.293662; emissivity=0.96; gsmax=0.01; r50=200
        Report: same as APS14.APS14StubbleBareNRate0.paddock.Report
      SoilArbitrator Soil Arbitrator
  Experiment Lincoln9192
    Factors
      Factor Irrig: Specifications=[IrrigationEvents]
        Operations 01
          1991-06-10  [Irrigation].Apply(7);
          1991-08-16  [Irrigation].Apply(7);
          1991-08-29  [Irrigation].Apply(20);
          1991-09-07  [Irrigation].Apply(12);
          1991-09-12  [Irrigation].Apply(22);
          1991-09-19  [Irrigation].Apply(4);
          1991-09-26  [Irrigation].Apply(7);
          1991-10-03  [Irrigation].Apply(27);
          1991-10-10  [Irrigation].Apply(18);
          1991-10-17  [Irrigation].Apply(30);
          1991-10-24  [Irrigation].Apply(42);
          1991-10-31  [Irrigation].Apply(33);
          1991-11-07  [Irrigation].Apply(24);
          1991-11-14  [Irrigation].Apply(28);
          1991-11-21  [Irrigation].Apply(37);
          1991-11-27  [Irrigation].Apply(51);
          1991-12-05  [Irrigation].Apply(36);
          1991-12-12  [Irrigation].Apply(38);
          1991-12-19  [Irrigation].Apply(35);
          1991-12-26  [Irrigation].Apply(47);
          1992-01-03  [Irrigation].Apply(40);
          1992-01-09  [Irrigation].Apply(41);
        Operations 03
          1991-06-10  [Irrigation].Apply(7);
          1991-08-16  [Irrigation].Apply(7);
          1991-08-29  [Irrigation].Apply(20);
          1991-09-26  [Irrigation].Apply(7);
          1991-10-24  [Irrigation].Apply(42);
          1991-10-31  [Irrigation].Apply(33);
          1991-11-07  [Irrigation].Apply(24);
          1991-11-14  [Irrigation].Apply(28);
          1991-11-21  [Irrigation].Apply(37);
          1991-11-27  [Irrigation].Apply(51);
          1991-12-05  [Irrigation].Apply(36);
          1991-12-12  [Irrigation].Apply(38);
          1991-12-19  [Irrigation].Apply(35);
          1991-12-26  [Irrigation].Apply(47);
          1992-01-03  [Irrigation].Apply(40);
          1992-01-09  [Irrigation].Apply(41);
        Operations 05
          1991-06-10  [Irrigation].Apply(7);
          1991-08-16  [Irrigation].Apply(7);
          1991-08-29  [Irrigation].Apply(20);
          1991-09-26  [Irrigation].Apply(7);
          1991-12-19  [Irrigation].Apply(35);
          1991-12-26  [Irrigation].Apply(47);
          1992-01-03  [Irrigation].Apply(40);
        Operations 06
          1991-06-10  [Irrigation].Apply(7);
          1991-08-16  [Irrigation].Apply(7);
          1991-08-29  [Irrigation].Apply(20);
          1991-09-07  [Irrigation].Apply(12);
          1991-09-12  [Irrigation].Apply(22);
          1991-09-19  [Irrigation].Apply(14);
          1991-09-26  [Irrigation].Apply(7);
        Operations 07
          1991-06-10  [Irrigation].Apply(7);
          1991-08-16  [Irrigation].Apply(7);
          1991-08-29  [Irrigation].Apply(20);
          1991-09-07  [Irrigation].Apply(12);
          1991-09-12  [Irrigation].Apply(22);
          1991-09-19  [Irrigation].Apply(14);
          1991-09-26  [Irrigation].Apply(7);
          1991-10-03  [Irrigation].Apply(27);
          1991-10-10  [Irrigation].Apply(18);
          1991-10-17  [Irrigation].Apply(30);
        Operations 08
          1991-06-10  [Irrigation].Apply(7);
          1991-08-16  [Irrigation].Apply(7);
          1991-08-29  [Irrigation].Apply(20);
          1991-09-07  [Irrigation].Apply(12);
          1991-09-12  [Irrigation].Apply(22);
          1991-09-19  [Irrigation].Apply(14);
          1991-09-26  [Irrigation].Apply(7);
          1991-10-03  [Irrigation].Apply(27);
          1991-10-10  [Irrigation].Apply(18);
          1991-10-17  [Irrigation].Apply(30);
          1991-10-24  [Irrigation].Apply(42);
          1991-10-31  [Irrigation].Apply(33);
          1991-11-07  [Irrigation].Apply(24);
        Operations 11
          1991-06-10  [Irrigation].Apply(7);
          1991-08-16  [Irrigation].Apply(7);
          1991-09-26  [Irrigation].Apply(7);
    Simulation LincolnBase: Area=0; Slope=0
      Clock: StartDate=1991-06-08; EndDate=1992-01-26
      Summary summaryfile
      Weather: FileName=Lincoln9192.met
      Zone paddock: Area=1; Slope=0
        Folder Manager folder
          Operations
            1991-06-08  [Wheat].Sow(population:300, cultivar:"Rongotea", depth:40, rowSpacing:250);
          Operations IrrigationEvents: same as RainShelter.Factors.Irrig.SpringD1
          Operations FertiliserEvents
            1991-06-10  [Fertiliser].Apply(30, Fertiliser.Types.NO3N, 0);
            1991-08-16  [Fertiliser].Apply(100, Fertiliser.Types.NO3N,0);
            1991-09-26  [Fertiliser].Apply(50, Fertiliser.Types.NO3N,0);
        Irrigation
        Soil: SoilType=LincolnSoil; LocalName=Lincoln; Site=Lincoln; NearestTown=Unknown; Region=NZ; NaturalVegetation=Unknown; Latitude=0; Longitude=0
          Water: same as RainShelter.Control_full_irrig.paddock.LincolnField.Water
          SoilWater: same as RainShelter.Control_full_irrig.paddock.LincolnField.SoilWater
          SoilNitrogen: fom_type=[default, manure, mucuna, lablab, shemp, stable]; fract_carb=[0.2, 0.3, 0.54, 0.57, 0.45, 0]; fract_cell=[0.7, 0.3, 0.37, 0.37, 0.47, 0.1]; fract_lign=[0.1, 0.4, 0.09, 0.06, 0.08, 0.9]; wfpsN2N2O_x=[22, 88]; wfpsN2N2O_y=[0.1, 1]
            oc=[0.360302, 0.270806, 0.241057, 0.16141, 0.160396, 0.299235, 0.0996345, 0.0996568]
          SoilOrganicMatter: same as RainShelter.Control_full_irrig.paddock.LincolnField.SoilOrganicMatter
          Analysis: Thickness=[100, 200, 200, 200, 200, 200, 200, 200]; PH=[8.5, 8.5, 8.6, 8.6, 8.6, 8.6, 8.6, 8.6]; PHUnits=Water; BoronUnits=HotWater
          Sample Initial nitrogen: NO3Units=ppm; NH4Units=ppm; SWUnits=Volumetric; OCUnits=Total; PHUnits=Water
            Thickness  NO3   NH4
            100        24.9  1.3
            200        16    1
            200        9.8   1
            200        9.8   0.8
            200        2.1   0.8
            200        2.1   0.5
            200        2.1   0.5
            200        2.1   0.5
          Sample Initial water: Thickness=[100, 200, 200, 200, 200, 200, 200, 200]; SW=[0.24, 0.27, 0.26, 0.23, 0.24, 0.23, 0.23, 0.18]; NO3Units=ppm; NH4Units=ppm; SWUnits=Volumetric; OCUnits=Total; PHUnits=Water
        SurfaceOrganicMatter Surface Organic Matter: same as RainShelter.Control_full_irrig.paddock.Surface Organic Matter
        Fertiliser
        MicroClimate: same as RainShelter.Control_full_irrig.paddock.MicroClimate
        Plant Wheat: CropType=Wheat
        Manager ResetSW
          reset_date = 1991-09-02
```csharp
using System;
using Models.Core;
using Models.PMF;
using Models.PMF.OilPalm;
using Models.Soils;
using Models.SurfaceOM;
using APSIM.Shared.Utilities;

namespace Models
{
	[Serializable]
	[System.Xml.Serialization.XmlInclude(typeof(Model))]
	public class Script : Model
	{
		[Link] Clock Clock;
		[Link] Soil Soil;
		[Link] SurfaceOrganicMatter SurfaceOM;
		[Description("Reset date")]
		public DateTime reset_date { get; set; }

		
		[EventSubscribe("DoManagement")]
		private void OnDoManagement(object sender, EventArgs e)
		{
			if (Clock.Today == reset_date)
				Soil.SoilWater.Reset();
		}
	}
}
```
        Report: same as APS14.APS14StubbleBareNRate0.paddock.Report
      SoilArbitrator Soil Arbitrator
  Experiment Cunderdin97
    Factors
      Factor Sow: Specifications=[SowingSchedule]
        Operations SpearEarly
          1997-06-06  [Wheat].Sow(population:150, cultivar:"Spear", depth:30, rowSpacing:250);
        Operations SpearMid
          1997-07-08  [Wheat].Sow(population:108, cultivar:"Spear", depth:30, rowSpacing:250);
        Operations WilgoyneEarly
          1997-06-06  [Wheat].Sow(population:150, cultivar:"Wilgoyne", depth:30, rowSpacing:250);
        Operations WilgoyneMid
          1997-07-08  [Wheat].Sow(population:108, cultivar:"Wilgoyne", depth:30, rowSpacing:250);
        Operations WilgoyneLate
          1997-07-08  [Wheat].Sow(population:100, cultivar:"Wilgoyne", depth:30, rowSpacing:250);
      Factor SowN: Specifications=[SowingFertiliser].Script.Amount=0,50
      Factor TopN: Specifications=[SowingFertiliser].Script.Amount=0,30
      Factor Irr: Specifications=[IrrigationSchedule]
        Operations Wet
          1997-09-23  [Irrigation].Apply(amount:15);
          1997-10-01  [Irrigation].Apply(amount:15);
          1997-10-06  [Irrigation].Apply(amount:15);
          1997-10-14  [Irrigation].Apply(amount:20);
          1997-10-21  [Irrigation].Apply(amount:17.5);
          1997-10-26  [Irrigation].Apply(amount:17.5);
        Operations Dry
    Simulation Cunderdin97Base: Area=0; Slope=0
      Clock: StartDate=1997-04-16; EndDate=1997-12-30
      Summary summaryfile
      Weather: FileName=Cunderdin.met
      Zone paddock: Area=1; Slope=0
        Irrigation
        Soil: SoilType=heavy; LocalName=Beverley; Site=Cunderdin; NearestTown=Cunderdin; Region=WA; NaturalVegetation=Unknown; Latitude=0; Longitude=0
          Water
            Thickness  BD   AirDry  LL15   DUL    SAT
            50         1.3  0.034   0.07   0.156  0.48
            50         1.3  0.034   0.07   0.156  0.48
            100        1.4  0.121   0.121  0.22   0.44
            100        1.4  0.123   0.123  0.224  0.44
            100        1.5  0.132   0.132  0.243  0.4
            100        1.5  0.132   0.132  0.243  0.4
            100        1.5  0.135   0.135  0.243  0.4
            100        1.5  0.145   0.145  0.243  0.4
            200        1.5  0.145   0.145  0.243  0.4
            200        1.5  0.145   0.145  0.243  0.4
            200        1.5  0.145   0.145  0.243  0.4
            200        1.5  0.145   0.145  0.243  0.4
            200        1.5  0.145   0.145  0.243  0.4
            200        1.5  0.145   0.145  0.243  0.4
            200        1.5  0.145   0.145  0.243  0.4
            200        1.5  0.145   0.145  0.243  0.4
            200        1.5  0.145   0.145  0.243  0.4
            SoilCrop wheatSoil
              LL=[0.07, 0.07, 0.121, 0.123, 0.132, 0.132, 0.135, 0.145, 0.145, 0.145, 0.145, 0.145, 0.145, 0.145, 0.145, 0.145, 0.145]
              KL=[0.06, 0.06, 0.05, 0.05, 0.04, 0.04, 0.04, 0.04, 0.03, 0.03, 0.03, 0.03, 0.03, 0.03, 0.03, 0.03, 0.03]
              XF=[0.7, 0.6, 0.5, 0.5, 0.5, 0.5, 0.5, 0.5, 0.3, 0.3, 0.3, 0.3, 0.3, 0.3, 0.3, 0.3, 0.3]
          SoilWater: residueinterception=0; SummerDate=1-Nov; SummerU=7.5; SummerCona=3; WinterDate=1-Apr; WinterU=7.5; WinterCona=3; DiffusConst=88; DiffusSlope=35; Salb=0.13; CN2Bare=25; CNRed=20; CNCov=0.8; slope=0; discharge_width=0; catchment_area=0; max_pond=0
            Thickness  SWCON  KLAT
            50         0.6    0
            50         0.6    0
            100        0.6    0
            100        0.6    0
            100        0.6    0
            100        0.6    0
            100        0.6    0
            100        0.6    0
            200        0.6    0
            200        0.6    0
            200        0.6    0
            200        0.6    0
            200        0.6    0
            200        0.6    0
            200        0.6    0
            200        0.6    0
            200        0.6    0
          SoilOrganicMatter: RootCN=40; RootWt=500; SoilCN=13; EnrACoeff=1; EnrBCoeff=1; OCUnits=Total
            Thickness  OC    FBiom  FInert
            50         0.73  0.03   0.3
            50         0.73  0.03   0.3
            100        0.46  0.02   0.3
            100        0.39  0.01   0.4
            100        0.3   0.01   0.8
            100        0.22  0.01   0.9
            100        0.19  0.01   0.9
            100        0.19  0.01   0.9
            200        0.1   0.01   0.9
            200        0.1   0.01   0.9
            200        0.1   0.01   0.9
            200        0.1   0.01   0.9
            200        0.1   0.01   0.9
            200        0.1   0.01   0.9
            200        0.1   0.01   0.9
            200        0.1   0.01   0.9
            200        0.1   0.01   0.9
          Analysis: PH=[4.7, 4.7, 4.7, 4.7, 6, 6, 6, 6, 6, 6, 6, 6, 6, 6, 6, 6, 6]; PHUnits=Water; BoronUnits=HotWater
            Thickness=[50, 50, 100, 100, 100, 100, 100, 100, 200, 200, 200, 200, 200, 200, 200, 200, 200]
          Sample: NO3Units=ppm; NH4Units=ppm; SWUnits=Volumetric; OCUnits=Total; PHUnits=Water
            Thickness  NO3  NH4  SW
            50         23   2    0.034
            50         23   2    0.156
            100        12   1    0.22
            100        9    2    0.224
            100        4    1    0.244
            100        2    1    0.245
            100        2    1    0.246
            100        2    1    0.243
            200        2    1    0.24
            200        2    1    0.145
            200        2    1    0.145
            200        2    1    0.145
            200        2    1    0.145
            200        2    1    0.145
            200        2    1    0.145
            200        2    1    0.145
            200        2    1    0.145
          SoilNitrogen: fom_type=[default, manure, mucuna, lablab, shemp, stable]; fract_carb=[0.2, 0.3, 0.54, 0.57, 0.45, 0]; fract_cell=[0.7, 0.3, 0.37, 0.37, 0.47, 0.1]; fract_lign=[0.1, 0.4, 0.09, 0.06, 0.08, 0.9]; wfpsN2N2O_x=[22, 88]; wfpsN2N2O_y=[0.1, 1]
            oc=[0.723526, 0.723012, 0.45528, 0.387092, 0.299501, 0.219998, 0.190011, 0.189986, 0.099965, 0.0999681, 0.0999903, 0.100014, 0.100005, 0.1, 0.1, 0.1, 0.0999999]
        SurfaceOrganicMatter: PondActive=no; ReportAdditions=no; ReportRemovals=no; PoolName=wheat_stubble; type=wheat; mass=500; standing_fraction=0; cpr=0; cnr=120; CriticalResidueWeight=2000; OptimumDecompTemp=20; MaxCumulativeEOS=20; CNRatioDecompCoeff=0.277; CNRatioDecompThreshold=25; TotalLeachRain=25; MinRainToLeach=10; CriticalMinimumOrganicC=0.004; DefaultCPRatio=0; DefaultStandingFraction=0; StandingExtinctCoeff=0.5; FractionFaecesAdded=0.5
          Pools:
            {PoolName=wheat_stubble, ResidueType=wheat, Mass=500, CNRatio=120, CPRatio=0, StandingFraction=0}
          ResidueTypes: LoadFromResource=ResidueTypes
          TillageTypes TillageTypesList
        Fertiliser
        Plant Wheat: CropType=Wheat
        Operations IrrigationSchedule: same as APS14.APS14StubbleBareNRate0.paddock.IrrigationSchedule
        MicroClimate: same as APS26.APS26NRate160WaterWet.paddock.MicroClimate
        Operations SowingSchedule
          1993-06-29  [Wheat].Sow(population:114, cultivar:"GattonHartog", depth:30, rowSpacing:250);
        PredictedObserved: FieldNameUsedForMatch=Wheat.Zadok.Stage
        Manager ExtraVariables: same as APS14.APS14StubbleBareNRate0.paddock.ExtraVariables
        Manager SowingFertiliser
          Amount = 160
```csharp
using System;
using Models.Core;
using Models.PMF;
using APSIM.Shared.Utilities;

namespace Models
{
	[Serializable]
	public class Script : Model
	{
		[Link] Clock Clock;
		[Link] Fertiliser Fertiliser;
		[Link] Summary Summary;
		
		[Description("Amount of fertiliser to be applied")]
		public double Amount { get; set; }

		[EventSubscribe("Sowing")]
		private void OnSowing(object sender, EventArgs e)
		{
			Fertiliser.Apply(Amount: Amount, Type: Fertiliser.Types.NO3N);
		}
		
	}
}
```
        Manager TopdressFertiliser
          FertDayOfYear = 239
          Amount = 0
          script: same as in APS26.APS26NRate160WaterWet.paddock.ApplyFertiliser
        Report: same as APS14.APS14StubbleBareNRate0.paddock.Report
      SoilArbitrator Soil Arbitrator
  Experiment Mouse
    Factors
      Factor Damage: Specifications=[DamageSchedule]
        Operations Control
          2002-09-10  //[Wheat].Population.KillCrop(KillFraction:0.0);
        Operations Emerg05
          2002-09-10  //[Wheat].Population.KillCrop(KillFraction:0.05);
        Operations Emerg10
          2002-09-10  //[Wheat].Population.KillCrop(KillFraction:0.10);
        Operations Emerg25
          2002-09-10  //[Wheat].Population.KillCrop(KillFraction:0.25);
        Operations Emerg50
          2002-09-10  //[Wheat].Population.KillCrop(KillFraction:0.5);
        Operations Tiller05
          2002-10-11  //[Wheat].Population.KillCrop(KillFraction:0.05);
        Operations Tiller10
          2002-10-11  //[Wheat].Population.KillCrop(KillFraction:0.10);
        Operations Tiller25
          2002-10-11  //[Wheat].Population.KillCrop(KillFraction:0.25);
        Operations Tiller50
          2002-10-11  //[Wheat].Population.KillCrop(KillFraction:0.5);
        Operations Boot05
          2002-10-31  //[Wheat].Population.KillCrop(KillFraction:0.05);
        Operations Boot10
          2002-10-31  //[Wheat].Population.KillCrop(KillFraction:0.10);
        Operations Boot25
          2002-10-31  //[Wheat].Population.KillCrop(KillFraction:0.25);
        Operations Boot50
          2002-10-31  //[Wheat].Population.KillCrop(KillFraction:0.5);
        Operations PreHarv05
          2002-12-13  //[Wheat].Population.KillCrop(KillFraction:0.05);
        Operations PreHarv10
          2002-12-13  //[Wheat].Population.KillCrop(KillFraction:0.10);
        Operations PreHarv25
          2002-12-13  //[Wheat].Population.KillCrop(KillFraction:0.25);
        Operations PreHarv50
          2002-12-13  //[Wheat].Population.KillCrop(KillFraction:0.5);
    Simulation MouseBase: Area=0; Slope=0
      Clock: StartDate=2002-07-10; EndDate=2002-12-31
      Summary summaryfile
      Weather: FileName=hall2002.met
      Zone paddock: Area=1; Slope=0
        Irrigation
        Soil: SoilType=unknown; LocalName=Ginninderra; Site=Ginninderra; NearestTown=Ginninderra; Region=ACT; NaturalVegetation=Unknown; Latitude=0; Longitude=0
          InitialWater: PercentMethod=FilledFromTop; FractionFull=1
          Water
            Thickness  BD    AirDry  LL15   DUL    SAT
            100        1.45  0.04    0.073  0.21   0.414
            100        1.5   0.04    0.075  0.234  0.394
            100        1.55  0.06    0.074  0.22   0.375
            100        1.5   0.1     0.12   0.29   0.394
            100        1.52  0.1     0.16   0.293  0.386
            100        1.55  0.1     0.25   0.37   0.375
            100        1.57  0.1     0.25   0.36   0.367
            100        1.6   0.1     0.24   0.35   0.355
            100        1.62  0.1     0.259  0.34   0.347
            100        1.65  0.1     0.281  0.33   0.335
            100        1.62  0.1     0.295  0.34   0.347
            100        1.6   0.1     0.272  0.35   0.355
            100        1.58  0.1     0.269  0.36   0.363
            100        1.55  0.1     0.264  0.37   0.375
            100        1.55  0.1     0.256  0.37   0.375
            100        1.55  0.1     0.256  0.355  0.375
            100        1.55  0.1     0.256  0.35   0.375
            100        1.55  0.1     0.256  0.33   0.375
            100        1.55  0.1     0.256  0.33   0.375
            100        1.55  0.1     0.256  0.33   0.375
            SoilCrop wheatSoil
              LL=[0.073, 0.075, 0.074, 0.12, 0.16, 0.25, 0.25, 0.24, 0.259, 0.281, 0.295, 0.272, 0.269, 0.264, 0.256, 0.256, 0.256, 0.256, 0.256, 0.256]
              KL=[0.08, 0.08, 0.08, 0.08, 0.08, 0.08, 0.08, 0.08, 0.08, 0.07, 0.07, 0.06, 0.06, 0.05, 0.05, 0.04, 0.04, 0.03, 0.02, 0.01]
              XF=[1, 1, 1, 1, 1, 1, 1, 1, 1, 1, 1, 1, 1, 1, 1, 1, 1, 1, 0, 0]
          SoilWater: residueinterception=0; SummerDate=1-Nov; SummerU=2; SummerCona=2; WinterDate=1-Apr; WinterU=2; WinterCona=2; DiffusConst=88; DiffusSlope=35.4; Salb=0.13; CN2Bare=72; CNRed=20; CNCov=0.8; slope=0; discharge_width=0; catchment_area=0; max_pond=0
            Thickness  SWCON  KLAT
            100        0.4    0
            100        0.4    0
            100        0.4    0
            100        0.4    0
            100        0.4    0
            100        0.4    0
            100        0.4    0
            100        0.4    0
            100        0.4    0
            100        0.4    0
            100        0.4    0
            100        0.4    0
            100        0.4    0
            100        0.4    0
            100        0.4    0
            100        0.4    0
            100        0.4    0
            100        0.4    0
            100        0.4    0
            100        0.4    0
          SoilOrganicMatter: RootCN=40; RootWt=2000; SoilCN=14.5; EnrACoeff=1; EnrBCoeff=1; OCUnits=Total
            Thickness  OC    FBiom  FInert
            100        0.83  0.04   0.36
            100        0.35  0.03   0.35
            100        0.33  0.03   0.45
            100        0.22  0.02   0.45
            100        0.22  0.02   0.59
            100        0.22  0.02   0.6
            100        0.19  0.02   0.84
            100        0.17  0.02   0.8
            100        0.15  0.01   0.8
            100        0.12  0.01   0.99
            100        0.11  0.01   0.99
            100        0.1   0.01   0.99
            100        0.1   0.01   0.99
            100        0.1   0.01   0.99
            100        0.1   0.01   0.99
            100        0.1   0.01   0.99
            100        0.1   0.01   0.99
            100        0.1   0.01   0.99
            100        0.1   0.01   0.99
            100        0.1   0.01   0.99
          Analysis: PHUnits=Water; BoronUnits=HotWater
            Thickness=[100, 100, 100, 100, 100, 100, 100, 100, 100, 100, 100, 100, 100, 100, 100, 100, 100, 100, 100, 100]
            PH=[5.8, 5.9, 6.6, 6.8, 7, 7.1, 7.2, 7.3, 7.4, 7.4, 7.6, 7.8, 8, 8.2, 8.3, 8.4, 8.4, 8.5, 8.5, 8.5]
          Sample: NO3Units=ppm; NH4Units=ppm; SWUnits=Volumetric; OCUnits=Total; PHUnits=Water
            Thickness  NO3  NH4
            100        10   1
            100        15   1
            100        10   1
            100        8    1
            100        5    1
            100        2    1
            100        1    1
            100        1    1
            100        1    1
            100        1    1
            100        1    1
            100        1    1
            100        1    1
            100        1    1
            100        0    0
            100        0    0
            100        0    0
            100        0    0
            100        0    0
            100        0    0
          SoilNitrogen: fom_type=[default, manure, mucuna, lablab, shemp, stable]; fract_carb=[0.2, 0.3, 0.54, 0.57, 0.45, 0]; fract_cell=[0.7, 0.3, 0.37, 0.37, 0.47, 0.1]; fract_lign=[0.1, 0.4, 0.09, 0.06, 0.08, 0.9]; wfpsN2N2O_x=[22, 88]; wfpsN2N2O_y=[0.1, 1]
            oc=[0.830987, 0.349129, 0.329455, 0.220339, 0.220441, 0.220335, 0.190667, 0.170504, 0.150477, 0.120544, 0.110476, 0.100412, 0.100356, 0.100312, 0.100249, 0.100216, 0.100177, 0.100129, 0.100094, 0.100043]
        SurfaceOrganicMatter: PondActive=no; ReportAdditions=no; ReportRemovals=no; PoolName=canola_stubble; type=canola; mass=1000; standing_fraction=0; cpr=0; cnr=20; CriticalResidueWeight=2000; OptimumDecompTemp=20; MaxCumulativeEOS=20; CNRatioDecompCoeff=0.277; CNRatioDecompThreshold=25; TotalLeachRain=25; MinRainToLeach=10; CriticalMinimumOrganicC=0.004; DefaultCPRatio=0; DefaultStandingFraction=0; StandingExtinctCoeff=0.5; FractionFaecesAdded=0.5
          Pools:
            {PoolName=canola_stubble, ResidueType=canola, Mass=1000, CNRatio=20, CPRatio=0, StandingFraction=0}
          ResidueTypes: LoadFromResource=ResidueTypes
          TillageTypes TillageTypesList
        Fertiliser
        Plant Wheat: CropType=Wheat
        Operations IrrigationSchedule
          2002-11-08  [Irrigation].Apply(amount:35);
          2002-11-22  [Irrigation].Apply(amount:35);
        MicroClimate: same as APS26.APS26NRate160WaterWet.paddock.MicroClimate
        Operations SowingSchedule
          2002-08-15  [Wheat].Sow(population:100, cultivar:"Hartog", depth:30, rowSpacing:250);
        Manager SowingFertiliser
          Amount = 100
          script: same as in Cunderdin97.Cunderdin97Base.paddock.SowingFertiliser
        Manager ExtraVariables: same as APS14.APS14StubbleBareNRate0.paddock.ExtraVariables
        Operations DamageSchedule
          2002-09-10  [Wheat].Population.KillCrop(KillFraction:0.0);
        Report: same as APS14.APS14StubbleBareNRate0.paddock.Report
      SoilArbitrator Soil Arbitrator
  Experiment Wongan83
    Factors
      Factor Soil: Specifications=[WonganSoil]
        Soil Ripped: SoilType=sand; LocalName=WonganSite; Site=WonganSite; NearestTown=Unknown; Region=WA; NaturalVegetation=Unknown; Latitude=0; Longitude=0
          Water
            Thickness  BD    AirDry  LL15  DUL   SAT
            50         1.31  0.04    0.07  0.11  0.35
            50         1.31  0.05    0.07  0.11  0.35
            100        1.45  0.05    0.08  0.14  0.35
            200        1.48  0.05    0.09  0.14  0.35
            200        1.53  0.05    0.09  0.15  0.35
            200        1.5   0.05    0.09  0.15  0.35
            400        1.5   0.05    0.1   0.16  0.35
            400        1.5   0.05    0.11  0.17  0.35
            600        1.5   0.05    0.13  0.17  0.35
            600        1.5   0.05    0.13  0.17  0.35
            SoilCrop WheatSoil
              LL=[0.08, 0.08, 0.09, 0.1, 0.11, 0.12, 0.12, 0.12, 0.14, 0.14]
              KL=[0.06, 0.06, 0.06, 0.06, 0.06, 0.06, 0.06, 0.06, 0.06, 0.06]
              XF=[1, 1, 1, 1, 1, 1, 1, 1, 1, 1]
          SoilWater: residueinterception=0; SummerDate=1-Nov; SummerU=6; SummerCona=2; WinterDate=1-Apr; WinterU=6; WinterCona=2; DiffusConst=88; DiffusSlope=35; Salb=0.13; CN2Bare=60; CNRed=20; CNCov=0.8; max_pond=0; Thickness=[50, 50, 100, 200, 200, 200, 400, 400, 600, 600]
            SWCON=[0.35, 0.35, 0.35, 0.35, 0.35, 0.35, 0.35, 0.35, 0.35, 0.35]
          SoilOrganicMatter: RootCN=40; RootWt=1500; SoilCN=13; EnrACoeff=1; EnrBCoeff=1; OCUnits=Total
            Thickness  OC    FBiom  FInert
            50         1.23  0.04   0.1
            50         0.43  0.04   0.1
            100        0.37  0.03   0.1
            200        0.26  0.02   0.2
            200        0.21  0.01   0.8
            200        0.2   0.01   0.9
            400        0.18  0.01   0.9
            400        0.18  0.01   0.9
            600        0.17  0.01   0.9
            600        0.17  0.01   0.9
          Analysis: Thickness=[50, 50, 100, 200, 200, 200, 400, 400, 600, 600]; PH=[4.7, 5.1, 5.1, 6, 6, 6, 6, 6, 6, 6]; PHUnits=Water; BoronUnits=HotWater
          Sample: NO3Units=ppm; NH4Units=ppm; SWUnits=Volumetric; OCUnits=Total; PHUnits=Water
            Thickness  NO3  NH4  SW
            50         7    2    0.07
            50         7    2    0.07
            100        5    1    0.13
            200        3    1    0.14
            200        2    0    0.14
            200        2    0    0.11
            400        2    0    0.1
            400        1    0    0.11
            600        1    0    0.12
            600        1    0    0.13
          SoilNitrogen: same as Mouse.MouseBase.paddock.Soil.SoilNitrogen
        Soil Unripped: SoilType=sand; LocalName=WonganSite; Site=WonganSite; NearestTown=Unknown; Region=WA; NaturalVegetation=Unknown; Latitude=0; Longitude=0
          Water
            Thickness  BD    AirDry  LL15  DUL   SAT
            50         1.31  0.04    0.07  0.13  0.35
            50         1.31  0.05    0.07  0.13  0.35
            100        1.45  0.05    0.08  0.14  0.35
            200        1.48  0.05    0.09  0.14  0.35
            200        1.53  0.05    0.09  0.15  0.35
            200        1.5   0.05    0.09  0.15  0.35
            400        1.5   0.05    0.1   0.16  0.35
            400        1.5   0.05    0.11  0.17  0.35
            600        1.5   0.05    0.13  0.17  0.35
            600        1.5   0.05    0.13  0.17  0.35
            SoilCrop WheatSoil
              LL=[0.08, 0.08, 0.09, 0.1, 0.11, 0.12, 0.12, 0.12, 0.14, 0.14]
              KL=[0.06, 0.06, 0.06, 0.06, 0.06, 0.06, 0.06, 0.06, 0.06, 0.06]
              XF=[0.2, 0.1, 0.2, 0.7, 1, 1, 1, 1, 1, 1]
          SoilWater: same as Wongan83.Factors.Soil.Ripped.SoilWater
          SoilOrganicMatter: same as Wongan83.Factors.Soil.Ripped.SoilOrganicMatter
          Analysis: Thickness=[50, 50, 100, 200, 200, 200, 400, 400, 600, 600]; PH=[4.7, 5.1, 5.1, 6, 6, 6, 6, 6, 6, 6]; PHUnits=Water; BoronUnits=HotWater
          Sample: same as Wongan83.Factors.Soil.Ripped.Sample
          SoilNitrogen: same as Mouse.MouseBase.paddock.Soil.SoilNitrogen
      Factor N: Specifications=[SowingFertiliser].Script.Amount=0,10,25,50,100
    Simulation WonganBase: Area=0; Slope=0
      Clock: StartDate=1983-06-13; EndDate=1983-11-11
      Summary summaryfile
      Weather: FileName=Wongan83.met
      Zone paddock: Area=1; Slope=0
        Irrigation
        Soil WonganSoil: SoilType=unknown; LocalName=Ginninderra; Site=Ginninderra; NearestTown=Ginninderra; Region=ACT; NaturalVegetation=Unknown; Latitude=0; Longitude=0
          InitialWater: PercentMethod=FilledFromTop; FractionFull=1
          Water: same as Mouse.MouseBase.paddock.Soil.Water
          SoilWater: same as Mouse.MouseBase.paddock.Soil.SoilWater
          SoilOrganicMatter: same as Mouse.MouseBase.paddock.Soil.SoilOrganicMatter
          Analysis: PHUnits=Water; BoronUnits=HotWater
            Thickness=[100, 100, 100, 100, 100, 100, 100, 100, 100, 100, 100, 100, 100, 100, 100, 100, 100, 100, 100, 100]
            PH=[5.8, 5.9, 6.6, 6.8, 7, 7.1, 7.2, 7.3, 7.4, 7.4, 7.6, 7.8, 8, 8.2, 8.3, 8.4, 8.4, 8.5, 8.5, 8.5]
          Sample: same as Mouse.MouseBase.paddock.Soil.Sample
          SoilNitrogen: fom_type=[default, manure, mucuna, lablab, shemp, stable]; fract_carb=[0.2, 0.3, 0.54, 0.57, 0.45, 0]; fract_cell=[0.7, 0.3, 0.37, 0.37, 0.47, 0.1]; fract_lign=[0.1, 0.4, 0.09, 0.06, 0.08, 0.9]; wfpsN2N2O_x=[22, 88]; wfpsN2N2O_y=[0.1, 1]
            oc=[0.835354, 0.35073, 0.330728, 0.221338, 0.221193, 0.220685, 0.191071, 0.170898, 0.150786, 0.120778, 0.110619, 0.100528, 0.100411, 0.100323, 0.100272, 0.100233, 0.100199, 0.10017, 0.100144, 0.100122]
        SurfaceOrganicMatter: PondActive=no; ReportAdditions=no; ReportRemovals=no; PoolName=wheat_stubble; type=wheat; mass=1000; standing_fraction=0; cpr=0; cnr=20; CriticalResidueWeight=2000; OptimumDecompTemp=20; MaxCumulativeEOS=20; CNRatioDecompCoeff=0.277; CNRatioDecompThreshold=25; TotalLeachRain=25; MinRainToLeach=10; CriticalMinimumOrganicC=0.004; DefaultCPRatio=0; DefaultStandingFraction=0; StandingExtinctCoeff=0.5; FractionFaecesAdded=0.5
          Pools:
            {PoolName=wheat_stubble, ResidueType=wheat, Mass=1000, CNRatio=20, CPRatio=0, StandingFraction=0}
          ResidueTypes: LoadFromResource=ResidueTypes
          TillageTypes TillageTypesList
        Fertiliser
        Plant Wheat: CropType=Wheat
        MicroClimate: same as APS26.APS26NRate160WaterWet.paddock.MicroClimate
        Operations SowingSchedule
          1983-06-14  [Wheat].Sow(population:159, cultivar:"gamenya", depth:80, rowSpacing:250);
        Manager SowingFertiliser
          Amount = 0
          script: same as in Cunderdin97.Cunderdin97Base.paddock.SowingFertiliser
        Manager ExtraVariables: same as APS14.APS14StubbleBareNRate0.paddock.ExtraVariables
        Report: same as APS14.APS14StubbleBareNRate0.paddock.Report
      SoilArbitrator Soil Arbitrator
  Memo Combined Results
    #Combined Results
    Simulation results for the combined datasets from the various countries are shown in the following graphs.  The model is able to adequately capture the influence of growing conditions (soil, climate) and management (population, Nitrogen, irrigation, sowing date).
  Experiment Lincoln2014
    Factors
      Factor Irrig: Specifications=[IrrigationEvents]
        Operations Full
          2013-05-14  [Irrigation].Apply(25);
          2013-05-29  [Irrigation].Apply(9.2);
          2013-06-11  [Irrigation].Apply(12);
          2013-09-16  [Irrigation].Apply(34.6);
          2013-09-25  [Irrigation].Apply(46.3);
          2013-10-01  [Irrigation].Apply(19.3);
          2013-10-08  [Irrigation].Apply(24.9);
          2013-10-15  [Irrigation].Apply(21);
          2013-10-22  [Irrigation].Apply(39);
          2013-10-29  [Irrigation].Apply(44);
          2013-11-05  [Irrigation].Apply(40);
          2013-11-12  [Irrigation].Apply(35);
          2013-11-19  [Irrigation].Apply(33);
          2013-11-26  [Irrigation].Apply(32);
          2013-12-03  [Irrigation].Apply(35);
          2013-12-10  [Irrigation].Apply(49);
          2013-12-17  [Irrigation].Apply(47);
          2013-12-24  [Irrigation].Apply(0);
          2013-12-31  [Irrigation].Apply(0);
        Operations Nil
          2013-09-16  [Irrigation].Apply(4.6);
          2013-09-25  [Irrigation].Apply(3.5);
        Operations VeryEarly
          2013-09-16  [Irrigation].Apply(4.6);
          2013-09-25  [Irrigation].Apply(3.5);
          2013-11-19  [Irrigation].Apply(33);
          2013-11-26  [Irrigation].Apply(32);
          2013-12-03  [Irrigation].Apply(35);
          2013-12-10  [Irrigation].Apply(49);
          2013-12-17  [Irrigation].Apply(47);
          2013-12-24  [Irrigation].Apply(49);
        Operations Early
          2013-05-14  [Irrigation].Apply(25);
          2013-05-29  [Irrigation].Apply(9.2);
          2013-06-11  [Irrigation].Apply(12);
          2013-09-16  [Irrigation].Apply(34.6);
          2013-09-25  [Irrigation].Apply(46.5);
          2013-12-10  [Irrigation].Apply(49);
          2013-12-17  [Irrigation].Apply(47);
          2013-12-24  [Irrigation].Apply(49);
          2013-12-31  [Irrigation].Apply(20.3);
          2013-12-24  [Irrigation].Apply(49);
          2013-12-31  [Irrigation].Apply(20.3);
        Operations Middle
          2013-05-14  [Irrigation].Apply(25);
          2013-05-29  [Irrigation].Apply(9.2);
          2013-06-11  [Irrigation].Apply(12);
          2013-09-16  [Irrigation].Apply(34.6);
          2013-09-25  [Irrigation].Apply(46.3);
          2013-10-01  [Irrigation].Apply(19.3);
          2013-12-17  [Irrigation].Apply(47);
          2013-12-24  [Irrigation].Apply(49);
          2013-12-31  [Irrigation].Apply(20.3);
        Operations Late
          2013-05-14  [Irrigation].Apply(25);
          2013-05-29  [Irrigation].Apply(9.2);
          2013-06-11  [Irrigation].Apply(12);
          2013-09-16  [Irrigation].Apply(34.6);
          2013-09-25  [Irrigation].Apply(46.3);
          2013-10-01  [Irrigation].Apply(19.3);
          2013-10-08  [Irrigation].Apply(24.9);
          2013-10-15  [Irrigation].Apply(21);
          2013-10-22  [Irrigation].Apply(39);
    Simulation Rainshelter2013: Area=0; Slope=0
      Clock: StartDate=2013-02-01; EndDate=2014-02-01
      Summary summaryfile
      Weather: FileName=%root%\Examples\WeatherFiles\lincoln.met
      SoilArbitrator Soil Arbitrator
      Zone paddock: Area=1; Slope=0
        Soil TempletonSiltLoam: SoilType=NZ_sedementary; Region=Plains; State=Canterbury; Country=New Zealand; Latitude=0; Longitude=0
          DataSource=Generic profile descriptions provided by Trevor Webb and data for functional horizions based on SWAMP project results
          Comments=Bulk density values were measured on the fine earth fraction so values entered into apsim soil are adjusted down to account for stone content (assuming stones are inert from all soil process so their mass and volume is removed from model paramaters).  SAT, DUL, LL15 and Air dry have been adjusted down to account for stone content.  OC has not been adjusted so the model will get the correct carbon and N amounts using the adjusted BD.
          Analysis: Thickness=[180, 150, 400, 270, 500]; PH=[6, 6, 6, 6, 6]; PHUnits=Water; BoronUnits=HotWater
          Water
            Thickness  BD     AirDry  LL15  DUL   SAT
            200        1      0.05    0.1   0.32  0.419
            200        1.324  0.12    0.15  0.35  0.405
            200        1.35   0.1     0.1   0.3   0.37
            200        1.301  0.08    0.08  0.3   0.37
            200        1.301  0.06    0.07  0.28  0.33
            200        1.301  0.06    0.08  0.25  0.32
            200        1.301  0.1     0.1   0.23  0.3
            200        1.301  0.1     0.1   0.24  0.31
            SoilCrop WheatSoil: LL=[0.1, 0.12, 0.1, 0.08, 0.06, 0.08, 0.1, 0.1]; KL=[0.06, 0.06, 0.1, 0.1, 0.05, 0.03, 0.02, 0.01]; XF=[1, 1, 1, 1, 1, 1, 1, 1]
          SoilWater: residueinterception=0; SummerDate=1-sep; SummerU=9; SummerCona=4.4; WinterDate=1-Apr; WinterU=2; WinterCona=1.5; DiffusConst=88; DiffusSlope=35; Salb=0.13; CN2Bare=73; CNRed=20; CNCov=0.8; max_pond=0; Thickness=[200, 200, 200, 200, 200, 200, 200, 200]; SWCON=[0.9, 0.5, 0.6, 0.4, 0.4, 0.4, 0.9, 0.9]
          SoilNitrogen: fom_type=[default, manure, mucuna, lablab, shemp, stable]; fract_carb=[0.2, 0.3, 0.54, 0.57, 0.45, 0]; fract_cell=[0.7, 0.3, 0.37, 0.37, 0.47, 0.1]; fract_lign=[0.1, 0.4, 0.09, 0.06, 0.08, 0.9]; wfpsN2N2O_x=[22, 88]; wfpsN2N2O_y=[0.1, 1]
          SoilOrganicMatter: RootCN=40; RootWt=1000; SoilCN=11; EnrACoeff=7.4; EnrBCoeff=0.2; OCUnits=Total
            Thickness  OC        FBiom      FInert
            180        2.6251    0.0333099  0.437121
            150        1.24694   0.0186614  0.656885
            400        0.316004  0.0116634  0.849635
            270        0.207954  0.0102229  0.94496
            500        0.200366  0.0100221  0.982659
          Sample: NO3Units=kgha; NH4Units=kgha; SWUnits=Volumetric; OCUnits=Total; PHUnits=Water
            Thickness  NO3  NH4  SW
            200        530  3    0.35
            200        15   2    0.35
            200        15   1    0.25
            200        10   1    0.25
            200        5    1    0.25
            200        5    1    0.2
            200        5    1    0.18
            200        5    1    0.2
        Plant Wheat: CropType=Wheat
        Folder Manager folder
          Operations SowingAndHarvest
            2013-03-25  [Wheat].Sow(population:165, cultivar:"Wakanui", depth:20, rowSpacing:130);
          Operations IrrigationEvents
            2013-05-14  [Irrigation].Apply(25);
            2013-05-29  [Irrigation].Apply(9.2);
            2013-06-11  [Irrigation].Apply(12);
            2013-09-16  [Irrigation].Apply(34.6);
            2013-09-25  [Irrigation].Apply(43);
            2013-10-01  [Irrigation].Apply(19.3);
            2013-10-08  [Irrigation].Apply(24.9);
            2013-10-15  [Irrigation].Apply(21);
            2013-10-22  [Irrigation].Apply(39);
            2013-10-29  [Irrigation].Apply(44);
            2013-11-05  [Irrigation].Apply(40);
            2013-11-12  [Irrigation].Apply(35);
            2013-11-19  [Irrigation].Apply(33);
            2013-11-26  [Irrigation].Apply(32);
            2013-12-03  [Irrigation].Apply(35);
            2013-12-10  [Irrigation].Apply(49);
            2013-12-17  [Irrigation].Apply(47);
            2013-12-24  [Irrigation].Apply(0);
            2013-12-31  [Irrigation].Apply(0);
          Operations FertiliserEvents
            2013-09-26  [Fertiliser].Apply(100, Fertiliser.Types.UreaN, 10);
            2013-11-13  [Fertiliser].Apply(100, Fertiliser.Types.UreaN, 10);;
          Operations Flood
            2013-06-18  [Irrigation].Apply(80);
        Irrigation
        Manager ClimateControl
          StartDate = 2013-04-01
          EndDate = 2014-05-01
```csharp
using System;
using Models.Core;
using APSIM.Shared.Utilities;



using System.Collections.Generic;
using System.Text;
using Models.PMF;
using Models;
using System.Xml.Serialization;

namespace Models
{
	[Serializable] 
	[System.Xml.Serialization.XmlInclude(typeof(Model))]
	public class Script : Model
	{
		[Link] Weather Met;
		[Link] Clock Clock;
    
		[Description("Start Date")]
		public DateTime StartDate { get; set; }
        
		[Description("End Date")]
		public DateTime EndDate { get; set; }
 
    
		[EventSubscribe("PreparingNewWeatherData")]
		private void OnPreparingNewWeatherData(object sender, EventArgs e)
		{
			if ((Clock.Today.Date >= StartDate) && (Clock.Today.Date <= EndDate))
				Met.Rain = 0;		
		}
	}
}
```
        SurfaceOrganicMatter Surface Organic Matter: same as RainShelter.Control_full_irrig.paddock.Surface Organic Matter
        Fertiliser
        MicroClimate: same as RainShelter.Control_full_irrig.paddock.MicroClimate
        Manager ExtraVariables
```csharp
using System;
using Models.Core;
using System.Collections.Generic;
using System.Text;
using Models.Soils;
using Models.PMF;
using Models;
using System.Xml.Serialization;
using APSIM.Shared.Utilities;

namespace Models
{
	[Serializable] 
	public class Script : Model
	{
		[Link] Clock Clock;
		[Link] Soils.Soil Soil;
		[Link] Models.SurfaceOM.SurfaceOrganicMatter SOM;
		[Link] Weather Met;
		[Link] Fertiliser Fert;
		[Link] Irrigation Irrig;
		[Link] Plant Wheat;
		[Link] Zone zone;
					
		[XmlIgnore] public bool InitialDay { get; set; }
		
		[XmlIgnore] public double AccumPlantN { get; set; }
		[XmlIgnore] public double AccumMineralisation { get; set; }
		[XmlIgnore] public double AccumDenit { get; set; }
		[XmlIgnore] public double AccumFert { get; set; }
		[XmlIgnore] public double AccumLeach { get; set; }
		[XmlIgnore] public double AccumDetach { get; set; }
		[XmlIgnore] public double DeltaSoilOMN { get; set; }
		[XmlIgnore] public double DeltaSurfaceOMN { get; set; }
		[XmlIgnore] public double DeltaSoilMineralN { get; set; }
		[XmlIgnore] public double SoilNitrogenContent { get; set; }
		
		[XmlIgnore] public double AccumEO { get; set; }
		[XmlIgnore] public double AccumEP { get; set; }
		[XmlIgnore] public double AccumES { get; set; }
		[XmlIgnore] public double AccumDrainage { get; set; }
		[XmlIgnore] public double AccumRunoff { get; set; }
		[XmlIgnore] public double AccumOutflowLat { get; set; }
		[XmlIgnore] public double AccumIrrigation { get; set; }
		[XmlIgnore] public double AccumRainfall { get; set; }
		[XmlIgnore] public double SoilWaterDeficit { get; set; }
	
		[XmlIgnore] public double  InitialSoilOMN { get; set; }
		[XmlIgnore] public double  InitialSurfaceOMN { get; set; }
		[XmlIgnore] public double  InitialMineralN { get; set; }
		
		[XmlIgnore] public double SWC { get; set; }
		[XmlIgnore] public double DUL { get; set; }
		[XmlIgnore] public double OutFlowLat { get; set; }

		[XmlIgnore] public double FomN { get; set; }
		[XmlIgnore] public double BiomN { get; set; }
		[XmlIgnore] public double HumN { get; set; }
		[XmlIgnore] public double OrganicN { get; set; }
		[XmlIgnore] public double NO3N { get; set; }
		[XmlIgnore] public double NH4N { get; set; }
		[XmlIgnore] public double UreaN { get; set; }
		[XmlIgnore] public double MineralN { get; set; }
		[XmlIgnore] public double DltNMinRes { get; set; }
		[XmlIgnore] public double DltNMinTot { get; set; }
		
		[XmlIgnore] public double LeafExpandedPosition { get; set; }
		[XmlIgnore] public double LeafAppearedPosition { get; set; }
		[XmlIgnore] public double ExpandedLeafNoYesterday { get; set; }
		[XmlIgnore] public double AppearedLeafNoYesterday { get; set; }
		[XmlIgnore] public double MostRecentlyExpandedLeafSize { get; set; }
		[XmlIgnore] public double MostRecentlyAppearedLeafMaxSize { get; set; }
        
		[EventSubscribe("Commencing")]
		private void OnSimulationCommencing(object sender, EventArgs e)
		{
			InitialDay = true;
			LeafExpandedPosition = 0;
			LeafAppearedPosition = 0;
			ExpandedLeafNoYesterday = 0;
			AppearedLeafNoYesterday = 0;
			MostRecentlyExpandedLeafSize = 0;
			MostRecentlyAppearedLeafMaxSize = 0;
		}
		
		[EventSubscribe("DoManagement")]
		private void OnDoManagement(object sender, EventArgs e)
		{
			//!!!!!! Nitrogen balance components !!!!!!
			//!!!!!!^^^^^^^^^^^^^^^^^^^^^^^^^^^^^!!!!!!
			FomN = MathUtilities.Sum(Soil.SoilNitrogen.FOMN);
			HumN = MathUtilities.Sum(Soil.SoilNitrogen.HumicN);
			BiomN = MathUtilities.Sum(Soil.SoilNitrogen.MicrobialN);
			OrganicN = FomN + HumN + BiomN;
			NO3N = MathUtilities.Sum(Soil.NO3N);
			NH4N = MathUtilities.Sum(Soil.NH4N);
			UreaN = MathUtilities.Sum(Soil.SoilNitrogen.urea);
			MineralN = NO3N + NH4N + UreaN; 
			DltNMinRes = MathUtilities.Sum(Soil.SoilNitrogen.dlt_n_min_res);
			DltNMinTot = MathUtilities.Sum(Soil.SoilNitrogen.MineralisedN);
			int layers = Soil.Thickness.Length;
			if (InitialDay == true)
			{
				InitialSurfaceOMN = SOM.N;
				InitialSoilOMN = OrganicN;
				InitialMineralN = MineralN;
				InitialDay = false;
			}
			AccumFert += Fert.NitrogenApplied;
			DeltaSurfaceOMN = SOM.N - InitialSurfaceOMN;
			AccumLeach = AccumLeach - Soil.SoilWater.LeachNH4 - Soil.SoilWater.LeachNO3 - Soil.SoilWater.LeachUrea; //Fails
			AccumMineralisation += MathUtilities.Sum(Soil.SoilNitrogen.MineralisedN);
			AccumDenit -= MathUtilities.Sum(Soil.SoilNitrogen.Denitrification);
			AccumPlantN -= (double)zone.Get("Wheat.Root.NUptake");
			DeltaSoilOMN = OrganicN - InitialSoilOMN;
			DeltaSoilMineralN = MineralN - InitialMineralN;
			SoilNitrogenContent = MineralN;
			
			//!!!!!! Water balance components !!!!!!
			//!!!!!!^^^^^^^^^^^^^^^^^^^^^^^^^^!!!!!!

			AccumIrrigation += Irrig.IrrigationApplied;
			AccumRainfall += Met.Rain;
			//AccumEP -= (double)zone.Get("[Wheat].Leaf.Transpiration");
			AccumEP -= (double)zone.Get("Wheat.Root.WaterUptake");
			SoilWaterDeficit = (SWC - DUL);
			double OutFlowLat = MathUtilities.Sum(Soil.SoilWater.outflow_lat);
			AccumOutflowLat -= OutFlowLat;
			
			//Leaf number variable
			ExpandedLeafNoYesterday = (double)zone.Get("Wheat.Leaf.ExpandedCohortNo");
			AppearedLeafNoYesterday = (double)zone.Get("Wheat.Leaf.AppearedCohortNo");
		}
		
		[EventSubscribe("DoManagementCalculations")]
		private void OnDoManagementCalculations(object sender, EventArgs e)
		{
			FomN = MathUtilities.Sum(Soil.SoilNitrogen.FOMN);
			HumN = MathUtilities.Sum(Soil.SoilNitrogen.HumicN);
			BiomN = MathUtilities.Sum(Soil.SoilNitrogen.MicrobialN);
			
			
			AccumEO -= Soil.SoilWater.Eo;
			AccumES -= Soil.SoilWater.Es; 
			AccumDrainage -= Soil.SoilWater.Drainage;
			AccumRunoff -= Soil.SoilWater.Runoff;
			SWC = MathUtilities.Sum(Soil.SoilWater.SWmm);
			DUL = MathUtilities.Sum(Soil.SoilWater.DULmm);
			
			if ((double)zone.Get("Wheat.Leaf.ExpandedCohortNo") > ExpandedLeafNoYesterday)
			{
				LeafExpandedPosition = (double)zone.Get("Wheat.Leaf.ExpandedCohortNo");
				MostRecentlyExpandedLeafSize = (double)zone.Get("Wheat.Leaf.CohortSize[" + (int)LeafExpandedPosition + "]");
			}
			//else
			//	LeafExpandedPosition = 0;
			
			if ((double)zone.Get("Wheat.Leaf.AppearedCohortNo") > AppearedLeafNoYesterday)
			{
				LeafAppearedPosition = (double)zone.Get("Wheat.Leaf.AppearedCohortNo");
				MostRecentlyAppearedLeafMaxSize = (double)zone.Get("Wheat.Leaf.CohortParameters.MaxArea.Value");
			}
			//else
			//LeafAppearedPosition = 0;
			
		}
	}
}
```
        Report: EventNames=[Clock].DoReport
          VariableNames:
            [Clock].Today
            [ExtraVariables].Script.AccumPlantN
            [ExtraVariables].Script.AccumMineralisation
            [ExtraVariables].Script.AccumDenit
            [ExtraVariables].Script.AccumFert
            [ExtraVariables].Script.AccumLeach
            [ExtraVariables].Script.AccumDetach
            [ExtraVariables].Script.DeltaSoilOMN
            [ExtraVariables].Script.DeltaSurfaceOMN
            [ExtraVariables].Script.DeltaSoilMineralN
            [ExtraVariables].Script.SWC
            [ExtraVariables].Script.DUL
            [ExtraVariables].Script.OutFlowLat
            [ExtraVariables].Script.AccumEO
            [ExtraVariables].Script.AccumEP
            [ExtraVariables].Script.AccumES
            [ExtraVariables].Script.AccumDrainage
            [ExtraVariables].Script.AccumRunoff
            [ExtraVariables].Script.AccumRainfall
            [ExtraVariables].Script.AccumIrrigation
            [ExtraVariables].Script.AccumOutflowLat
            [ExtraVariables].Script.SoilWaterDeficit
            [ExtraVariables].Script.SoilNitrogenContent
            [ExtraVariables].Script.FomN
            [ExtraVariables].Script.HumN
            [ExtraVariables].Script.BiomN
            [ExtraVariables].Script.DltNMinRes
            [ExtraVariables].Script.DltNMinTot
            [Soil].SoilWater.SW
            [Soil].SoilWater.Eo
            [Soil].SoilWater.Es
            [Soil].SoilWater.Drainage
            [Soil].SoilWater.Runoff
            [Soil].SoilWater.pond
            sum([Soil].SoilWater.SWmm) as ProfileWater
            [Soil].NO3N
            [MicroClimate].net_radn
            [MicroClimate].peta
            [MicroClimate].petr
            [Wheat].Grain.Live.Wt
            [Wheat].Stem.Live.Wt
            [Wheat].EarLive.Wt
            [Wheat].Leaf.Live.Wt
            [Wheat].Root.Live.Wt
            [Wheat].Spike.Live.Wt
            [Wheat].HeadLive.N
            [Wheat].Grain.Live.N
            [Wheat].Stem.Live.N
            [Wheat].Leaf.Live.N
            [Wheat].Root.Live.N
            [Wheat].Spike.Live.N
            [Wheat].Root.WaterSupply
            [Wheat].Root.WaterUptake
            [Wheat].Leaf.Transpiration
            [Wheat].Leaf.WaterDemand
            [Wheat].Root.Depth
            [Wheat].Leaf.CoverTotal
            [Wheat].Leaf.CoverDead
            [Wheat].Leaf.LAI
            [Wheat].Leaf.Height
            [Wheat].Leaf.CohortParameters.MaxArea.Value
            [Wheat].Leaf.Fw
            [Wheat].Leaf.Photosynthesis.FVPD.Value
            [Wheat].Leaf.Photosynthesis.FT.Value
            [Wheat].Leaf.Fn
            [Wheat].Phenology.CurrentPhaseName
            [Wheat].Phenology.Stage
            [Wheat].AboveGroundLive.N
            [Wheat].AboveGroundLive.Wt
            [Wheat].Total.N
            [Wheat].Total.Wt
            [Wheat].Arbitrator.NDemand
            [Wheat].Phenology.Stage
            [Wheat].Leaf.ExpandedCohortNo
            [Wheat].Leaf.AppearedCohortNo
            [Wheat].Leaf.DeadCohortNo
            [Wheat].Leaf.InitialisedCohortNo
            [Wheat].Structure.MainStemFinalNodeNo
            [Wheat].Structure.MainStemNodeNo
            [Wheat].Structure.MainStemPrimordiaNo
            [Wheat].Leaf.CohortParameters.SpecificLeafAreaMax.Value
            [Wheat].Leaf.CohortParameters.SpecificLeafAreaMin.Value
            [Wheat].Arbitrator.NDemand
            [Wheat].Arbitrator.DMSupply
            [Wheat].Arbitrator.DMDemand
            [Wheat].Arbitrator.DMAllocated
            [Wheat].Arbitrator.DMSinkLimitation
            [Wheat].Arbitrator.DMNutrientLimitation
            [Wheat].Leaf.CohortParameters.GrowthDuration.Value
            [Wheat].Leaf.CohortParameters.LagDuration.Value
            [Wheat].Leaf.CohortParameters.SenescenceDuration.Value
            [Wheat].Structure.MainStemNodeAppearanceRate.Value
            [Wheat].Structure.Height
            [Wheat].Stem.DMDemandFunction.PotentialDMAccumulation.Value
            [Wheat].Stem.DMDemandFunction.HightLimitedDMAccumulation.Value
            [Wheat].Structure.MainStemPrimordiaNo
            [Wheat].Grain.NumberFunction.Value
            [ExtraVariables].Script.LeafAppearedPosition
            [ExtraVariables].Script.MostRecentlyAppearedLeafMaxSize
            [ExtraVariables].Script.LeafExpandedPosition
            [ExtraVariables].Script.MostRecentlyExpandedLeafSize
            [Wheat].Leaf.DeadCohortNo
            [Phenology].ThermalTime.Value
            [Wheat].Leaf.SenescingCohortNo
            [Wheat].Stem.MaximumNConc.Value
            [Wheat].Stem.MinimumNConc.Value
            [Wheat].Stem.Live.NConc
            [Wheat].Leaf.Live.NConc
            [Wheat].Grain.Live.NConc
            [Wheat].Spike.Live.NConc
            [Wheat].Leaf.Dead.NConc
            [Wheat].Leaf.Photosynthesis.RueAct
            [Wheat].Stem.Live.StructuralWt
            [Wheat].Phenology.Zadok.Stage
            [Wheat].Structure.TotalStemPopn
            [Wheat].Structure.MainStemPopn
            [Wheat].Leaf.CohortArea[4]
            [Wheat].Arbitrator.FN
            [Wheat].Leaf.SpecificArea
            [Wheat].Leaf.CohortParameters.SpecificLeafAreaMax.Value
            [Wheat].Leaf.CohortParameters.SpecificLeafAreaMin.Value
            [Wheat].Leaf.CohortSLA[1:10]
  Experiment Gatton2009
    Factors
      Factor TOS: Specifications=[SowingRule].Script.TOS = 1, 2, 3
      Factor Cv
        Specifications=[SowingRule].Script.Cultivar = Bolac, Derrimut, EGAGregory, Gladius, H46, Hartog, Janz, Kelallac, Kennedy, Mckellar, Ruby, Ventura, Wedgetail, Wyalkatchem, Yitpi, Young
    Simulation Gatton2009Base: Area=0; Slope=0
      Clock: StartDate=2009-04-01; EndDate=2009-12-30
      Summary summaryfile
      Weather: FileName=Gatton2009.met
      SoilArbitrator Soil Arbitrator
      Zone Field: Area=1; Slope=0
        Irrigation
        Fertiliser
        Soil APS6Field: same as APS6.APS6NRate0.paddock.APS6Field
        Manager SowingRule
          TOS = 1
          Cultivar = Hartog
```csharp
using System;
using Models.Core;
using Models.PMF;
namespace Models
{
           
	[Serializable] 
	[System.Xml.Serialization.XmlInclude(typeof(Model))]
	public class Script : Model
	{
	
		[Link] Plant Wheat;
		[Link] Clock Clock;
			
		[Description("Time of Sowing")]
		public int TOS { get; set; }

		[Description("Cultivar")]
		public String Cultivar { get; set; }
		
		[EventSubscribe("DoManagement")]
		private void OnDoManagement(object sender, EventArgs e)
		{
			if (((Clock.Today.DayOfYear == 120) && (TOS == 1)) ||
			    ((Clock.Today.DayOfYear == 150) && (TOS == 2)) ||
			    ((Clock.Today.DayOfYear == 177) && (TOS == 3)))
			{
				Wheat.Sow(population: 100, cultivar: Cultivar, depth: 30, rowSpacing: 250);
			}
		}


	}
}
```
        SurfaceOrganicMatter: same as APS6.APS6NRate0.paddock.SurfaceOrganicMatter
        Plant Wheat: CropType=Wheat
        MicroClimate: same as APS26.APS26NRate160WaterWet.paddock.MicroClimate
        Report
          VariableNames:
            [Clock].Today
            Wheat.Zadok.Stage
            Wheat.Phenology.CurrentStageName
            Wheat.AboveGround.Wt
            Wheat.AboveGround.N
            Wheat.Grain.Wt
            Wheat.Grain.Protein
            Wheat.Grain.Size
            Wheat.Grain.Number
            Wheat.Grain.Live.Wt
            Wheat.Grain.Live.N
            Wheat.Leaf.LAI
            Wheat.Leaf.Live.Wt
            Wheat.Leaf.Live.N
            Wheat.Spike.Wt
            Wheat.Spike.N
            Wheat.Stem.Live.Wt
            Wheat.Stem.Live.N
            Wheat.Root.Depth
            [Wheat].Root.WaterUptake
            [Wheat].Leaf.Fw
            [Wheat].Leaf.Fn
            [Wheat].Total.Wt
            [Wheat].Phenology.Zadok.Stage
            [Wheat].Leaf.AppearedCohortNo
            [Wheat].Structure.MainStemNodeNo
          EventNames:
            [Clock].DoReport
  Experiment APS2
    Factors
      Factor TOS: Specifications=[SowingRule].Script.TOS = 1, 2
    Simulation APS2Base: Area=0; Slope=0
      Clock: StartDate=1991-05-30; EndDate=1991-12-30
      Summary summaryfile
      Weather: FileName=aps02.met
      SoilArbitrator Soil Arbitrator
      Zone Field: Area=1; Slope=0
        Irrigation
        Fertiliser
        Soil APS6Field: same as APS6.APS6NRate0.paddock.APS6Field
        Manager SowingRule
          TOS = 1
          Cultivar = Hartog
```csharp
using System;
using Models.Core;
using Models.PMF;
namespace Models
{
           
	[Serializable] 
	[System.Xml.Serialization.XmlInclude(typeof(Model))]
	public class Script : Model
	{
	
		[Link] Plant Wheat;
		[Link] Clock Clock;
			
		[Description("Time of Sowing")]
		public int TOS { get; set; }

		[Description("Cultivar")]
		public String Cultivar { get; set; }
		
		[EventSubscribe("DoManagement")]
		private void OnDoManagement(object sender, EventArgs e)
		{
			if ((Clock.Today.DayOfYear == 150) && (TOS == 1) ||
			    (Clock.Today.DayOfYear == 211) && (TOS == 2))
			{
				Wheat.Sow(population: 100, cultivar: Cultivar, depth: 30, rowSpacing: 250);
			}
		}


	}
}
```
        SurfaceOrganicMatter: same as APS6.APS6NRate0.paddock.SurfaceOrganicMatter
        Plant Wheat: CropType=Wheat
        MicroClimate: same as APS26.APS26NRate160WaterWet.paddock.MicroClimate
        Report
          VariableNames:
            [Clock].Today
            Wheat.Zadok.Stage
            Wheat.Phenology.CurrentStageName
            Wheat.AboveGround.Wt
            Wheat.AboveGround.N
            Wheat.Grain.Wt
            Wheat.Grain.Protein
            Wheat.Grain.Size
            Wheat.Grain.Number
            Wheat.Grain.Live.Wt
            Wheat.Grain.Live.N
            Wheat.Leaf.LAI
            Wheat.Leaf.Live.Wt
            Wheat.Leaf.Live.N
            Wheat.Spike.Wt
            Wheat.Spike.N
            Wheat.Stem.Live.Wt
            Wheat.Stem.Live.N
            Wheat.Root.Depth
            [Wheat].Root.WaterUptake
            [Wheat].Leaf.Fw
            [Wheat].Leaf.Fn
            [Wheat].Total.Wt
            [Wheat].Phenology.Zadok.Stage as ZadokStage
            [Wheat].Leaf.AppearedCohortNo
            [Wheat].Leaf.ExpandedCohortNo
            [Wheat].Leaf.SenescingCohortNo
          EventNames:
            [Clock].DoReport
  Folder YarrabahCreek
    Simulation YarrabahCreek: Area=0; Slope=0
      Clock: StartDate=2001-06-19; EndDate=2001-12-04
      Summary summaryfile
      Weather: FileName=Ycreek.met
      SoilArbitrator Soil Arbitrator
      Zone Field: Area=1; Slope=0
        Irrigation
        Fertiliser
        Operations CropManagement
          2001-06-19  [Wheat].Sow(population:70, cultivar:"Mercury", depth:30, rowSpacing:250);
          2001-06-19  [Fertiliser].Apply(Amount: 120, Type: Fertiliser.Types.UreaN);
        Soil: SoilType=APS6Soil; LocalName=APS6Site; Site=APS6Site; NearestTown=Unknown; Region=Lawes; NaturalVegetation=Unknown; Latitude=0; Longitude=0
          Water
            Thickness  BD   AirDry  LL15  DUL   SAT
            100        1    0.1     0.27  0.47  0.51
            200        1.1  0.1     0.27  0.49  0.51
            200        1.1  0.1     0.3   0.55  0.57
            200        1.1  0.1     0.32  0.55  0.55
            200        1.1  0.1     0.34  0.53  0.54
            200        1.2  0.1     0.38  0.53  0.54
            200        1.2  0.1     0.42  0.53  0.54
            200        1.2  0.1     0.42  0.5   0.51
            200        1.2  0.1     0.42  0.48  0.51
            200        1.2  0.1     0.42  0.48  0.51
            SoilCrop WheatSoil: LL=[0.27, 0.27, 0.3, 0.32, 0.34, 0.38, 0.42, 0.42, 0.42, 0.42]; KL=[0.12, 0.12, 0.08, 0.06, 0.06, 0.06, 0.06, 0.06, 0, 0]; XF=[1, 1, 1, 1, 1, 1, 1, 1, 0, 0]
          SoilWater: residueinterception=0; SummerDate=1-Nov; SummerU=9; SummerCona=5; WinterDate=1-Apr; WinterU=9; WinterCona=5; DiffusConst=40; DiffusSlope=16; Salb=0.13; CN2Bare=78; CNRed=20; CNCov=0.8; slope=0; discharge_width=0; catchment_area=0; max_pond=0
            Thickness  SWCON  KLAT
            150        0.2    0
            150        0.2    0
            300        0.2    0
            300        0.2    0
            300        0.2    0
            300        0.2    0
            300        0.2    0
          SoilNitrogen: fom_type=[default, manure, mucuna, lablab, shemp, stable]; fract_carb=[0.2, 0.3, 0.54, 0.57, 0.45, 0]; fract_cell=[0.7, 0.3, 0.37, 0.37, 0.47, 0.1]; fract_lign=[0.1, 0.4, 0.09, 0.06, 0.08, 0.9]; wfpsN2N2O_x=[22, 88]; wfpsN2N2O_y=[0.1, 1]
          SoilOrganicMatter: RootCN=60; RootWt=10; SoilCN=14.5; EnrACoeff=1; EnrBCoeff=1; OCUnits=Total
            Thickness  OC    FBiom  FInert
            100        1.83  0.03   0.45
            200        1.35  0.03   0.45
            200        1.19  0.02   0.6
            200        1.11  0.015  0.7
            200        0.97  0.01   0.85
            200        0.8   0.01   0.9
            200        0.64  0.01   0.99
            200        0.5   0.01   0.99
            200        0.38  0.01   0.99
            200        0.27  0.01   0.99
          Analysis: Thickness=[150, 150, 300, 300, 300, 300, 300]; PH=[7.5, 8, 8, 8, 8, 8, 8]; PHUnits=Water; BoronUnits=HotWater
          Sample Initial Water: Thickness=[100, 200, 200, 200, 200, 200, 200, 200, 200, 200]; NO3Units=ppm; NH4Units=ppm; SWUnits=Volumetric; OCUnits=Total; PHUnits=Water
            SW=[0.42, 0.46, 0.54, 0.55, 0.53, 0.51, 0.54, 0.5, 0.466, 0.43]
          Sample Initial Nitrogen: NO3Units=ppm; NH4Units=ppm; SWUnits=Volumetric; OCUnits=Total; PHUnits=Water
            Thickness  NO3  NH4
            100        10   0.3
            200        10   0.3
            200        10   0.3
            200        10   0.3
            200        10   0.3
            200        5    0.3
            200        5    0.3
            200        5    0.3
            200        5    0.3
            200        5    0.3
        SurfaceOrganicMatter: PoolName=wheat_stubble; type=wheat; mass=2000; standing_fraction=0; cnr=100; CriticalResidueWeight=2000; OptimumDecompTemp=20; MaxCumulativeEOS=20; CNRatioDecompCoeff=0.277; CNRatioDecompThreshold=25; TotalLeachRain=25; MinRainToLeach=10; CriticalMinimumOrganicC=0.004; DefaultCPRatio=0; DefaultStandingFraction=0; StandingExtinctCoeff=0.5; FractionFaecesAdded=0.5
          Pools:
            {PoolName=wheat_stubble, ResidueType=wheat, Mass=2000, CNRatio=100, StandingFraction=0}
          ResidueTypes: LoadFromResource=ResidueTypes
        Plant Wheat: CropType=Wheat
        MicroClimate: a_interception=0; b_interception=0; c_interception=0.3; d_interception=0; soil_albedo=0.13; air_pressure=1010; soil_emissivity=0.96; sun_angle=15; soil_heat_flux_fraction=0.4; night_interception_fraction=0.5; windspeed_default=3; refheight=2; albedo=0.15; emissivity=0.96; gsmax=0.01; r50=200
        Report
          VariableNames:
            [Clock].Today
            Wheat.Zadok.Stage
            Wheat.Phenology.CurrentStageName
            Wheat.AboveGround.Wt
            Wheat.AboveGround.N
            Wheat.Grain.Wt
            Wheat.Grain.Protein
            Wheat.Grain.Size
            Wheat.Grain.Number
            Wheat.Grain.Live.Wt
            Wheat.Grain.Live.N
            Wheat.Leaf.LAI
            Wheat.Leaf.Live.Wt
            Wheat.Leaf.Live.N
            Wheat.Spike.Wt
            Wheat.Spike.N
            Wheat.Stem.Live.Wt
            Wheat.Stem.Live.N
            Wheat.Root.Depth
            [Wheat].Root.WaterUptake
            [Wheat].Leaf.Fw
            [Wheat].Leaf.Fn
            [Wheat].Total.Wt
            [Wheat].Phenology.Zadok.Stage
            [Wheat].Leaf.AppearedCohortNo
            [Wheat].Structure.MainStemNodeNo
            ([Wheat].Leaf.Transpiration + [Soil].SoilWater.Es) as ET
            sum([Soil].SoilWater.SWmm[2:10]) as TotalSoilWater
            [Soil].SoilWater.SW
          EventNames:
            [Clock].DoReport
  Experiment GattonRowSpacing
    Factors
      Factor RowSpace: Specifications=[Sowing]
        Operations 25cm
          2011-06-22  [Wheat].Sow(population:160, cultivar:"Hartog", depth:30, rowSpacing:250);
          2011-08-15  [Fertiliser].Apply(Amount: 100, Type: Fertiliser.Types.UreaN);
        Operations 50cm
          2011-06-22  [Wheat].Sow(population:80, cultivar:"Hartog", depth:30, rowSpacing:500);
          2011-08-15  [Fertiliser].Apply(Amount: 100, Type: Fertiliser.Types.UreaN);
        Operations N0
          2011-06-22  [Wheat].Sow(population:160, cultivar:"Hartog", depth:30, rowSpacing:250);
    Simulation RowSpace: Area=0; Slope=0
      Clock: StartDate=2011-05-01; EndDate=2011-11-12
      Summary summaryfile
      Weather: FileName=Gatton2011.met
      SoilArbitrator Soil Arbitrator
      Zone Field: Area=1; Slope=0
        Irrigation
        Fertiliser
        Operations Sowing
          2011-06-22  [Wheat].Sow(population:160, cultivar:"Hartog", depth:30, rowSpacing:250);
        Soil: SoilType=Black Vertosol; Site=Lawes; NearestTown=Lawes, Q 4343; Region=Lockyer; State=Queensland; Country=Australia; NaturalVegetation=Blue Gum, Moreton Bay Ash, Tea Tree; ApsoilNumber=37; Latitude=-27.537; Longitude=152.336; LocationAccuracy=+-20m; DataSource=CSIRO Sustainable Ecosystems, Toowoomba
          Comments=Soil naming structure: \State\Region\Classification-Local Name (Site/district and locator number); oc and ph estimated
          Water
            Thickness  BD    AirDry  LL15  DUL   SAT
            150        1.32  0.13    0.26  0.41  0.47
            150        1.3   0.208   0.26  0.43  0.48
            300        1.23  0.26    0.26  0.46  0.51
            300        1.27  0.26    0.26  0.44  0.49
            300        1.37  0.25    0.25  0.4   0.45
            300        1.35  0.26    0.26  0.41  0.46
            300        1.35  0.26    0.26  0.38  0.46
            SoilCrop WheatSoil: LL=[0.26, 0.26, 0.26, 0.26, 0.25, 0.29, 0.36]; KL=[0.06, 0.06, 0.06, 0.04, 0.04, 0.02, 0.02]; XF=[1, 1, 1, 1, 1, 1, 1]
          SoilWater: residueinterception=0; SummerDate=1-Nov; SummerU=6; SummerCona=3.5; WinterDate=1-Apr; WinterU=4; WinterCona=2.5; DiffusConst=40; DiffusSlope=16; Salb=0.12; CN2Bare=73; CNRed=20; CNCov=0.8; max_pond=0; Thickness=[150, 150, 300, 300, 300, 300, 300]; SWCON=[0.3, 0.3, 0.3, 0.3, 0.3, 0.3, 0.3]
          SoilNitrogen: fom_type=[default, manure, mucuna, lablab, shemp, stable]; fract_carb=[0.2, 0.3, 0.54, 0.57, 0.45, 0]; fract_cell=[0.7, 0.3, 0.37, 0.37, 0.47, 0.1]; fract_lign=[0.1, 0.4, 0.09, 0.06, 0.08, 0.9]; wfpsN2N2O_x=[22, 88]; wfpsN2N2O_y=[0.1, 1]
          SoilOrganicMatter: RootCN=40; RootWt=1000; SoilCN=12; EnrACoeff=7.4; EnrBCoeff=0.2; OCUnits=Total
            Thickness  OC        FBiom  FInert
            150        0.953846  0.04   0.4
            150        0.953846  0.02   0.6
            300        0.961538  0.02   0.8
            300        0.846154  0.02   1
            300        0.546154  0.01   1
            300        0.261538  0.01   1
            300        0.2       0.01   1
          Analysis: Thickness=[150, 150, 300, 300, 300, 300, 300]; PH=[8, 8, 8, 8, 8, 8, 8]; PHUnits=Water; BoronUnits=HotWater
          InitialWater: PercentMethod=FilledFromTop; FractionFull=1
          Sample Initial nitrogen: NO3Units=kgha; NH4Units=kgha; SWUnits=Volumetric; OCUnits=Total; PHUnits=Water
            Thickness  NO3  NH4
            200        100  1
            1800       10   1
        SurfaceOrganicMatter: same as APS6.APS6NRate0.paddock.SurfaceOrganicMatter
        Plant Wheat: CropType=Wheat
        MicroClimate: same as APS26.APS26NRate160WaterWet.paddock.MicroClimate
        Report
          VariableNames:
            [Clock].Today
            Wheat.Zadok.Stage
            Wheat.Phenology.CurrentStageName
            Wheat.AboveGround.Wt
            Wheat.AboveGround.N
            Wheat.Grain.Wt
            Wheat.Grain.Protein
            Wheat.Grain.Size
            Wheat.Grain.Number
            Wheat.Grain.Live.Wt
            Wheat.Grain.Live.N
            Wheat.Leaf.LAI
            Wheat.Leaf.Live.Wt
            Wheat.Leaf.Live.N
            Wheat.Spike.Wt
            Wheat.Spike.N
            Wheat.Stem.Live.Wt
            Wheat.Stem.Live.N
            Wheat.Root.Depth
            [Wheat].Root.WaterUptake
            [Wheat].Leaf.Fw
            [Wheat].Leaf.Fn
            [Wheat].Total.Wt
            [Wheat].Phenology.Zadok.Stage as ZadokStage
            [Wheat].Leaf.AppearedCohortNo
            [Wheat].Leaf.ExpandedCohortNo
            [Wheat].Leaf.SenescingCohortNo
            [Wheat].Structure.TotalStemPopn
          EventNames:
            [Clock].DoReport
  Folder Wagga
    Memo
      The dataset of [Zeleke2016] includes plantings of two wheat varieties (Gregory, Livingston) under two water regimes (dry and irrigated) for 2013 and 2014 at the Wagga Wagga Agricultural Research Institute. Yields ranged from 1.63 t/ha to 6.01 t/ha.
    Experiment Wagga2013
      Factors
        Factor Cv: Specifications=[CropSchedule]
          Operations Gregory
            2013-06-24  [Wheat].Sow(population:120, cultivar:"Gregory", depth:30, rowSpacing:200);
            2013-06-24  [Fertiliser].Apply(Amount: 100, Type: Fertiliser.Types.UreaN);
          Operations Livingston
            2013-06-24  [Wheat].Sow(population:120, cultivar:"Livingston", depth:30, rowSpacing:200);
            2013-06-24  [Fertiliser].Apply(Amount: 100, Type: Fertiliser.Types.UreaN);
        Factor Water: Specifications=[IrrigationSchedule]
          Operations Wet
            2013-09-10  [Irrigation].Apply(amount:26);
            2013-09-11  [Irrigation].Apply(amount:26);
            2013-09-26  [Irrigation].Apply(amount:26);
            2013-10-01  [Irrigation].Apply(amount:26);
            2013-10-04  [Irrigation].Apply(amount:26);
            2013-10-09  [Irrigation].Apply(amount:26);
            2013-10-10  [Irrigation].Apply(amount:26);
            2013-10-14  [Irrigation].Apply(amount:26);
            2013-10-15  [Irrigation].Apply(amount:26);
            2013-10-16  [Irrigation].Apply(amount:26);
          Operations Dry
      Simulation Ketema2013: Area=0; Slope=0
        Clock: StartDate=2013-06-24; EndDate=2013-12-30
        Summary summaryfile
        Weather: FileName=Wagga1314.met
        SoilArbitrator Soil Arbitrator
        Zone paddock: Area=1; Slope=0
          Irrigation
          Fertiliser
          SurfaceOrganicMatter: PoolName=canola; type=canola; mass=1000; standing_fraction=0; cpr=0; cnr=80; CriticalResidueWeight=2000; OptimumDecompTemp=20; MaxCumulativeEOS=20; CNRatioDecompCoeff=0.277; CNRatioDecompThreshold=25; TotalLeachRain=25; MinRainToLeach=10; CriticalMinimumOrganicC=0.004; DefaultCPRatio=0; DefaultStandingFraction=0; StandingExtinctCoeff=0.5; FractionFaecesAdded=0.5
            Pools:
              {PoolName=canola, ResidueType=canola, Mass=1000, CNRatio=80, CPRatio=0, StandingFraction=0}
            ResidueTypes: LoadFromResource=ResidueTypes
          Plant Wheat: CropType=Wheat
          Operations CropSchedule
          Operations IrrigationSchedule
          MicroClimate: same as APS26.APS26NRate160WaterWet.paddock.MicroClimate
          Manager Calculations: same as APS26.APS26NRate160WaterWet.paddock.Calculations
          Report: same as APS26.APS26NRate160WaterWet.paddock.Report
          Soil: ASCOrder=Kandasol; ASCSubOrder=Red; SoilType=?; Site=Generic; NearestTown=Wagga Wagga; Region=Riverina; State=New South Wales; Country=Australia; ApsoilNumber=498-GENERIC; Latitude=-35.115549; Longitude=147.369477; LocationAccuracy=Regional Soil Type; DataSource=Generic soil; Comments=Generic soil developed for CSU.
            Water
              Thickness  BD    AirDry  LL15  DUL   SAT
              100        1.48  0.055   0.11  0.29  0.35
              150        1.5   0.104   0.13  0.27  0.34
              150        1.45  0.15    0.15  0.25  0.32
              150        1.37  0.15    0.15  0.28  0.36
              150        1.43  0.15    0.15  0.29  0.35
              300        1.55  0.15    0.15  0.31  0.34
              300        1.67  0.15    0.15  0.31  0.34
              300        1.62  0.15    0.15  0.32  0.35
              SoilCrop Wheatsoil: LL=[0.11, 0.13, 0.15, 0.17, 0.19, 0.22, 0.26, 0.28]; KL=[0.06, 0.06, 0.04, 0.04, 0.04, 0.04, 0.02, 0.02]; XF=[1, 1, 1, 0.9, 0.9, 0.9, 0.9, 0.8]
            SoilWater: residueinterception=0; SummerDate=1-Nov; SummerU=6; SummerCona=3.5; WinterDate=1-Apr; WinterU=2; WinterCona=2; DiffusConst=44; DiffusSlope=16; Salb=0.13; CN2Bare=84; CNRed=20; CNCov=0.8; max_pond=0; Thickness=[100, 150, 150, 150, 150, 300, 300, 300]; SWCON=[0.5, 0.4, 0.3, 0.3, 0.2, 0.1, 0.1, 0.1]
            SoilNitrogen: fom_type=[default, manure, mucuna, lablab, shemp, stable]; fract_carb=[0.2, 0.3, 0.54, 0.57, 0.45, 0]; fract_cell=[0.7, 0.3, 0.37, 0.37, 0.47, 0.1]; fract_lign=[0.1, 0.4, 0.09, 0.06, 0.08, 0.9]; wfpsN2N2O_x=[22, 88]; wfpsN2N2O_y=[0.1, 1]
            SoilOrganicMatter: RootCN=45; RootWt=1500; SoilCN=12.5; EnrACoeff=7.4; EnrBCoeff=0.2; OCUnits=Total
              Thickness  OC   FBiom  FInert
              100        1    0.03   0.4
              150        0.5  0.02   0.6
              150        0.5  0.02   0.7
              150        0.5  0.02   0.8
              150        0.5  0.01   0.9
              300        0.5  0.01   0.9
              300        0.5  0.01   1
              300        0.5  0.01   1
            Analysis: Thickness=[100, 150, 150, 150, 150, 300, 300, 300]; PH=[6, 6, 6, 6, 6, 6, 6, 6]; PHUnits=Water; BoronUnits=HotWater
            InitialWater: PercentMethod=EvenlyDistributed; FractionFull=0.9
            Sample Initial nitrogen: Thickness=[1200]; NO3=[0.542]; NH4=[0]; SW=[0]; NO3Units=ppm; NH4Units=ppm; SWUnits=Volumetric; OCUnits=Total; PHUnits=Water
    Experiment Wagga2014
      Factors
        Factor Cv: Specifications=[CropSchedule]
          Operations Gregory
            2014-04-30  [Wheat].Sow(population:120, cultivar:"Gregory", depth:30, rowSpacing:200);
            2014-04-30  [Fertiliser].Apply(Amount: 100, Type: Fertiliser.Types.UreaN);
            2014-07-01  [Fertiliser].Apply(Amount: 50, Type: Fertiliser.Types.UreaN);
          Operations Livingston
            2014-04-30  [Wheat].Sow(population:120, cultivar:"Livingston", depth:30, rowSpacing:200);
            2014-04-30  [Fertiliser].Apply(Amount: 100, Type: Fertiliser.Types.UreaN);
            2014-07-01  [Fertiliser].Apply(Amount: 50, Type: Fertiliser.Types.UreaN);
        Factor Water: Specifications=[IrrigationSchedule]
          Operations Wet
            2014-05-16  [Irrigation].Apply(amount:26);
            2014-08-11  [Irrigation].Apply(amount:26);
            2014-08-12  [Irrigation].Apply(amount:26);
            2014-08-18  [Irrigation].Apply(amount:26);
            2014-08-25  [Irrigation].Apply(amount:26);
            2014-09-01  [Irrigation].Apply(amount:21);
            2014-09-05  [Irrigation].Apply(amount:26);
            2014-09-22  [Irrigation].Apply(amount:26);
            2014-10-10  [Irrigation].Apply(amount:26);
          Operations Dry
      Simulation Ketema2014: Area=0; Slope=0
        Clock: StartDate=2014-04-30; EndDate=2014-12-30
        Summary summaryfile
        Weather: FileName=Wagga1314.met
        SoilArbitrator Soil Arbitrator
        Zone paddock: Area=1; Slope=0
          Irrigation
          Fertiliser
          SurfaceOrganicMatter: PoolName=wheat; type=wheat; mass=1000; standing_fraction=0; cpr=0; cnr=80; CriticalResidueWeight=2000; OptimumDecompTemp=20; MaxCumulativeEOS=20; CNRatioDecompCoeff=0.277; CNRatioDecompThreshold=25; TotalLeachRain=25; MinRainToLeach=10; CriticalMinimumOrganicC=0.004; DefaultCPRatio=0; DefaultStandingFraction=0; StandingExtinctCoeff=0.5; FractionFaecesAdded=0.5
            Pools:
              {PoolName=wheat, ResidueType=wheat, Mass=1000, CNRatio=80, CPRatio=0, StandingFraction=0}
            ResidueTypes: LoadFromResource=ResidueTypes
          Plant Wheat: CropType=Wheat
          Operations CropSchedule
          Operations IrrigationSchedule
          MicroClimate: same as APS26.APS26NRate160WaterWet.paddock.MicroClimate
          Manager Calculations: same as APS26.APS26NRate160WaterWet.paddock.Calculations
          Report: same as APS26.APS26NRate160WaterWet.paddock.Report
          Soil: same as Wagga.Wagga2013.Ketema2013.paddock.Soil
  Folder Konya
    Memo
      The dataset of [Tari2016] includes 4 irrigation deficit treatments applied at each of 3 plant growth stages.  The experiment was conducted at Konya in the Central Anatolia region of Turkey. Yields ranged from 2.88 t/ha to 6.82 t/ha.
    Experiment Konya09
      Factors
        Factor Water: Specifications=[IrrigationSchedule]
          Operations AAA
            2010-04-09  [Irrigation].Apply(amount:150);
            2010-05-06  [Irrigation].Apply(amount:154);
            2010-05-26  [Irrigation].Apply(amount:152);
          Operations BAA
            2010-04-09  [Irrigation].Apply(amount:97);
            2010-05-06  [Irrigation].Apply(amount:154);
            2010-05-26  [Irrigation].Apply(amount:152);
          Operations CAA
            2010-04-09  [Irrigation].Apply(amount:52);
            2010-05-06  [Irrigation].Apply(amount:154);
            2010-05-26  [Irrigation].Apply(amount:152);
          Operations DAA
            2010-04-09  [Irrigation].Apply(amount:0);
            2010-05-06  [Irrigation].Apply(amount:154);
            2010-05-26  [Irrigation].Apply(amount:152);
          Operations ABA
            2010-04-09  [Irrigation].Apply(amount:150);
            2010-05-06  [Irrigation].Apply(amount:100);
            2010-05-26  [Irrigation].Apply(amount:152);
          Operations ACA
            2010-04-09  [Irrigation].Apply(amount:150);
            2010-05-06  [Irrigation].Apply(amount:54);
            2010-05-26  [Irrigation].Apply(amount:152);
          Operations ADA
            2010-04-09  [Irrigation].Apply(amount:150);
            2010-05-06  [Irrigation].Apply(amount:0);
            2010-05-26  [Irrigation].Apply(amount:152);
          Operations AAB
            2010-04-09  [Irrigation].Apply(amount:150);
            2010-05-06  [Irrigation].Apply(amount:154);
            2010-05-26  [Irrigation].Apply(amount:98);
          Operations AAC
            2010-04-09  [Irrigation].Apply(amount:150);
            2010-05-06  [Irrigation].Apply(amount:154);
            2010-05-26  [Irrigation].Apply(amount:53);
          Operations AAD
            2010-04-09  [Irrigation].Apply(amount:150);
            2010-05-06  [Irrigation].Apply(amount:154);
            2010-05-26  [Irrigation].Apply(amount:0);
          Operations ABB
            2010-04-09  [Irrigation].Apply(amount:150);
            2010-05-06  [Irrigation].Apply(amount:100);
            2010-05-26  [Irrigation].Apply(amount:99);
          Operations ACC
            2010-04-09  [Irrigation].Apply(amount:150);
            2010-05-06  [Irrigation].Apply(amount:54);
            2010-05-26  [Irrigation].Apply(amount:53);
          Operations ADD
            2010-04-09  [Irrigation].Apply(amount:150);
            2010-05-06  [Irrigation].Apply(amount:0);
            2010-05-26  [Irrigation].Apply(amount:0);
          Operations BAB
            2010-04-09  [Irrigation].Apply(amount:97);
            2010-05-06  [Irrigation].Apply(amount:154);
            2010-05-26  [Irrigation].Apply(amount:99);
          Operations CAC
            2010-04-09  [Irrigation].Apply(amount:52);
            2010-05-06  [Irrigation].Apply(amount:154);
            2010-05-26  [Irrigation].Apply(amount:53);
          Operations DAD
            2010-04-09  [Irrigation].Apply(amount:0);
            2010-05-06  [Irrigation].Apply(amount:154);
            2010-05-26  [Irrigation].Apply(amount:0);
          Operations BBA
            2010-04-09  [Irrigation].Apply(amount:97);
            2010-05-06  [Irrigation].Apply(amount:100);
            2010-05-26  [Irrigation].Apply(amount:152);
          Operations CCA
            2010-04-09  [Irrigation].Apply(amount:52);
            2010-05-06  [Irrigation].Apply(amount:54);
            2010-05-26  [Irrigation].Apply(amount:152);
          Operations DDA
            2010-04-09  [Irrigation].Apply(amount:0);
            2010-05-06  [Irrigation].Apply(amount:0);
            2010-05-26  [Irrigation].Apply(amount:152);
          Operations BBB
            2010-04-09  [Irrigation].Apply(amount:97);
            2010-05-06  [Irrigation].Apply(amount:100);
            2010-05-26  [Irrigation].Apply(amount:99);
          Operations CCC
            2010-04-09  [Irrigation].Apply(amount:52);
            2010-05-06  [Irrigation].Apply(amount:54);
            2010-05-26  [Irrigation].Apply(amount:53);
          Operations DDD
            2010-04-09  [Irrigation].Apply(amount:0);
            2010-05-06  [Irrigation].Apply(amount:0);
            2010-05-26  [Irrigation].Apply(amount:0);
      Simulation Konya09: Area=0; Slope=0
        Clock: StartDate=2009-11-12; EndDate=2010-07-30
        Summary summaryfile
        Weather: FileName=Konya.met
        SoilArbitrator Soil Arbitrator
        Zone paddock: Area=1; Slope=0
          Irrigation
          Fertiliser
          SurfaceOrganicMatter: same as Wagga.Wagga2013.Ketema2013.paddock.SurfaceOrganicMatter
          Plant Wheat: CropType=Wheat
          Operations CropSchedule
            2009-11-12  [Wheat].Sow(population:120, cultivar:"Gregory", depth:50, rowSpacing:135);
            2009-11-12  [Fertiliser].Apply(Amount: 80, Type: Fertiliser.Types.UreaN);
            2010-02-01  [Fertiliser].Apply(Amount: 80, Type: Fertiliser.Types.UreaN);
          Operations IrrigationSchedule
          MicroClimate: same as APS26.APS26NRate160WaterWet.paddock.MicroClimate
          Manager Calculations: same as APS26.APS26NRate160WaterWet.paddock.Calculations
          Report: same as APS26.APS26NRate160WaterWet.paddock.Report
          Soil: Site=Konya; NearestTown=Konya; Region=Central Anatolia; Country=Turkey; Latitude=0; Longitude=0
            Water
              Thickness  BD    AirDry  LL15   DUL    SAT
              150        1.56  0.05    0.118  0.253  0.411
              150        1.56  0.05    0.118  0.253  0.411
              300        1.58  0.05    0.114  0.256  0.403
              300        1.63  0.05    0.105  0.257  0.39
              300        1.63  0.05    0.105  0.257  0.39
              300        1.63  0.05    0.105  0.257  0.39
              300        1.63  0.05    0.105  0.257  0.39
              300        1.63  0.05    0.105  0.257  0.39
              SoilCrop Wheatsoil: LL=[0.118, 0.118, 0.114, 0.105, 0.11, 0.11, 0.11, 0.11]; KL=[0.06, 0.06, 0.04, 0.04, 0.04, 0.04, 0.02, 0.02]; XF=[1, 1, 1, 0.9, 0.9, 0.9, 0.9, 0.8]
            SoilWater: residueinterception=0; SummerDate=1-Nov; SummerU=6; SummerCona=3.5; WinterDate=1-Apr; WinterU=2; WinterCona=2; DiffusConst=44; DiffusSlope=16; Salb=0.13; CN2Bare=84; CNRed=20; CNCov=0.8; max_pond=0; Thickness=[150, 150, 300, 300, 300, 300, 300, 300]; SWCON=[0.5, 0.4, 0.3, 0.3, 0.2, 0.1, 0.1, 0.1]
            SoilNitrogen: fom_type=[default, manure, mucuna, lablab, shemp, stable]; fract_carb=[0.2, 0.3, 0.54, 0.57, 0.45, 0]; fract_cell=[0.7, 0.3, 0.37, 0.37, 0.47, 0.1]; fract_lign=[0.1, 0.4, 0.09, 0.06, 0.08, 0.9]; wfpsN2N2O_x=[22, 88]; wfpsN2N2O_y=[0.1, 1]
            SoilOrganicMatter: RootCN=45; RootWt=1500; SoilCN=12.5; EnrACoeff=7.4; EnrBCoeff=0.2; OCUnits=Total
              Thickness  OC   FBiom  FInert
              150        1    0.03   0.4
              150        0.5  0.02   0.6
              300        0.5  0.02   0.7
              300        0.5  0.02   0.8
              300        0.5  0.01   0.9
              300        0.5  0.01   0.9
              300        0.5  0.01   1
              300        0.5  0.01   1
            Analysis: Thickness=[150, 150, 300, 300, 300, 300, 300, 300]; PH=[7.9, 7.9, 7.9, 8, 8, 8, 8, 8]; PHUnits=Water; BoronUnits=HotWater
            InitialWater: PercentMethod=EvenlyDistributed; FractionFull=0.9
            Sample: Thickness=[2100]; NO3=[0.542]; NH4=[0]; SW=[0]; NO3Units=ppm; NH4Units=ppm; SWUnits=Volumetric; OCUnits=Total; PHUnits=Water
    Experiment Konya11
      Factors
        Factor Water: Specifications=[IrrigationSchedule]
          Operations AAA
            2012-04-16  [Irrigation].Apply(amount:100);
            2012-05-21  [Irrigation].Apply(amount:148);
            2012-06-08  [Irrigation].Apply(amount:161);
          Operations BAA
            2012-04-16  [Irrigation].Apply(amount:65);
            2012-05-21  [Irrigation].Apply(amount:148);
            2012-06-08  [Irrigation].Apply(amount:161);
          Operations CAA
            2012-04-16  [Irrigation].Apply(amount:35);
            2012-05-21  [Irrigation].Apply(amount:148);
            2012-06-08  [Irrigation].Apply(amount:161);
          Operations DAA
            2012-04-16  [Irrigation].Apply(amount:0);
            2012-05-21  [Irrigation].Apply(amount:148);
            2012-06-08  [Irrigation].Apply(amount:161);
          Operations ABA
            2012-04-16  [Irrigation].Apply(amount:100);
            2012-05-21  [Irrigation].Apply(amount:96);
            2012-06-08  [Irrigation].Apply(amount:161);
          Operations ACA
            2012-04-16  [Irrigation].Apply(amount:100);
            2012-05-21  [Irrigation].Apply(amount:52);
            2012-06-08  [Irrigation].Apply(amount:161);
          Operations ADA
            2012-04-16  [Irrigation].Apply(amount:100);
            2012-05-21  [Irrigation].Apply(amount:0);
            2012-06-08  [Irrigation].Apply(amount:161);
          Operations AAB
            2012-04-16  [Irrigation].Apply(amount:100);
            2012-05-21  [Irrigation].Apply(amount:148);
            2012-06-08  [Irrigation].Apply(amount:105);
          Operations AAC
            2012-04-16  [Irrigation].Apply(amount:100);
            2012-05-21  [Irrigation].Apply(amount:148);
            2012-06-08  [Irrigation].Apply(amount:56);
          Operations AAD
            2012-04-16  [Irrigation].Apply(amount:100);
            2012-05-21  [Irrigation].Apply(amount:148);
            2012-06-08  [Irrigation].Apply(amount:0);
          Operations ABB
            2012-04-16  [Irrigation].Apply(amount:100);
            2012-05-21  [Irrigation].Apply(amount:96);
            2012-06-08  [Irrigation].Apply(amount:105);
          Operations ACC
            2012-04-16  [Irrigation].Apply(amount:100);
            2012-05-21  [Irrigation].Apply(amount:52);
            2012-06-08  [Irrigation].Apply(amount:56);
          Operations ADD
            2012-04-16  [Irrigation].Apply(amount:100);
            2012-05-21  [Irrigation].Apply(amount:0);
            2012-06-08  [Irrigation].Apply(amount:0);
          Operations BAB
            2012-04-16  [Irrigation].Apply(amount:65);
            2012-05-21  [Irrigation].Apply(amount:148);
            2012-06-08  [Irrigation].Apply(amount:105);
          Operations CAC
            2012-04-16  [Irrigation].Apply(amount:35);
            2012-05-21  [Irrigation].Apply(amount:148);
            2012-06-08  [Irrigation].Apply(amount:56);
          Operations DAD
            2012-04-16  [Irrigation].Apply(amount:0);
            2012-05-21  [Irrigation].Apply(amount:148);
            2012-06-08  [Irrigation].Apply(amount:0);
          Operations BBA
            2012-04-16  [Irrigation].Apply(amount:65);
            2012-05-21  [Irrigation].Apply(amount:96);
            2012-06-08  [Irrigation].Apply(amount:161);
          Operations CCA
            2012-04-16  [Irrigation].Apply(amount:35);
            2012-05-21  [Irrigation].Apply(amount:52);
            2012-06-08  [Irrigation].Apply(amount:161);
          Operations DDA
            2012-04-16  [Irrigation].Apply(amount:0);
            2012-05-21  [Irrigation].Apply(amount:0);
            2012-06-08  [Irrigation].Apply(amount:161);
          Operations BBB
            2012-04-16  [Irrigation].Apply(amount:65);
            2012-05-21  [Irrigation].Apply(amount:96);
            2012-06-08  [Irrigation].Apply(amount:105);
          Operations CCC
            2012-04-16  [Irrigation].Apply(amount:35);
            2012-05-21  [Irrigation].Apply(amount:52);
            2012-06-08  [Irrigation].Apply(amount:56);
          Operations DDD
            2012-04-16  [Irrigation].Apply(amount:0);
            2012-05-21  [Irrigation].Apply(amount:0);
            2012-06-08  [Irrigation].Apply(amount:0);
      Simulation Konya11: Area=0; Slope=0
        Clock: StartDate=2011-11-16; EndDate=2012-07-30
        Summary summaryfile
        Weather: FileName=Konya.met
        SoilArbitrator Soil Arbitrator
        Zone paddock: Area=1; Slope=0
          Irrigation
          Fertiliser
          SurfaceOrganicMatter: same as Wagga.Wagga2013.Ketema2013.paddock.SurfaceOrganicMatter
          Plant Wheat: CropType=Wheat
          Operations CropSchedule
            2011-11-16  [Wheat].Sow(population:120, cultivar:"Gregory", depth:50, rowSpacing:135);
            2011-11-16  [Fertiliser].Apply(Amount: 80, Type: Fertiliser.Types.UreaN);
            2012-02-01  [Fertiliser].Apply(Amount: 80, Type: Fertiliser.Types.UreaN);
          Operations IrrigationSchedule
          MicroClimate: same as APS26.APS26NRate160WaterWet.paddock.MicroClimate
          Manager Calculations: same as APS26.APS26NRate160WaterWet.paddock.Calculations
          Report: same as APS26.APS26NRate160WaterWet.paddock.Report
          Soil: same as Konya.Konya09.Konya09.paddock.Soil
  Experiment 15TraitMod
    Factors
      Factor Cultivar: Specifications=[Sowing]
        Operations ega_gregory
          2015-05-21  [wheat].Sow(cultivar:"ega_gregory", population:150, depth:40, rowSpacing:250);
        Operations hartog
          2015-05-21  [wheat].Sow(cultivar:"hartog", population:150, depth:40, rowSpacing:250);
      Factor Management: Specifications=[Management]
        Operations IHN
          2015-05-21  [Fertiliser].Apply(Amount: 205, Type: Fertiliser.Types.Urea);
          2015-05-22  [Irrigation].Apply(amount:24);
          2015-06-26  [Irrigation].Apply(amount:25);
          2015-07-14  [Irrigation].Apply(amount:26);
          2015-07-31  [Irrigation].Apply(amount:26);
          2015-08-14  [Irrigation].Apply(amount:25);
          2015-08-26  [Irrigation].Apply(amount:25);
          2015-09-09  [Irrigation].Apply(amount:25);
        Operations ILN
          2015-05-21  [Fertiliser].Apply(Amount: 50, Type: Fertiliser.Types.Urea);
          2015-05-22  [Irrigation].Apply(amount:24);
          2015-06-26  [Irrigation].Apply(amount:25);
          2015-07-14  [Irrigation].Apply(amount:26);
          2015-07-31  [Irrigation].Apply(amount:26);
          2015-08-14  [Irrigation].Apply(amount:25);
          2015-08-26  [Irrigation].Apply(amount:25);
          2015-09-09  [Irrigation].Apply(amount:25);
        Operations RHN
          2015-05-21  [Fertiliser].Apply(Amount: 205, Type: Fertiliser.Types.Urea);
          2015-05-22  [Irrigation].Apply(amount:24);
          2015-06-26  [Irrigation].Apply(amount:25);
        Operations RLN
          2015-05-21  [Fertiliser].Apply(Amount: 50, Type: Fertiliser.Types.Urea);
          2015-05-22  [Irrigation].Apply(amount:24);
          2015-06-26  [Irrigation].Apply(amount:25);
    Simulation: Area=0; Slope=0
      Weather: FileName=gatton15g3.met
      Clock: StartDate=2015-05-19; EndDate=2015-11-17T01:00:00
      Summary
      SoilArbitrator
      Zone Field: Area=0; Slope=0
        Irrigation
        Fertiliser
        Soil: SoilType=Black Vertosol; Site=Lawes; NearestTown=Lawes, Q 4343; Region=Lockyer; State=Queensland; Country=Australia; NaturalVegetation=Blue Gum, Moreton Bay Ash, Tea Tree; ApsoilNumber=38; Latitude=-27.537; Longitude=152.336; LocationAccuracy=+-20m; DataSource=CSIRO Sustainable Ecosystems, Toowoomba
          Comments=Soil naming structure: \State\Region\Classification-Local Name (Site/district and locator number); oc and ph estimated
          Water: same as GattonRowSpacing.RowSpace.Field.Soil.Water
          SoilWater: same as GattonRowSpacing.RowSpace.Field.Soil.SoilWater
          SoilNitrogen: fom_type=[default, manure, mucuna, lablab, shemp, stable]; fract_carb=[0.2, 0.3, 0.54, 0.57, 0.45, 0]; fract_cell=[0.7, 0.3, 0.37, 0.37, 0.47, 0.1]; fract_lign=[0.1, 0.4, 0.09, 0.06, 0.08, 0.9]; wfpsN2N2O_x=[22, 88]; wfpsN2N2O_y=[0.1, 1]
          SoilOrganicMatter: same as GattonRowSpacing.RowSpace.Field.Soil.SoilOrganicMatter
          Analysis: Thickness=[150, 150, 300, 300, 300, 300, 300]; PH=[8, 8, 8, 8, 8, 8, 8]; PHUnits=Water; BoronUnits=HotWater
          InitialWater: PercentMethod=FilledFromTop; FractionFull=1; RelativeTo=LL15
          Sample Initial nitrogen: NO3Units=kgha; NH4Units=kgha; SWUnits=Volumetric; OCUnits=Total; PHUnits=Water
            Thickness  NO3  NH4
            200        20   1
            1800       12   1
        SurfaceOrganicMatter: same as APS26.APS26NRate160WaterWet.paddock.SurfaceOrganicMatter
        Plant wheat: CropType=Wheat
        Operations Sowing
          2015-05-21  [wheat].Sow(cultivar:"ega_gregory", population:150, depth:50, rowSpacing:250);
        MicroClimate: same as APS26.APS26NRate160WaterWet.paddock.MicroClimate
        Operations Management
          2015-05-21  [wheat].Sow(cultivar:"ega_gregory", population:150, depth:50, rowSpacing:250);
        Report: EventNames=[Clock].DoReport
          VariableNames:
            [Clock].Today
            Wheat.Phenology.CurrentPhaseName
            Wheat.Phenology.Stage
            Wheat.Phenology.Zadok.Stage
            Wheat.AboveGround.Wt
            Wheat.Leaf.LAI
            Wheat.Leaf.Live.Wt
            Wheat.Spike.Wt
            Wheat.Stem.Live.Wt
            Wheat.Structure.TotalStemPopn
            Wheat.Structure.MainStemPrimordiaNo
            Wheat.Structure.MainStemNodeNo
            Wheat.Structure.PlantTotalNodeNo
            Wheat.Grain.Number
            Wheat.Grain.Wt
            Wheat.WaterSupplyDemandRatio
            Wheat.Leaf.CoverTotal
            [Wheat].Leaf.SpecificArea
  Folder KCTrials
    Simulation Hermitage2009: Area=0; Slope=0
      Clock: StartDate=2009-06-01; EndDate=2009-11-30
      Summary summaryfile
      Weather: FileName=Hermitage2009.met
      SoilArbitrator Soil Arbitrator
      Zone Field: Area=1; Slope=0
        Irrigation
        Fertiliser
        Soil HRSField: SoilType=APS6Soil; LocalName=APS6Site; Site=APS6Site; NearestTown=Unknown; Region=Lawes; NaturalVegetation=Unknown; Latitude=0; Longitude=0
          Water
            Thickness  BD    AirDry  LL15  DUL   SAT
            150        1.03  0.28    0.33  0.56  0.61
            150        1.06  0.24    0.29  0.55  0.6
            300        1.06  0.24    0.29  0.55  0.6
            300        1.08  0.25    0.3   0.54  0.59
            300        1.11  0.26    0.31  0.53  0.58
            300        1.14  0.28    0.33  0.52  0.57
            300        1.17  0.3     0.35  0.51  0.55
            SoilCrop WheatSoil: LL=[0.33, 0.29, 0.29, 0.3, 0.31, 0.33, 0.35]; KL=[0.07, 0.07, 0.07, 0.05, 0.05, 0.03, 0.02]; XF=[1, 1, 1, 1, 1, 1, 1]
          SoilWater: same as APS6.APS6NRate0.paddock.APS6Field.SoilWater
          SoilNitrogen: fom_type=[default, manure, mucuna, lablab, shemp, stable]; fract_carb=[0.2, 0.3, 0.54, 0.57, 0.45, 0]; fract_cell=[0.7, 0.3, 0.37, 0.37, 0.47, 0.1]; fract_lign=[0.1, 0.4, 0.09, 0.06, 0.08, 0.9]; wfpsN2N2O_x=[22, 88]; wfpsN2N2O_y=[0.1, 1]
          SoilOrganicMatter: same as APS6.APS6NRate0.paddock.APS6Field.SoilOrganicMatter
          Analysis: Thickness=[150, 150, 300, 300, 300, 300, 300]; PH=[7.5, 8, 8, 8, 8, 8, 8]; PHUnits=Water; BoronUnits=HotWater
          Sample Initial Water: Thickness=[150, 150, 300, 300, 300, 300, 300]; SW=[0.56, 0.55, 0.55, 0.54, 0.53, 0.52, 0.51]; NO3Units=ppm; NH4Units=ppm; SWUnits=Volumetric; OCUnits=Total; PHUnits=Water
          Sample Initial Nitrogen: NO3Units=kgha; NH4Units=kgha; SWUnits=Volumetric; OCUnits=Total; PHUnits=Water
            Thickness  NO3   NH4
            150        50    1.3
            150        50    1
            300        0.25  1
            300        0.2   0.8
            300        0.1   0.8
            300        0.1   0.5
            300        0.1   0.5
        Manager SowingRule
          Cultivar = Hartog
```csharp
using System;
using Models.Core;
using Models.PMF;
namespace Models
{
           
	[Serializable] 
	[System.Xml.Serialization.XmlInclude(typeof(Model))]
	public class Script : Model
	{
	
		[Link] Plant Wheat;
		[Link] Clock Clock;
			
		[Description("Cultivar")]
		public String Cultivar { get; set; }
	
		
		private void OnDoManagement(object sender, EventArgs e)
		{
			if (Clock.Today.DayOfYear == 170)
			{
				Wheat.Sow(population: 100, cultivar: Cultivar, depth: 60, rowSpacing: 200);
				
			}
		}
	}
}
```
        SurfaceOrganicMatter: same as APS6.APS6NRate0.paddock.SurfaceOrganicMatter
        Plant Wheat: CropType=Wheat
        MicroClimate: same as APS26.APS26NRate160WaterWet.paddock.MicroClimate
        Report
          VariableNames:
            [Clock].Today
            [Wheat].Phenology.DaysAfterSowing.Value
            Wheat.Phenology.CurrentPhaseName
            Wheat.Phenology.Stage
            Wheat.Phenology.Zadok.Stage
            Wheat.AboveGround.Wt
            Wheat.Leaf.LAI
            Wheat.Leaf.Live.Wt
            Wheat.Spike.Wt
            Wheat.Stem.Live.Wt
            Wheat.Structure.TotalStemPopn
            Wheat.Structure.MainStemPrimordiaNo
            Wheat.Structure.MainStemNodeNo
            Wheat.Structure.PlantTotalNodeNo
            Wheat.Grain.Number
            Wheat.Grain.Wt
            Wheat.WaterSupplyDemandRatio
            Wheat.Leaf.CoverTotal
            [Wheat].Leaf.SpecificArea
            [Wheat].Leaf.CohortParameters.SpecificLeafAreaMax.Value
            [Wheat].Leaf.CohortParameters.SpecificLeafAreaMin.Value
          EventNames:
            [Clock].DoReport
        Operations IrrigationSchedule
          2009-08-12  [Irrigation].Apply(amount:29);
          2009-08-13  [Irrigation].Apply(amount:25);
          2009-09-29  [Irrigation].Apply(amount:32);
        Operations FertiliserSchedule
          2009-06-02  [Fertiliser].Apply(Amount: 152, Type: Fertiliser.Types.Urea);
    Simulation GattonStandard2010: Area=0; Slope=0
      Clock: StartDate=2010-05-06; EndDate=2010-10-31
      Summary summaryfile
      Weather: FileName=Gatton2010.met
      SoilArbitrator Soil Arbitrator
      Zone Field: Area=1; Slope=0
        Irrigation
        Fertiliser
        Soil LawesField: SoilType=APS6Soil; LocalName=APS6Site; Site=APS6Site; NearestTown=Unknown; Region=Lawes; NaturalVegetation=Unknown; Latitude=0; Longitude=0
          Water
            Thickness  BD    AirDry  LL15  DUL   SAT
            150        1.38  0.1     0.2   0.38  0.45
            150        1.38  0.168   0.21  0.38  0.45
            300        1.28  0.2     0.2   0.44  0.49
            300        1.38  0.19    0.19  0.4   0.45
            300        1.4   0.15    0.15  0.39  0.44
            300        1.46  0.2     0.2   0.4   0.45
            300        1.47  0.2     0.2   0.43  0.48
            SoilCrop WheatSoil: LL=[0.2, 0.21, 0.2, 0.19, 0.15, 0.32, 0.34]; KL=[0.06, 0.06, 0.06, 0.04, 0.04, 0.02, 0.02]; XF=[1, 1, 1, 1, 1, 1, 1]
          SoilWater: residueinterception=0; SummerDate=1-Nov; SummerU=6; SummerCona=3.5; WinterDate=1-Apr; WinterU=6; WinterCona=3.5; DiffusConst=88; DiffusSlope=35.4; Salb=0.13; CN2Bare=91; CNRed=20; CNCov=0.8; slope=0; discharge_width=0; catchment_area=0; max_pond=0
            Thickness  SWCON  KLAT
            150        0.3    0
            150        0.3    0
            300        0.3    0
            300        0.3    0
            300        0.3    0
            300        0.3    0
            300        0.3    0
          SoilNitrogen: fom_type=[default, manure, mucuna, lablab, shemp, stable]; fract_carb=[0.2, 0.3, 0.54, 0.57, 0.45, 0]; fract_cell=[0.7, 0.3, 0.37, 0.37, 0.47, 0.1]; fract_lign=[0.1, 0.4, 0.09, 0.06, 0.08, 0.9]; wfpsN2N2O_x=[22, 88]; wfpsN2N2O_y=[0.1, 1]
          SoilOrganicMatter: same as APS6.APS6NRate0.paddock.APS6Field.SoilOrganicMatter
          Analysis: Thickness=[150, 150, 300, 300, 300, 300, 300]; PH=[7.5, 8, 8, 8, 8, 8, 8]; PHUnits=Water; BoronUnits=HotWater
          Sample Initial Water: Thickness=[150, 150, 300, 300, 300, 300, 300]; SW=[0.38, 0.38, 0.44, 0.4, 0.39, 0.4, 0.43]; NO3Units=ppm; NH4Units=ppm; SWUnits=Volumetric; OCUnits=Total; PHUnits=Water
          Sample Initial Nitrogen: NO3Units=kgha; NH4Units=kgha; SWUnits=Volumetric; OCUnits=Total; PHUnits=Water
            Thickness  NO3  NH4
            150        100  1.3
            150        50   1
            300        20   1
            300        20   0.8
            300        20   0.8
            300        20   0.5
            300        20   0.5
        SurfaceOrganicMatter: same as APS6.APS6NRate0.paddock.SurfaceOrganicMatter
        Plant Wheat: CropType=Wheat
        MicroClimate: same as APS26.APS26NRate160WaterWet.paddock.MicroClimate
        Operations IrrigationSchedule
          2010-05-28  [Irrigation].Apply(amount:25);
          2010-07-22  [Irrigation].Apply(amount:35);
          2010-10-05  [Irrigation].Apply(amount:60);
        Manager SowingRule
          Cultivar = Hartog
```csharp
using System;
using Models.Core;
using Models.PMF;
namespace Models
{
           
	[Serializable] 
	[System.Xml.Serialization.XmlInclude(typeof(Model))]
	public class Script : Model
	{
	
		[Link] Plant Wheat;
		[Link] Clock Clock;
			
		[Description("Cultivar")]
		public String Cultivar { get; set; }
		[EventSubscribe("DoManagement")]
		private void OnDoManagement(object sender, EventArgs e)
		{
			if (Clock.Today.DayOfYear == 148)
			{
				Wheat.Sow(population: 100, cultivar: Cultivar, depth: 50, rowSpacing: 250);
			}
		}


	}
}
```
        Report
          VariableNames:
            [Clock].Today
            Wheat.Phenology.CurrentPhaseName
            Wheat.Phenology.Stage
            Wheat.Phenology.Zadok.Stage
            Wheat.AboveGround.Wt
            Wheat.Leaf.LAI
            Wheat.Leaf.Live.Wt
            Wheat.Spike.Wt
            Wheat.Stem.Live.Wt
            Wheat.Structure.TotalStemPopn
            Wheat.Structure.MainStemPrimordiaNo
            Wheat.Structure.MainStemNodeNo
            Wheat.Structure.PlantTotalNodeNo
            Wheat.Grain.Number
            Wheat.Grain.Wt
            Wheat.WaterSupplyDemandRatio
            [Wheat].Leaf.SpecificArea
            [Wheat].Leaf.CohortParameters.SpecificLeafAreaMax.Value
            [Wheat].Leaf.CohortParameters.SpecificLeafAreaMin.Value
          EventNames:
            [Clock].DoReport
    Simulation GattonLate2010: Area=0; Slope=0
      Clock: StartDate=2010-07-16; EndDate=2010-12-15
      Summary summaryfile
      Weather: FileName=Gatton2010Late.met
      SoilArbitrator Soil Arbitrator
      Zone Field: Area=1; Slope=0
        Irrigation
        Fertiliser
        Soil CSIROField: SoilType=APS6Soil; LocalName=APS6Site; Site=APS6Site; NearestTown=Unknown; Region=Lawes; NaturalVegetation=Unknown; Latitude=0; Longitude=0
          SoilWater: same as KCTrials.GattonStandard2010.Field.LawesField.SoilWater
          SoilNitrogen: fom_type=[default, manure, mucuna, lablab, shemp, stable]; fract_carb=[0.2, 0.3, 0.54, 0.57, 0.45, 0]; fract_cell=[0.7, 0.3, 0.37, 0.37, 0.47, 0.1]; fract_lign=[0.1, 0.4, 0.09, 0.06, 0.08, 0.9]; wfpsN2N2O_x=[22, 88]; wfpsN2N2O_y=[0.1, 1]
          SoilOrganicMatter: same as APS6.APS6NRate0.paddock.APS6Field.SoilOrganicMatter
          Analysis: Thickness=[150, 150, 300, 300, 300, 300, 300]; PH=[7.5, 8, 8, 8, 8, 8, 8]; PHUnits=Water; BoronUnits=HotWater
          Sample Initial Water: Thickness=[150, 150, 300, 300, 300, 300, 300]; SW=[0.38, 0.38, 0.44, 0.4, 0.39, 0.4, 0.43]; NO3Units=ppm; NH4Units=ppm; SWUnits=Volumetric; OCUnits=Total; PHUnits=Water
          Sample Initial Nitrogen: NO3Units=kgha; NH4Units=kgha; SWUnits=Volumetric; OCUnits=Total; PHUnits=Water
            Thickness  NO3  NH4
            150        100  1.3
            150        50   1
            300        20   1
            300        20   0.8
            300        20   0.8
            300        20   0.5
            300        20   0.5
          Water: same as KCTrials.GattonStandard2010.Field.LawesField.Water
        SurfaceOrganicMatter: same as APS6.APS6NRate0.paddock.SurfaceOrganicMatter
        Plant Wheat: CropType=Wheat
        MicroClimate: same as APS26.APS26NRate160WaterWet.paddock.MicroClimate
        Manager SowingRule
          Cultivar = Hartog
```csharp
using System;
using Models.Core;
using Models.PMF;
namespace Models
{
           
	[Serializable] 
	[System.Xml.Serialization.XmlInclude(typeof(Model))]
	public class Script : Model
	{
	
		[Link] Plant Wheat;
		[Link] Clock Clock;
			
		[Description("Cultivar")]
		public String Cultivar { get; set; }
		[EventSubscribe("DoManagement")]
		private void OnDoManagement(object sender, EventArgs e)
		{
			if (Clock.Today.DayOfYear == 214)
			{
				Wheat.Sow(population: 100, cultivar: Cultivar, depth: 50, rowSpacing: 250);
				
			}
		}


	}
}
```
        Report: same as KCTrials.GattonStandard2010.Field.Report
    Simulation Hermitage2011: Area=0; Slope=0
      Clock: StartDate=2011-06-16; EndDate=2011-12-12
      Summary summaryfile
      Weather: FileName=Hermitage2011.met
      SoilArbitrator Soil Arbitrator
      Zone Field: Area=1; Slope=0
        Irrigation
        Fertiliser
        Soil HRSField: SoilType=APS6Soil; LocalName=APS6Site; Site=APS6Site; NearestTown=Unknown; Region=Lawes; NaturalVegetation=Unknown; Latitude=0; Longitude=0
          SoilWater: same as KCTrials.GattonStandard2010.Field.LawesField.SoilWater
          SoilNitrogen: fom_type=[default, manure, mucuna, lablab, shemp, stable]; fract_carb=[0.2, 0.3, 0.54, 0.57, 0.45, 0]; fract_cell=[0.7, 0.3, 0.37, 0.37, 0.47, 0.1]; fract_lign=[0.1, 0.4, 0.09, 0.06, 0.08, 0.9]; wfpsN2N2O_x=[22, 88]; wfpsN2N2O_y=[0.1, 1]
          SoilOrganicMatter: same as APS6.APS6NRate0.paddock.APS6Field.SoilOrganicMatter
          Analysis: Thickness=[150, 150, 300, 300, 300, 300, 300]; PH=[7.5, 8, 8, 8, 8, 8, 8]; PHUnits=Water; BoronUnits=HotWater
          Sample Initial Water: Thickness=[150, 150, 300, 300, 300, 300, 300]; SW=[0.56, 0.55, 0.55, 0.54, 0.53, 0.52, 0.51]; NO3Units=ppm; NH4Units=ppm; SWUnits=Volumetric; OCUnits=Total; PHUnits=Water
          Sample Initial Nitrogen: NO3Units=kgha; NH4Units=kgha; SWUnits=Volumetric; OCUnits=Total; PHUnits=Water
            Thickness  NO3  NH4
            150        100  1.3
            150        50   1
            300        20   1
            300        20   0.8
            300        20   0.8
            300        20   0.5
            300        20   0.5
          Water: same as KCTrials.Hermitage2009.Field.HRSField.Water
        SurfaceOrganicMatter: same as APS6.APS6NRate0.paddock.SurfaceOrganicMatter
        Plant Wheat: CropType=Wheat
        MicroClimate: same as APS26.APS26NRate160WaterWet.paddock.MicroClimate
        Manager SowingRule
          Cultivar = Hartog
```csharp
using System;
using Models.Core;
using Models.PMF;
namespace Models
{
           
	[Serializable] 
	[System.Xml.Serialization.XmlInclude(typeof(Model))]
	public class Script : Model
	{
	
		[Link] Plant Wheat;
		[Link] Clock Clock;
			
		[Description("Cultivar")]
		public String Cultivar { get; set; }
		[EventSubscribe("DoManagement")]
		private void OnDoManagement(object sender, EventArgs e)
		{
			if (Clock.Today.DayOfYear == 181)
			{
				Wheat.Sow(population: 100, cultivar: Cultivar, depth: 60, rowSpacing: 200);
			
			}
		}
	}


}
```
        Report: same as KCTrials.GattonStandard2010.Field.Report
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