Simulations: Area=0
  Simulation Test: Area=0
    WeatherFile: FileName=Goondiwindi.met
    Clock: StartDate=1940-01-01; EndDate=1940-12-31
    Summary
    Zone Field: Area=0
      Report: Events=[Clock].EndOfDay
        Variables:
          [Clock].Today
          [WeatherFile].DayLength
          [WeatherFile].MaxT
          [WeatherFile].MinT
          [WeatherFile].Radn
          [WeatherFile].Rain
          [SoilWater].sw_dep
          [SoilNitrogen].no3
          [SurfaceOrganicMatter].surfaceom_wt
          [Plant].Phenology.StageCode.FunctionValue
          [Plant].Structure.Population
          [Plant].Leaf.LAI
          [Plant].Leaf.CoverGreen
          [Plant].Leaf.Live.Wt
          [Plant].Stem.Live.Wt
          [Plant].Tuber.Live.Wt
          [Plant].Root.Live.Wt
          [Plant].Leaf.Live.N
          [Plant].Stem.Live.N
          [Plant].Tuber.Live.N
          [Plant].Root.Live.N
      Manager Script
```csharp
        using System;
        using Models.Core;
        using Models.PMF;
        namespace Models
        {
            public class Script : Model
            {      
               // Links
               [Link] Plant Plant;
               [Link] Clock Clock;
               [EventSubscribe("StartOfDay")]
               private void OnStartOfDay(object sender, EventArgs e)
               {
				if(Clock.Today.DayOfYear == 3)
					Plant.Sow(new SowPlant2Type() {Population = 100, Cultivar = "Russet_Burbank"});
               }
            }
        }
```
      Soil: SoilType=Black Vertosol; LocalName=Waco; Site=Jimbour; NearestTown=Jimbour, Q 4352; Region=South East Queensland; NaturalVegetation=Grassland, mainly Qld bluegrass; Latitude=0; Longitude=0
        Water
          Thickness  BD    AirDry  LL15  DUL   SAT
          150        1.02  0.15    0.29  0.54  0.59
          150        1.03  0.26    0.29  0.53  0.58
          300        1.02  0.29    0.29  0.54  0.59
          300        1.02  0.29    0.29  0.54  0.58
          300        1.06  0.3     0.3   0.52  0.57
          300        1.11  0.31    0.31  0.5   0.55
          300        1.12  0.32    0.32  0.5   0.55
          300        1.15  0.33    0.33  0.48  0.53
          300        1.18  0.34    0.34  0.47  0.52
          300        1.2   0.35    0.35  0.46  0.51
          300        1.25  0.36    0.36  0.44  0.49
          SoilCrop Wheat
            LL=[0.29, 0.29, 0.32, 0.38, 0.39, 0.39, 0.41, 0.48, 0.47, 0.46, 0.44]
            KL=[0.1, 0.1, 0.08, 0.06, 0.04, 0.02, 0.01, 0, 0, 0, 0]
            XF=[1, 1, 1, 1, 1, 1, 1, 0, 0, 0, 0]
          SoilCrop Barley
            LL=[0.29, 0.29, 0.36, 0.43, 0.51, 0.5, 0.5, 0.48, 0.47, 0.46, 0.44]
            KL=[0.1, 0.1, 0.08, 0.06, 0.04, 0.02, 0.01, 0, 0, 0, 0]
            XF=[1, 1, 1, 1, 1, 1, 1, 0, 0, 0, 0]
          SoilCrop Potato
            LL=[0.29, 0.29, 0.36, 0.43, 0.51, 0.5, 0.5, 0.48, 0.47, 0.46, 0.44]
            KL=[0.1, 0.1, 0.08, 0.06, 0.04, 0.02, 0.01, 0, 0, 0, 0]
            XF=[1, 1, 1, 1, 1, 1, 1, 0, 0, 0, 0]
        SoilWater: min_crit_temp=5; max_crit_temp=35; max_albedo=0.23; A_to_evap_fact=0.44; canopy_eos_coef=1.7; sw_top_crit=0.9; sumes1_max=100; sumes2_max=25; solute_flow_eff=[1]; solute_flux_eff=[1]; gravity_gradient=2E-05; specific_bd=2.65; hydrol_effective_depth=450; immobile_solutes=[nh4]; canopy_fact=[1, 1, 0, 0]; canopy_fact_height=[0, 600, 1800, 30000]; canopy_fact_default=0.5; act_evap_method=ritchie; irrigation_will_runoff=0; irrigation_layer=0; SummerCona=3; SummerU=6; SummerDate=1-Nov; WinterCona=3; WinterU=6; WinterDate=1-Apr; DiffusConst=40; DiffusSlope=16; Salb=0.13; slope=0; discharge_width=0; catchment_area=0; eos=5.84087; max_pond=0; CN2Bare=73; CNRed=20; CNCov=0.8
          Thickness  SWCON  KLAT
          150        0.3    0
          150        0.3    0
          300        0.3    0
          300        0.3    0
          300        0.3    0
          300        0.3    0
          300        0.3    0
          300        0.3    0
          300        0.3    0
          300        0.3    0
          300        0.3    0
          mobile_solutes=[no3, urea, cl, br, org_n, org_c_pool1, org_c_pool2, org_c_pool3]
        SoilNitrogen: NPartitionApproach=BasedOnLayerConcentration; wnmm_n_alpha=0.002; wnmm_dn_alpha=0.5; nemis_dn_km=22; nemis_dn_pot=7.194; cent_n_soilt_ave=15; cent_n_maxt_ave=25; cent_n_wfps_ave=0.7; cent_n_max_rate=0.1; ini_FOMtype=default; fom_type=[default, manure, mucuna, lablab, shemp, stable]; fract_carb=[0.2, 0.3, 0.54, 0.57, 0.45, 0]; fract_cell=[0.7, 0.3, 0.37, 0.37, 0.47, 0.1]; fract_lign=[0.1, 0.4, 0.09, 0.06, 0.08, 0.9]; ef_res=0.4; fr_res_biom=0.9; min_depth=100; rd_carb=[0.2, 0.1]; rd_cell=[0.05, 0.25]; rd_lign=[0.0095, 0.003]; ef_fom=0.4; fr_fom_biom=0.9; cnrf_coeff=0.693; cnrf_optcn=25; rd_biom=[0.0081, 0.004]; ef_biom=0.4; fr_biom_biom=0.6; rd_hum=[0.00015, 7E-05]; ef_hum=0.4; opt_temp=[32, 32]; wfmin_index=[0, 0.5, 1, 2]; wfmin_values=[0, 1, 1, 0.5]; soiltype=standard; allow_simpleSoilTemp=no; profile_reduction=no; use_organic_solutes=no; c_in_fom=0.4; minPatchArea=1; mcn=8; root_depth=3000; root_cn_pool=[40, 40, 40]
          zero: n2o_approach, ureappm_min, nh4ppm_min, no3ppm_min, fom_min, oc2om_factor, ini_pH, WarningThreshold, FatalThreshold, potHydrol_min, potHydrol_parmA, potHydrol_parmB, potHydrol_parmC, potHydrol_parmD, nitrification_pot, nh4_at_half_pot, dnit_rate_coeff, dnit_nitrf_loss, dnit_k1, dnit_wf_power, actC_parmB, actC_parmA, N2N2O_parmA, N2N2O_parmB
        SoilOrganicMatter: RootCN=40; RootWt=200; SoilCN=12.5; EnrACoeff=7.4; EnrBCoeff=0.2; OCUnits=Total
          Thickness  OC    FBiom  FInert
          150        1.04  0.025  0.4
          150        0.89  0.02   0.6
          300        0.89  0.015  0.8
          300        0.89  0.01   0.9
          300        0.77  0.01   0.95
          300        0.45  0.01   0.95
          300        0.27  0.01   0.95
          300        0.22  0.01   0.95
          300        0.16  0.01   0.95
          300        0.13  0.01   0.95
          300        0.12  0.01   0.95
        Analysis: PHUnits=Water; BoronUnits=HotWater
          Thickness  EC    PH
          150        0.2   8.4
          150        0.25  8.8
          300        0.31  9
          300        0.4   9.2
          300        0.59  9.2
          300        0.84  9.1
          300        0.93  9
          300        1.01  9
          300        1.06  8.9
          300        1.05  8.9
          300        1.01  8.9
        InitialWater Initial water: FractionFull=1; PercentMethod=FilledFromTop
        Sample: NO3Units=ppm; NH4Units=ppm; SWUnits=Volumetric; OCUnits=Total; PHUnits=Water
          Thickness  NO3     NH4
          150        1116.5  0.599004
          150        2.101   0.100001
          300        2.101   0.100001
          300        1.701   0.100001
          300        1.701   0.100001
          300        1.701   0.100001
          300        1.701   0.100001
          300        1.701   0.100001
          300        1.701   0.100001
          300        1.701   0.100001
          300        1.701   0.100001
      SurfaceOrganicMatter: crit_residue_wt=2000; opt_temp=20; cum_eos_max=20; cnrf_coeff=0.277; cnrf_optcn=25; c_fract=0.4; leach_rain_tot=25; min_rain_to_leach=10; crit_min_surfom_orgC=0.004; default_cpr=0; default_standing_fraction=0; standing_extinct_coeff=0.5; fractionFaecesAdded=0.5; PoolName=wheat; type=wheat; mass=1000; standing_fraction=0; cnr=80
        ResidueTypes:
          {Name=wheat, fraction_C=0.08, po4ppm=10, nh4ppm=10, no3ppm=10, specific_area=0.0001, cf_contrib=1, pot_decomp_rate=0.1, fr_c=[0.3, 0.3, 0.4], fr_n=[0.3, 0.3, 0.4], fr_p=[0.3, 0.3, 0.4]}
      MicroClimate: air_pressure=1010; soil_emissivity=0.96; sun_angle=15; soil_heat_flux_fraction=0.4; night_interception_fraction=0.5; windspeed_default=3; refheight=2; albedo=0.3; emissivity=0.96; gsmax=0.01; r50=200; soil_heat=-2.199; dryleaffraction=1; a_interception=0; b_interception=1; c_interception=0; d_interception=0; soil_albedo=0.3
        ComponentData Potato
      Plant Potato: CropType=Potato
        Arbitrator={NArbitrationOption=PriorityThenRelativeAllocation, DMArbitrationOption=RelativeAllocation}
        Phenology={Dormant={{http://www.w3.org/2001/XMLSchema-instance}type=GenericPhase, Name=Dormant, Start=Planting, End=Peeping, ThermalTime=[{X=[2, 20, 35], Y=[0, 18, 0]}], Target={{http://www.w3.org/2001/XMLSchema-instance}type=Constant, Value=1}}, Sprouting={{http://www.w3.org/2001/XMLSchema-instance}type=EmergingPhase, Name=Sprouting, Start=Peeping, End=Emergence, ThermalTime=[{X=[2, 20, 35], Y=[0, 18, 0]}], ShootLag=72, ShootRate=1.35}, Vegetative={{http://www.w3.org/2001/XMLSchema-instance}type=GenericPhase, Name=Vegetative, Start=Emergence, End=TuberInitiation, ThermalTime=[{X=[2, 20, 35], Y=[0, 18, 0]}], Target={{http://www.w3.org/2001/XMLSchema-instance}type=Constant, Value=300}}, EarlyTuber={{http://www.w3.org/2001/XMLSchema-instance}type=LeafAppearancePhase, Name=EarlyTuber, Start=TuberInitiation, End=FinalLeaf, ThermalTime=[{X=[2, 20, 35], Y=[0, 18, 0]}], RemainingLeaves=0}, LateTuber={{http://www.w3.org/2001/XMLSchema-instance}type=LeafDeathPhase, Name=LateTuber, Start=FinalLeaf, End=FullSenescence, ThermalTime=[{X=[2, 20, 35], Y=[0, 18, 0]}]}, Senesced={{http://www.w3.org/2001/XMLSchema-instance}type=GenericPhase, Name=Senesced, Start=FullSenescence, End=Maturity, ThermalTime=[{X=[2, 20, 35], Y=[0, 18, 0]}], Target={{http://www.w3.org/2001/XMLSchema-instance}type=Constant, Value=200}}, Maturity={{http://www.w3.org/2001/XMLSchema-instance}type=EndPhase, Name=Maturity, Start=Maturity, End=Unused, ThermalTime=[{X=[2, 20, 35], Y=[0, 18, 0]}]}, StageCode={{http://www.w3.org/2001/XMLSchema-instance}type=StageBasedInterpolation, Name=StageCode, Stages=[Planting, Peeping, Emergence, TuberInitiation, FinalLeaf, FullSenescence, Maturity], Values=[1, 2, 3, 4, 5, 6, 7]}}
        Structure={PrimaryBudNo=1, InitialiseStage=Emergence, ThermalTime=[{X=[2, 20, 35], Y=[0, 18, 0]}], MainStemPrimordiaInitiationRate={{http://www.w3.org/2001/XMLSchema-instance}type=PhaseLookupValue, Start=Emergence, End=FinalLeaf}, MainStemNodeAppearanceRate={{http://www.w3.org/2001/XMLSchema-instance}type=PhaseLookupValue, Start=Emergence, End=FinalLeaf, Memo=Determines how quickly nodes appear}, MainStemFinalNodeNumber={{http://www.w3.org/2001/XMLSchema-instance}type=Constant, Value=34}, HeightModel={{http://www.w3.org/2001/XMLSchema-instance}type=LinearInterpolationFunction, XProperty=[Stem].Live.Wt, XYPairs={X=[0, 200, 1200, 4000], Y=[20, 300, 700, 900]}}, BranchingRate=[[{{http://www.w3.org/2001/XMLSchema-instance}type=LinearInterpolationFunction, XProperty=[Structure].MainStemNodeNo, XYPairs={X=[0, 7, 8, 13, 14, 34], Y=[0, 0, 0.5, 0.5, 0, 0]}}, {{http://www.w3.org/2001/XMLSchema-instance}type=LinearInterpolationFunction, XProperty=[Leaf].CoverGreen, XYPairs={X=[0, 0.4, 0.55, 0.8, 1], Y=[1, 1, 0.45, 0, 0]}}]], ShadeInducedBranchMortality={{http://www.w3.org/2001/XMLSchema-instance}type=Constant, Value=0}, DroughtInducedBranchMortality={{http://www.w3.org/2001/XMLSchema-instance}type=Constant, Value=0}}
        Summariser={AboveGround=[[[Leaf].Live, [Leaf].Dead, [Stem].Live, [Stem].Dead]], BelowGround=[[[Root].Live, [Root].Dead, [Tuber].Live, [Tuber].Dead]], Total=[[[Leaf].Live, [Leaf].Dead, [Stem].Live, [Stem].Dead, [Root].Live, [Root].Dead, [Tuber].Live, [Tuber].Dead]]}
        GenericAboveGroundOrgan Tuber
          Memo:
            This organ inherits from SIRIUSGeneric organ so has the same 6 optional paramaters and default values for these paramaters.
            In addition this organ has a relative growth rate variable and a tubers per stem variable.  These are used to calculate DM demand in the tubers.  This differs from the generic organ that uses a pratitioning fraction to calculate DM demand.
          NitrogenDemandSwitch={{http://www.w3.org/2001/XMLSchema-instance}type=LinearInterpolationFunction, XProperty=[Leaf].LAI, XYPairs={X=[0, 0.02, 0.0201, 10], Y=[0, 0, 1, 1]}, Memo=This turns of N demand after the canopy has fully senesed to stop the tubers from taking up N after canopy death}
          StructuralFraction={{http://www.w3.org/2001/XMLSchema-instance}type=Constant, Value=1, Memo=Demand for DM is based on demand to grow structural components.  If the structural fraction is less than 1 the organ has the capacity to accumulate Non-structural biomass.  The lower the number the greater the capacity.  However, the arbitrator will only partition biomass to non-structural pools after all structural and metabolic DM demands have been met so the Non-Structural DM proportion of the organ may be less smaller that 1 - StructuralFraction.}
          DMDemandFunction={{http://www.w3.org/2001/XMLSchema-instance}type=PotentialSizeDemandFunction, StartStageName=TuberInitiation, EndStageName=Maturity, PotentialGrowthIncrement={{http://www.w3.org/2001/XMLSchema-instance}type=LinearInterpolationFunction, XProperty=[Phenology].StageCode.FunctionValue, XYPairs={X=[4, 4.04, 4.32, 4.52, 4.95, 6.54], Y=[0.017, 0.017, 0.06, 0.06, 0.018, 0]}, Memo=This is potential growth rate of tubers in g/degree day}, OrganNumber=[{Memo=Multiplies the values of the children of this node, Function=[{{http://www.w3.org/2001/XMLSchema-instance}type=Constant, Value=5}, {{http://www.w3.org/2001/XMLSchema-instance}type=VariableReference, VariableName=[Structure].MainStemPopn}]}], ThermalTime=[{X=[2, 20, 35], Y=[0, 18, 0]}], AccumThermalTime={{http://www.w3.org/2001/XMLSchema-instance}type=AccumulateFunction, StartStageName=TuberInitiation, EndStageName=Maturity, Memo=Sum the values of the children of this node and accumulate daily between the start and end stages}}
          WaterContent={{http://www.w3.org/2001/XMLSchema-instance}type=LinearInterpolationFunction, XProperty=[Phenology].StageCode.FunctionValue, XYPairs={X=[3, 4, 4.1, 4.7, 5.4, 6], Y=[0, 0, 0.1, 0.16, 0.2, 0.22]}, Memo=The relative growth rate is used to set the DM demand of each tuber}
          MaximumNConc={{http://www.w3.org/2001/XMLSchema-instance}type=LinearInterpolationFunction, XProperty=[Phenology].StageCode.FunctionValue, XYPairs={X=[3, 4, 5, 6], Y=[0.023, 0.023, 0.018, 0.015]}, Memo=The relative growth rate is used to set the DM demand of each tuber}
          MinimumNConc={{http://www.w3.org/2001/XMLSchema-instance}type=LinearInterpolationFunction, XProperty=[Phenology].StageCode.FunctionValue, XYPairs={X=[4, 4.1, 7], Y=[0.02, 0.006, 0.006]}, Memo=This is the highest N concentration that the organ can achieve.  This sets the upper limit to N demand and includes essential and Luxury N demands.  Essential N demand is set by the MinimumNConc of the organ.  Luxary N Demand is N is set by Live.Wt * (MaximumNConc - MinimumNConc) and is N the organ may take up in surples to its growth requirements and store in its Non-Structural pool for reallocation -}
        Root: Live=[[[Root].LayerLive]]; Dead=[[[Root].LayerDead]]; InitialDM=5; SpecificRootLength=40000; KNO3=0.02; KNH4=0.0
          NitrogenDemandSwitch={{http://www.w3.org/2001/XMLSchema-instance}type=PhaseBasedSwitch, Start=Planting, End=FinalLeaf, Memo=Stops the roots from demanding Nitrogen after final leaf stage}
          SenescenceRate={{http://www.w3.org/2001/XMLSchema-instance}type=LinearInterpolationFunction, XProperty=[Leaf].FractionDied, XYPairs={X=[0, 1], Y=[0, 0.1]}}
          TemperatureEffect:
            {X=[0, 26, 35], Y=[1, 1, 1]}
          RootFrontVelocity=[[{{http://www.w3.org/2001/XMLSchema-instance}type=PhaseLookupValue, Start=Peeping, End=FinalLeaf}]]
          PartitionFraction=[[{{http://www.w3.org/2001/XMLSchema-instance}type=PhaseLookupValue, Start=Emergence, End=TuberInitiation}, {{http://www.w3.org/2001/XMLSchema-instance}type=PhaseLookupValue, Start=TuberInitiation, End=FinalLeaf}, {{http://www.w3.org/2001/XMLSchema-instance}type=PhaseLookupValue, Start=FinalLeaf, End=FullSenescence}]]
          MaximumNConc={{http://www.w3.org/2001/XMLSchema-instance}type=Constant, Value=0.01, Memo=This is the highest N concentration that the organ can achieve.  This sets the upper limit to N demand and includes essential and Luxury N demands.  Essential N demand is set by the MinimumNConc of the organ.  Luxary N Demand is N is set by Live.Wt * (MaximumNConc - MinimumNConc) and is N the organ may take up in surples to its growth requirements and store in its Non-Structural pool for reallocation -}
          MaxDailyNUptake={{http://www.w3.org/2001/XMLSchema-instance}type=LinearInterpolationFunction, XProperty=[Root].Length, XYPairs={X=[0, 0.02], Y=[0, 6]}}
          MinimumNConc={{http://www.w3.org/2001/XMLSchema-instance}type=Constant, Value=0.01, Memo=The MinimumNconc determins the organs essential N demand.  Essential N Demand is N is set by Live.Wt * MinimumNConc and is N the organ must take up to achieve its potential growth.  If the organ is not supplied with sufficient N to maintain MinimunNConc its growth will be constrained by the arbitrator.  All N taken up to MinimunNConc is placed in the StructuralPool and is not mobile}
          KLModifier={{http://www.w3.org/2001/XMLSchema-instance}type=LinearInterpolationFunction, XProperty=[Leaf].LAI, XYPairs={X=[0, 3], Y=[1, 1]}}
          SoilWaterEffect={{http://www.w3.org/2001/XMLSchema-instance}type=Constant, Value=1.0}
        Leaf: Live=[[[Leaf].CohortLive]]; Dead=[[[Leaf].CohortDead]]; KDead=.03; MaxCover=1.0; Total=[[[Leaf].Live, [Leaf].Dead]]
          InitialLeaf:
            Rank  Area
            1     900
            2     600
            3     300
          LeafCohortParameters={MaxArea={{http://www.w3.org/2001/XMLSchema-instance}type=LinearInterpolationFunction, XProperty=[Structure].RelativeNodeApperance, XYPairs={X=[0, 0.15, 0.3, 0.44, 0.59, 0.73], Y=[2000, 18000, 27000, 15000, 6000, 1500]}, Memo=Gives the size of individual leaves when they are fully expanded (mm2)}, GrowthDuration={{http://www.w3.org/2001/XMLSchema-instance}type=LinearInterpolationFunction, XProperty=[Structure].RelativeNodeApperance, XYPairs={X=[0, 0.3, 0.4, 1], Y=[200, 400, 400, 400]}, Memo=Gives the size of individual leaves when they are fully expanded (mm2)}, LagDuration={{http://www.w3.org/2001/XMLSchema-instance}type=LinearInterpolationFunction, XProperty=[Structure].RelativeNodeApperance, XYPairs={X=[0, 0.15, 0.3, 0.4, 0.73, 1], Y=[350, 350, 350, 350, 350, 20]}, Memo=Gives the size of individual leaves when they are fully expanded (mm2)}, SenescenceDuration={{http://www.w3.org/2001/XMLSchema-instance}type=LinearInterpolationFunction, XProperty=[Structure].RelativeNodeApperance, XYPairs={X=[0, 0.15, 0.3, 0.4, 0.73, 2], Y=[350, 350, 350, 350, 350, 100]}, Memo=Gives the size of individual leaves when they are fully expanded (mm2)}, DetachmentLagDuration={{http://www.w3.org/2001/XMLSchema-instance}type=Constant, Value=1e6}, DetachmentDuration={{http://www.w3.org/2001/XMLSchema-instance}type=Constant, Value=1e6}, SpecificLeafAreaMax={{http://www.w3.org/2001/XMLSchema-instance}type=LinearInterpolationFunction, XProperty=[Structure].RelativeNodeApperance, XYPairs={X=[0, 1], Y=[40000, 25000]}, Memo=Gives the size of individual leaves when they are fully expanded (mm2)}, SpecificLeafAreaMin={{http://www.w3.org/2001/XMLSchema-instance}type=Constant, Value=25000, Memo=sets the maximum density that leaves can obtain and sets up the potential size of the Non-Structural pool.  If leaf is partitioned enough DM to meet Structural and Metabolic Demands its SLA will be (DeltaStructuralWt * SpecificLeafAreaMax)/(DeltaStructuralWt* 1/StructuralFraction).  However, if there is surpless DM after all organs are allocated their DM demands it will be partitioned back to the leaf (assuming this would actually be stored as sugar of starch in such a situation) and the leaves can become more dense until they reach SpecificLeafAreaMin.  If leaf area expansion is constrained by water stress leaves will also get more dense until they reach SpecificLeafAreaMin.  Once leaves reach SpecificLeafAreaMin they can not absorb any further excess DM and if there are no other DM sinks available the leaf will discard potential biomass production, assuming that in this situation the leaf would down regulate photosynthesis due to source limitation.}, StructuralFraction={{http://www.w3.org/2001/XMLSchema-instance}type=Constant, Value=.5, Memo=StructuralFraction sets the size of the metabolic pool with Metabolic DM demand calculated as: (StructuralDMDemand * (1 / StructuralFraction)) - StructuralDMDemand such that the actual SLA of leaves will normally be less than SpecificLeafAreaMax.  If the leaf cohort is not partitioned sufficient biomass to meet both structural and metabolic N demands it will reduce the growth of both proportinatly.  With moderate DM limitations leaves will get less dense but when they reach SpecificLeafAreaMax and then leaf size will become constrained.}, MaximumNConc={{http://www.w3.org/2001/XMLSchema-instance}type=Constant, Value=.07, Memo=This is the highest N concentration that the organ can achieve.  This sets the upper limit to N demand and includes essential and Luxury N demands.  Essential N demand is set by the CriticalNConc of the organ.  Luxary N Demand is N is set by Live.Wt * (MaximumNConc - CriticalNConc) and is N the organ may take up in surples to its growth requirements and store in its Non-Structural pool for reallocation.}, MinimumNConc={{http://www.w3.org/2001/XMLSchema-instance}type=Constant, Value=.03}, InitialNConc={{http://www.w3.org/2001/XMLSchema-instance}type=Constant, Value=0}, NReallocationFactor={{http://www.w3.org/2001/XMLSchema-instance}type=Constant, Value=1, Memo=Controls the proportion of Non-Structural and senesing Metabolic N that may be Reallocated to other organs each day.}, NRetranslocationFactor={{http://www.w3.org/2001/XMLSchema-instance}type=Constant, Value=.01, Memo=sets the proportion of Metabolic N that may be Remobilised to meet the demand of other organs each day.  A value of zero means the crop will favor maintaining the N concentration and photosynthetic capacity of its current leaf area (behaviour of crops such as potato and wheat).  Increasing this will enable the crop to grow and increased leaf area with diluted N concentration, favoring larger leaf area over the higher N concentration and photosynthetic capacity of leaves (behaviour of crops such as maize)}, ExpansionStress={{http://www.w3.org/2001/XMLSchema-instance}type=LinearInterpolationFunction, XProperty=[Plant].WaterSupplyDemandRatio, XYPairs={X=[0.5, 1], Y=[0, 1]}, Memo=This controls the effect of water stress on leaf area expansion}, CriticalNConc={{http://www.w3.org/2001/XMLSchema-instance}type=Constant, Value=.05}, DMRetranslocationFactor={{http://www.w3.org/2001/XMLSchema-instance}type=Constant, Value=.5, Memo=This sets the proportion of NonStructural Wt that can be remobilised each day.}, ShadeInducedSenescenceRate={{http://www.w3.org/2001/XMLSchema-instance}type=LinearInterpolationFunction, XProperty=[Leaf].CohortCurrentRank.CoverAbove, XYPairs={X=[0, 0.5, 0.8, 1], Y=[0, 0, 0, 0.03]}}, NonStructuralFraction={{http://www.w3.org/2001/XMLSchema-instance}type=Constant, Value=.2}}
          Photosynthesis={{http://www.w3.org/2001/XMLSchema-instance}type=RUEModel, Memo=Potential photosynthesis is set by the radiation use efficiency (RUE in gDM/MJ).  Stress and CO2 adjustments are applied as: Photosynthesis =  RadnInt * RUE * Min(Ft, Min(Fn Fvpd)) * Fw * Fco2, RUE={{http://www.w3.org/2001/XMLSchema-instance}type=Constant, Value=1.2}, FCO2={{http://www.w3.org/2001/XMLSchema-instance}type=RUECO2Function, PhotosyntheticPathway=C3}, FN={{http://www.w3.org/2001/XMLSchema-instance}type=LinearInterpolationFunction, XProperty=[Leaf].Fn, XYPairs={X=[0, 1, 1.5], Y=[1, 1, 1]}}, FT={{http://www.w3.org/2001/XMLSchema-instance}type=WeightedTemperatureFunction, MaximumTemperatureWeighting=0.75, XYPairs={X=[2, 12, 24, 34], Y=[0, 1, 1, 0]}}, FW={{http://www.w3.org/2001/XMLSchema-instance}type=LinearInterpolationFunction, XProperty=[Leaf].Fw, XYPairs={X=[0, 0.4, 1.5], Y=[0, 1, 1]}}, FVPD={{http://www.w3.org/2001/XMLSchema-instance}type=LinearInterpolationFunction, XProperty=[Leaf].Photosynthesis.VPD, XYPairs={X=[0, 10, 50], Y=[1, 1, 1]}}}
          ThermalTime:
            {X=[2, 20, 35], Y=[0, 18, 0]}
          ExtinctionCoeff={{http://www.w3.org/2001/XMLSchema-instance}type=MultiplyFunction, Memo=Quantifies the relationship between Leaf area index and radiation interception.  The PotentialExtinctionCoeff is the unstressed value and extinction coefficient declines in response to water stress as leaves wilt to reduce their radiation load}
          FrostFraction={{http://www.w3.org/2001/XMLSchema-instance}type=LinearInterpolationFunction, XProperty=[WeatherFile].MinT, XYPairs={X=[-1, 0], Y=[0, 0]}, Memo=Sets the proportion of leaf area that is killed by frost}
          CohortArrayLive={{http://www.w3.org/2001/XMLSchema-instance}type=ArrayBiomass, Propertys=[[Leaf].Live], ArraySize=[Leaf].MaxNodeNo}
          CohortArrayDead={{http://www.w3.org/2001/XMLSchema-instance}type=ArrayBiomass, Propertys=[[Leaf].Dead], ArraySize=[Leaf].MaxNodeNo}
        GenericAboveGroundOrgan Stem
          NReallocationFactor={{http://www.w3.org/2001/XMLSchema-instance}type=Constant, Value=0, Memo=Controls the proportion of Non-Structural and senesing Metabolic N that may be Reallocated to other organs each day.}
          NRetranslocationFactor={{http://www.w3.org/2001/XMLSchema-instance}type=Constant, Value=.05, Memo=sets the proportion of Non-Structural N that may be Remobilised to meet the demand of other organs each day.  A value of zero means the crop will favor maintaining the N concentration and photosynthetic capacity of its current leaf area (behaviour of crops such as potato and wheat).  Increasing this will enable the crop to grow and increased leaf area with diluted N concentration, favoring larger leaf area over the higher N concentration and photosynthetic capacity of leaves (behaviour of crops such as maize)}
          NitrogenDemandSwitch={{http://www.w3.org/2001/XMLSchema-instance}type=PhaseBasedSwitch, Start=Planting, End=FinalLeaf, Memo=stops the stem from demanding N following final leaf stage}
          DMRetranslocationFactor={{http://www.w3.org/2001/XMLSchema-instance}type=Constant, Value=0, Memo=This sets the proportion of NonStructural Wt that can be remobilised each day.}
          StructuralFraction={{http://www.w3.org/2001/XMLSchema-instance}type=Constant, Value=1, Memo=Demand for DM is based on demand to grow structural components.  If the structural fraction is less than 1 the organ has the capacity to accumulate Non-structural biomass.  The lower the number the greater the capacity.  However, the arbitrator will only partition biomass to non-structural pools after all structural and metabolic DM demands have been met so the Non-Structural DM proportion of the organ may be less smaller that 1 - StructuralFraction.}
          DMDemandFunction:
            {{http://www.w3.org/2001/XMLSchema-instance}type=Constant, Value=.2}
          MaximumNConc={{http://www.w3.org/2001/XMLSchema-instance}type=LinearInterpolationFunction, XProperty=[Phenology].StageCode.FunctionValue, XYPairs={X=[3, 4, 5.3], Y=[0.06, 0.06, 0.025]}, Memo=This is the highest N concentration that the organ can achieve.  This sets the upper limit to N demand and includes essential and Luxury N demands.  Essential N demand is set by the CriticalNConc of the organ.  Luxary N Demand is N is set by Live.Wt * (MaximumNConc - CriticalNConc) and is N the organ may take up in surples to its growth requirements and store in its Non-Structural pool for reallocation.}
          MinimumNConc={{http://www.w3.org/2001/XMLSchema-instance}type=Constant, Value=0.006, Memo=The MinimumNconc determins the organs essential N demand.  Essential N Demand is N is set by Live.Wt * MinimumNConc and is N the organ must take up to achieve its potential growth.  If the organ is not supplied with sufficient N to maintain MinimunNConc its growth will be constrained by the arbitrator.  All N taken up to MinimunNConc is placed in the StructuralPool and is not mobile}
    Input: FileName=C:\ApsimX\Tests\TestObserved.txt
  DataStore: AutoCreateReport=false
  Tests
    Test:
      SimulationName  TableName  Type       ColumnNames                              Parameters
      Test            Report     Tolerance  Plant.Phenology.StageCode.FunctionValue  1,1
      Test            Report     Tolerance  Plant.Structure.Population               1,1
      Test            Report     Tolerance  Plant.Leaf.LAI                           1,1
      Test            Report     Tolerance  Plant.Leaf.CoverGreen                    1,1
      Test            Report     Tolerance  Plant.Leaf.Live.Wt                       1,1
      Test            Report     Tolerance  Plant.Stem.Live.Wt                       1,1
      Test            Report     Tolerance  Plant.Tuber.Live.Wt                      1,1
      Test            Report     Tolerance  Plant.Root.Live.Wt                       1,1
      Test            Report     Tolerance  Plant.Leaf.Live.N                        1,1
      Test            Report     Tolerance  Plant.Stem.Live.N                        1,1
      Test            Report     Tolerance  Plant.Tuber.Live.N                       1,1
      Test            Report     Tolerance  Plant.Root.Live.N                        1,1
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