Simulations: Version=129
  Replacements
    Manager Defoliate
      Crop =
      cutPasture_StartDate = 2050-05-20
      cutPasture_EndDate = 2100-12-31
      defoliateType = Graze
      interval2Cut = 21
      durationOfCut = 1
      removeAmountType = DMToRemove
      herbageAmount = 500
      fracDM2Remove = 1
      fracN2Remove = 1
      urineDepth = 10
      fracN2Dung = 0.4
      fracPopDecline = 0.05
```csharp
// Defoliates on a regular cycle or one-off via a schedule
// currently defoliates by the amount specified spread evenly over the specified period

using Models.Soils.Nutrients;
using System;
using Models.Core;
using System.Collections.Generic;
using System.Text;
using Models;
using Models.Soils;
using Models.Soils.Nutrients;
using Models.PMF;
using System.Xml.Serialization;
using APSIM.Shared.Utilities;

namespace Models
{
    [Serializable]
    public class Script : Model
    {
        [Link] Zone zone;
        [Link] Clock Clock;
        [Link] Plant Plantain;
        [Link] Fertiliser fertiliser;
        [Link] ISummary summary = null;

        [Description("Choose the crop to harvest:")]
        public IPlant Crop { get; set; }

        [Description("Enter the date to start the rotation (dd/mm/yyyy):")]
        public DateTime cutPasture_StartDate { get; set; }

        [Description("Enter the date to end the rotation (dd/mm/yyyy):")]
        public DateTime cutPasture_EndDate { get; set; }

        [Description("Select type of defoliation:")]
        public defoliationTypes defoliateType { get; set; }

        [Description("Enter the interval between defoliations (days):")]
        public int interval2Cut { get; set; }

        [Description("Enter the number of days to defoliate over (days):")]
        public int durationOfCut { get; set; }

        [Description("Choose what amount is being defined:")]
        public removeAmountTypes removeAmountType { get; set; }

        [Description("Enter the amount to use (kgDM/ha):")]
        public double herbageAmount { get; set; }

        [Description("Enter the fraction of DM that is removed from the field (0-1):")]
        public double fracDM2Remove { get; set; }

        [Description("Enter the fraction of N that is removed from the field (0-1):")]
        public double fracN2Remove { get; set; }

        [Description("Enter the depth down to which urine will applied (mm):")]
        public double urineDepth { get; set; }

        [Description("Enter the proportion of N returned in dung (0-1):")]
        public double fracN2Dung { get; set; }

        [Description("Enter the fraction of population decline due to defoliation (0-1):")]
        public double fracPopDecline { get; set; }

        //fraction of each plant part returned as residue (0-1), wastage
        private double leafResidueFrac = 0.01;
        private double stemResidueFrac = 0.01;
        private double flowerResidueFrac = 0.01;
        private double minLeafAmount = 5.0;

        //Outputs
        //Pasture DM defoliated today (kg/ha)
        [XmlIgnore] public double DefoliatedDM{ get; set; }
        //N defoliate today (kg/ha)
        [XmlIgnore] public double DefoliatedN{ get; set; }
        //Pasture DM harvested today (kg/ha)
        [XmlIgnore] public double HarvestedDM{ get; set; }
        //N harvested today (kg/ha)
        [XmlIgnore] public double HarvestedN{ get; set; }
        //DM removed from the paddock (kg/ha)
        [XmlIgnore] public double RemovedDM{ get; set; }
        //N removed from the paddock (kg/ha)
        [XmlIgnore] public double RemovedN{ get; set; }
        //DM returned to the paddock (kg/ha)
        [XmlIgnore] public double ReturnedDM{ get; set; }
        //N returned to the paddock (kg/ha)
        [XmlIgnore] public double ReturnedN{ get; set; }
        //N returned as dung (SurfaceOM)
        [XmlIgnore] public double NReturnedInDung{ get; set; }
        //N returned as urine (urea)
        [XmlIgnore] public double NReturnedInUrine{ get; set; }
        //Number of days after last harvest
        [XmlIgnore] public int DaysAfterCut{ get; set; }
        //Total standing DM (Leaf + Stem/Sheath) before cut
        [XmlIgnore] public double PreHarvestDM{ get; set; }
        //Total standing DM (Leaf + Stem/Sheath) after cut
        [XmlIgnore] public double PostHarvestDM{ get; set; }

        //Pasture DM harvested this rotation (kg/ha)
        [XmlIgnore] public double RotationHarvestedDM{ get; set; }
        //Pasture DM to be harvested this rotation (kg/ha)
        [XmlIgnore] public double RotationHarvestingDM{ get; set; }

        //N concentration of the defoliated material (kg/kg)
        [XmlIgnore] public double HarvestedNconc{ get; set; }

        //Internal variables
        private RemovalFractions removalFractions;
        //The fraction of urine to be applied in each layer
        private double[] FracLayer;
        // total herbage to remove in g/m2 per day
        private double herbageToRemove;
        // counter
        private int daysCutting = 0;
        // type of defoliation (Cut or Graze)
        private string defoliationType;
        // type of DM amount (ResidualDM or DMToRemove)
        private string amountType;
        // auxiliary
        private bool aCutHasHappened = false;
        private bool isStillCutting = false;
        private double cumAmountHarvested;

        // event to add residue / dung to surface OM
        public event BiomassRemovedDelegate BiomassRemoved;

        [EventSubscribe("StartOfSimulation")]
        private void OnSimulationCommencing(object sender, EventArgs e)
        {
            removalFractions = new RemovalFractions();
            DaysAfterCut = 0;
            resetVariables();
            if (defoliateType == defoliationTypes.Cut)
                defoliationType = "Cut";
            else
                defoliationType = "Graze";

            if (removeAmountType == removeAmountTypes.ResidualDM)
                amountType = "ResidualDM";
            else
                amountType = "DMToRemove";

            // make sure that rotation start when startDate<simulationStartDay
            if ((Clock.Today > cutPasture_StartDate) && (Clock.Today < cutPasture_EndDate))
                cutPasture_StartDate = Clock.Today;

            // initialise variables
            resetVariables();
        }

        [EventSubscribe("DoManagement")]
        private void OnDoManagement(object sender, EventArgs e)
        {
            if (Clock.Today == cutPasture_StartDate)
                DaysAfterCut = interval2Cut;

            if ((Clock.Today >= cutPasture_StartDate) && (Clock.Today <= cutPasture_EndDate))
            {
                // Check whether we should start cutting
                if ((Plantain.IsEmerged) && (DaysAfterCut > 0) && (DaysAfterCut == interval2Cut))
                {
                    Defoliate(defoliationType, herbageAmount * 0.1, amountType, durationOfCut);
                }
            }

            // Check whether we need to continue cutting
            //if ((daysCutting > 0) && (daysCutting <= durationOfCut))
            if (isStillCutting)
            {
                // reset outputs
                resetVariables();

                removeDM(herbageToRemove, defoliationType);
                returnExcreta();
                cumAmountHarvested += HarvestedDM;
                daysCutting += 1;
            }

            // reset outputs
            if (daysCutting < 0)
            {
                resetVariables();
                daysCutting = 0;
            }
        }

        [EventSubscribe("DoManagementCalculations")]
        private void OnDoManagementCalculations(object sender, EventArgs e)
        {
            if ((daysCutting > 0) && (daysCutting < durationOfCut))
                isStillCutting = true;

            if (daysCutting == durationOfCut)
            {
                PostHarvestDM = (double)zone.Get("Plantain.AboveGround.Wt");
                RotationHarvestedDM = cumAmountHarvested;
                aCutHasHappened = true;
                isStillCutting = false;
                daysCutting = -1;
                Plantain.Population = Plantain.Population * (1.0 - fracPopDecline);
            }

            if (aCutHasHappened && (daysCutting == 0))
                DaysAfterCut += 1;
        }

        public enum removeAmountTypes
        {
            /// <summary>Setting DM amount to remove</summary>
            DMToRemove,
            /// <summary>Setting residual DM amount</summary>
            ResidualDM
        }

        public enum defoliationTypes
        {
            /// <summary>Cut</summary>
            Cut,
            /// <summary>Graze</summary>
            Graze
        }

        // resets the values of all outputs
        private void resetVariables()
        {
            DefoliatedDM = 0.0;
            DefoliatedN = 0.0;
            HarvestedDM = 0.0;
            HarvestedN = 0.0;
            RemovedDM = 0.0;
            RemovedN = 0.0;
            ReturnedDM = 0.0;
            ReturnedN = 0.0;
            NReturnedInDung = 0.0;
            NReturnedInUrine = 0.0;
            RotationHarvestedDM = 0.0;
            RotationHarvestingDM = 0.0;
            HarvestedNconc = 0.0;
        }

        // Perform the basic calculations for defoliation
        public void Defoliate(string defoliationType, double amountDM, string amountType, int duration)
        {
            // get the existing plant amount
            PreHarvestDM = (double)zone.Get("Plantain.AboveGround.Wt");

            // check duration
            if (duration <= 0)
                throw new Exception("Duration of graze/cut rotation is zero or negative");
            
            // check amount to remove
            if ((amountType == "DMToRemove") && (PreHarvestDM > 0.0))
            {
                summary.WriteMessage(this, "   Defoliating " + (10.0 * amountDM).ToString("#0.0") + "kg/ha over " + duration + " days");
                herbageToRemove = amountDM / duration;
            }
            else if ((amountType == "ResidualDM") && (PreHarvestDM > amountDM))
            {
                summary.WriteMessage(this, "   Defoliating down to approximately " + (10.0 * amountDM).ToString("#0.0") + "kg/ha over " + duration + " days");
                herbageToRemove = (PreHarvestDM - amountDM) / duration;
            }
            else
            {
                herbageToRemove = 0.0;
                summary.WriteMessage(this, "   Defoliation will not happend because there is not enough plant material");
                return;
            }

            RotationHarvestingDM = herbageToRemove * duration;
            durationOfCut = duration;
            // first defoliation
            removeDM(herbageToRemove, defoliationType);
            returnExcreta();
            cumAmountHarvested = HarvestedDM;
            daysCutting = 1;
            DaysAfterCut = 0;
        }

        private void removeDM(double removeAmount, string removeType)
        {
            // get the existing biomass
            double leafLiveWt = (double)zone.Get("Plantain.Leaf.Live.Wt");
            double stemLiveWt = (double)zone.Get("Plantain.Stem.Live.Wt");
            double flowerLiveWt = (double)zone.Get("Plantain.Inflorescence.Live.Wt");
            double leafDeadWt = (double)zone.Get("Plantain.Leaf.Dead.Wt");
            double stemDeadWt = (double)zone.Get("Plantain.Stem.Dead.Wt");
            double flowerDeadWt = (double)zone.Get("Plantain.Inflorescence.Dead.Wt");
            double leafLiveN = (double)zone.Get("Plantain.Leaf.Live.N");
            double stemLiveN = (double)zone.Get("Plantain.Stem.Live.N");
            double flowerLiveN = (double)zone.Get("Plantain.Inflorescence.Live.N");
            double leafDeadN = (double)zone.Get("Plantain.Leaf.Dead.N");
            double stemDeadN = (double)zone.Get("Plantain.Stem.Dead.N");
            double flowerDeadN = (double)zone.Get("Plantain.Inflorescence.Dead.N");

            double existingWt = leafLiveWt + leafDeadWt + stemLiveWt + stemDeadWt + flowerLiveWt + flowerDeadWt;
            double existingN = leafLiveN + leafDeadN + stemLiveN + stemDeadN + flowerLiveN + flowerDeadN;

            // Can we harvest anything?
            double removingWt = Math.Min(existingWt, removeAmount);
            if (removingWt > 0.0)
            {
                // get the fractions to remove for each organ (will override the default values)
                // the default is [Plantain].Leaf.BiomassRemovalDefaults.Cut.FractionRemoved, or equivalent
                // >> double leafFracToRemove = removeAmount * (leafLiveWt + leafDeadWt) / existingWt / existingWt;
                double fracToRemove = removingWt / existingWt;
                double leafFracToRemove = 0.0;
                if ((leafLiveWt + leafDeadWt) > 0.0)
                {
                    if (leafLiveWt < minLeafAmount)
                    {
                        // leafWt cannot go below a minimum
                        leafFracToRemove = (removingWt + leafLiveWt - minLeafAmount) / existingWt;
                    }
                    else
                        leafFracToRemove = fracToRemove;
                }

                double stemFracToRemove = ((stemLiveWt + stemDeadWt) > 0.0) ? fracToRemove : 0.0;
                double flowerFracToRemove = ((flowerLiveWt + flowerDeadWt) > 0.0) ? fracToRemove : 0.0;

                // get the fractions to residue (i.e. wastage - will override the default values)
                // the default is [Plantain].Leaf.BiomassRemovalDefaults.Cut.FractionToResidue, or equivalent
                double leafFracToResidue = leafResidueFrac * leafFracToRemove;
                double stemFracToResidue = stemResidueFrac * stemFracToRemove;
                double flowerFracToResidue = flowerResidueFrac * flowerFracToRemove;

                // correct the values to defoliate (so our removing = remove + residue)
                leafFracToRemove -= leafFracToResidue;
                stemFracToRemove -= stemFracToResidue;
                flowerFracToRemove -= flowerFracToResidue;

                // set removal fractions (these overrides the default removals in the plant)
                removalFractions.SetFractionToRemove("Leaf", leafFracToRemove, "Live");
                removalFractions.SetFractionToResidue("Leaf", leafFracToResidue, "Live");
                removalFractions.SetFractionToRemove("Leaf", leafFracToRemove, "Dead");
                removalFractions.SetFractionToResidue("Leaf", leafFracToResidue, "Dead");
                removalFractions.SetFractionToRemove("Stem", stemFracToRemove, "Live");
                removalFractions.SetFractionToResidue("Stem", stemFracToResidue, "Live");
                removalFractions.SetFractionToRemove("Stem", stemFracToRemove, "Dead");
                removalFractions.SetFractionToResidue("Stem", stemFracToResidue, "Dead");
                removalFractions.SetFractionToRemove("Inflorescence", flowerFracToRemove, "Live");
                removalFractions.SetFractionToResidue("Inflorescence", flowerFracToResidue, "Live");
                removalFractions.SetFractionToRemove("Inflorescence", flowerFracToRemove, "Dead");
                removalFractions.SetFractionToResidue("Inflorescence", flowerFracToResidue, "Dead");

                removalFractions.SetFractionToRemove("Root", 0.0);
                removalFractions.SetFractionToResidue("Root", 0.0);
                removalFractions.SetFractionToRemove("Taproot", 0.0);
                removalFractions.SetFractionToResidue("Taproot", 0.0);

                // Actually do the biomass removal
                Plantain.RemoveBiomass(removeType, removalFractions);

                // get the new existing plant amount
                double postHarvestWt = (double)zone.Get("Plantain.AboveGround.Wt");
                double postHarvestN = (double)zone.Get("Plantain.AboveGround.N");

                // get total defoliation (total plant stuff lost)
                DefoliatedDM = existingWt - postHarvestWt;
                DefoliatedN = existingN - postHarvestN;
                if (DefoliatedDM > 0.0)
                   HarvestedNconc = DefoliatedN/DefoliatedDM;

                // get total harvested (plant stuff removed from plants)
                HarvestedDM = (double)zone.Get("Plantain.Leaf.Removed.Wt")
                + (double)zone.Get("Plantain.Stem.Removed.Wt")
                + (double)zone.Get("Plantain.Inflorescence.Removed.Wt");
                HarvestedN = (double)zone.Get("Plantain.Leaf.Removed.N")
                + (double)zone.Get("Plantain.Stem.Removed.N")
                + (double)zone.Get("Plantain.Inflorescence.Removed.N");

                // get amounts actually removed from field and that to be returned (residue or dung/urine)
                RemovedDM = HarvestedDM * fracDM2Remove;
                RemovedN = HarvestedN * fracN2Remove;
                ReturnedDM = HarvestedDM - RemovedDM;
                ReturnedN = HarvestedN - RemovedN;
                NReturnedInDung = ReturnedN * fracN2Dung;
                NReturnedInUrine = ReturnedN - NReturnedInDung;
            }
            else
            {
            }
        }

        // Return dung and urine
        private void returnExcreta()
        {
            if ((ReturnedDM > 0.0) || (NReturnedInDung > 0.0))
            {
                PMF.BiomassRemovedType BiomassDung = new PMF.BiomassRemovedType();
                string[] type = new string[] { "RuminantDung_PastureFed" };
                float[] dltdm = new float[] { (Single)ReturnedDM };
                float[] dltn = new float[] { (Single)NReturnedInDung };
                float[] dltp = new float[] { 0 };
                float[] fraction = new float[] { 1 };     // fraction is always 1.0 here

                BiomassDung.crop_type = "RuminantDung_PastureFed";
                BiomassDung.dm_type = type;
                BiomassDung.dlt_crop_dm = dltdm;
                BiomassDung.dlt_dm_n = dltn;
                BiomassDung.dlt_dm_p = dltp;
                BiomassDung.fraction_to_residue = fraction;
                BiomassRemoved.Invoke(BiomassDung);
            }

            if (NReturnedInUrine > 0.0)
            {
                fertiliser.Apply(NReturnedInUrine * 10, Fertiliser.Types.UreaN, urineDepth);
            }
        }
    }
}
```
    Manager ExtraVariables
      InitialDay = False
      AccumPlantN = 0
      AccumMineralisation = 0
      AccumDenit = 0
      AccumFert = 0
      AccumLeach = 0
      AccumDetach = 0
      DeltaSoilOMN = 0
      DeltaSurfaceOMN = 0
      DeltaSoilMineralN = 0
      SoilNitrogenContent = 0
      AccumEO = 0
      AccumEP = 0
      AccumES = 0
      AccumDrainage = 0
      AccumRunoff = 0
      AccumOutflowLat = 0
      AccumIrrigation = 0
      AccumRainfall = 0
      SoilWaterDeficit = 0
      InitialSoilOMN = 0
      InitialSurfaceOMN = 0
      InitialMineralN = 0
      SWC = 0
      DUL = 0
      OutFlowLat = 0
      FomN = 0
      BiomN = 0
      HumN = 0
      OrganicN = 0
      NO3N = 0
      NH4N = 0
      UreaN = 0
      MineralN = 0
      DltNMinTot = 0
      LeafFraction = 0
      StemFraction = 0
      InflorescenceFraction = 0
      ShootRootRatio = 0
      Leaf_DMSupply = 0
      Stem_DMSupply = 0
      Inflorescence_DMSupply = 0
      Root_DMSupply = 0
      Taproot_DMSupply = 0
      Leaf_DMDemand = 0
      Stem_DMDemand = 0
      Inflorescence_DMDemand = 0
      Root_DMDemand = 0
      Taproot_DMDemand = 0
      Leaf_NSupply = 0
      Stem_NSupply = 0
      Inflorescence_NSupply = 0
      Taproot_NSupply = 0
      Root_NSupply = 0
      Leaf_NDemand = 0
      Stem_NDemand = 0
      Inflorescence_NDemand = 0
      Taproot_NDemand = 0
      Root_NDemand = 0
      Leaf_NSupplyReallocation = 0
      Stem_NSupplyReallocation = 0
      Root_NSupplyReallocation = 0
      AccumHarvestedWt = 0
```csharp
using Models.Climate;
using APSIM.Shared.Utilities;
using System.Xml.Serialization;
using Models;
using Models.PMF;
using Models.Soils.Nutrients;
using Models.Soils;
using System.Text;
using System.Collections.Generic;
using Models.Core;
using System;
using Models.Interfaces;
using Models.PMF.Organs;

namespace Models
{
    [Serializable] 
    public class Script : Model
    {
        [Link] private Clock Clock;
        [Link] private Weather Met;
        [Link] private Fertiliser Fert;
        [Link] private Irrigation Irrig;
        [Link] private Plant Plantain;
        [Link] private Zone zone;
        [Link] private ISummary summary;
        private DateTime YearStartDate;
        [Link(ByName = true)]
        private ISolute Urea;
        [Link(ByName = true)]
        private ISolute NO3;
        [Link(ByName = true)]
        private ISolute NH4;
        [Link(ByName = true)]
        private Nutrient nutrient;
        [Link(ByName = true)]
        private NutrientPool Humic;
        [Link(ByName = true)]
        private NutrientPool Microbial;
        [Link] private Soils.Soil Soil;
        [Link] private Models.Surface.SurfaceOrganicMatter SOM;
        [Link(Type = LinkType.Path, Path = "[Plantain].Root")]
        private Root root;
        [Link]
        private IPhysical soilPhysical;
        [Link]
        private ISoilWater waterBalance;



                    
        [XmlIgnore] public bool InitialDay { get; set; }
        
        [XmlIgnore] public double AccumPlantN { get; set; }
        [XmlIgnore] public double AccumMineralisation { get; set; }
        [XmlIgnore] public double AccumDenit { get; set; }
        [XmlIgnore] public double AccumFert { get; set; }
        [XmlIgnore] public double AccumLeach { get; set; }
        [XmlIgnore] public double AccumDetach { get; set; }
        [XmlIgnore] public double DeltaSoilOMN { get; set; }
        [XmlIgnore] public double DeltaSurfaceOMN { get; set; }
        [XmlIgnore] public double DeltaSoilMineralN { get; set; }
        [XmlIgnore] public double SoilNitrogenContent { get; set; }
        
        [XmlIgnore] public double AccumEO { get; set; }
        [XmlIgnore] public double AccumEP { get; set; }
        [XmlIgnore] public double AccumES { get; set; }
        [XmlIgnore] public double AccumDrainage { get; set; }
        [XmlIgnore] public double AccumRunoff { get; set; }
        [XmlIgnore] public double AccumOutflowLat { get; set; }
        [XmlIgnore] public double AccumIrrigation { get; set; }
        [XmlIgnore] public double AccumRainfall { get; set; }
        [XmlIgnore] public double SoilWaterDeficit { get; set; }
    
        [XmlIgnore] public double  InitialSoilOMN { get; set; }
        [XmlIgnore] public double  InitialSurfaceOMN { get; set; }
        [XmlIgnore] public double  InitialMineralN { get; set; }
        
        [XmlIgnore] public double SWC { get; set; }
        [XmlIgnore] public double DUL { get; set; }
        [XmlIgnore] public double OutFlowLat { get; set; }

        [XmlIgnore] public double FomN { get; set; }
        [XmlIgnore] public double BiomN { get; set; }
        [XmlIgnore] public double HumN { get; set; }
        [XmlIgnore] public double OrganicN { get; set; }
        [XmlIgnore] public double NO3N { get; set; }
        [XmlIgnore] public double NH4N { get; set; }
        [XmlIgnore] public double UreaN { get; set; }
        [XmlIgnore] public double MineralN { get; set; }
        //[XmlIgnore] public double DltNMinRes { get; set; }
        [XmlIgnore] public double DltNMinTot { get; set; }
        
        [XmlIgnore] public double LeafFraction { get; set; }
        [XmlIgnore] public double StemFraction { get; set; }
        [XmlIgnore] public double InflorescenceFraction { get; set; }
        
        [XmlIgnore] public double ShootRootRatio { get; set; }

        [XmlIgnore] public double Leaf_DMSupply { get; set; }
        [XmlIgnore] public double Stem_DMSupply { get; set; }
        [XmlIgnore] public double Inflorescence_DMSupply { get; set; }
        [XmlIgnore] public double Root_DMSupply { get; set; }
        [XmlIgnore] public double Taproot_DMSupply { get; set; }
        [XmlIgnore] public double Leaf_DMDemand { get; set; }
        [XmlIgnore] public double Stem_DMDemand { get; set; }
        [XmlIgnore] public double Inflorescence_DMDemand { get; set; }
        [XmlIgnore] public double Root_DMDemand { get; set; }
        [XmlIgnore] public double Taproot_DMDemand { get; set; }
        
        [XmlIgnore] public double Leaf_NSupply { get; set; }
        [XmlIgnore] public double Stem_NSupply { get; set; }
        [XmlIgnore] public double Inflorescence_NSupply { get; set; }
        [XmlIgnore] public double Taproot_NSupply { get; set; }
        [XmlIgnore] public double Root_NSupply { get; set; }
        [XmlIgnore] public double Leaf_NDemand { get; set; }
        [XmlIgnore] public double Stem_NDemand { get; set; }
        [XmlIgnore] public double Inflorescence_NDemand { get; set; }
        [XmlIgnore] public double Taproot_NDemand { get; set; }
        [XmlIgnore] public double Root_NDemand { get; set; }
        
        [XmlIgnore] public double Leaf_NSupplyReallocation { get; set; }
        [XmlIgnore] public double Stem_NSupplyReallocation { get; set; }
        [XmlIgnore] public double Root_NSupplyReallocation { get; set; }
        
        [XmlIgnore] public double AccumHarvestedWt { get; set; }

    
        [EventSubscribe("StartOfSimulation")]
        private void OnSimulationCommencing(object sender, EventArgs e)
        {
            InitialDay = true;
        }
        
        [EventSubscribe("DoManagement")]
        private void OnDoManagement(object sender, EventArgs e)
        {
            //!!!!!! Nitrogen balance components !!!!!!
            //!!!!!!^^^^^^^^^^^^^^^^^^^^^^^^^^^^^!!!!!!
            FomN = MathUtilities.Sum(nutrient.FOM.N);
            HumN = MathUtilities.Sum(Humic.N);
            BiomN = MathUtilities.Sum(Microbial.N);
            OrganicN = FomN + HumN + BiomN;
            NO3N = MathUtilities.Sum(NO3.kgha);
            NH4N = MathUtilities.Sum(NH4.kgha);
            UreaN = MathUtilities.Sum(Urea.kgha);
            MineralN = NO3N + NH4N + UreaN; 
            //DltNMinRes = MathUtilities.Sum(SoilNitrogen.dlt_n_min_res);
            DltNMinTot = MathUtilities.Sum(nutrient.MineralisedN);
            int layers = soilPhysical.Thickness.Length;
            if (InitialDay == true)
            {
                InitialSurfaceOMN = SOM.N;
                InitialSoilOMN = OrganicN;
                InitialMineralN = MineralN;
                InitialDay = false;

                // check whether we're in the north or south hemisphere
                if (Met.Latitude >= 0.0)
                    YearStartDate = new DateTime(2000, 1, 1);
                else
                    YearStartDate = new DateTime(2000, 7, 1);
            }
            DeltaSurfaceOMN = SOM.N - InitialSurfaceOMN;
            AccumLeach = AccumLeach - waterBalance.LeachNH4 - waterBalance.LeachNO3 - waterBalance.LeachUrea; //Fails
            AccumMineralisation += MathUtilities.Sum(nutrient.MineralisedN);
            AccumDenit -= MathUtilities.Sum(nutrient.Natm);
            AccumPlantN -= (double)zone.Get("Plantain.Root.NUptake");
            DeltaSoilOMN = OrganicN - InitialSoilOMN;
            DeltaSoilMineralN = MineralN - InitialMineralN;
            SoilNitrogenContent = MineralN;
            
            //!!!!!! Water balance components !!!!!!
            //!!!!!!^^^^^^^^^^^^^^^^^^^^^^^^^^!!!!!!

            AccumRainfall += Met.Rain;
            //AccumEP -= (double)zone.Get("[Plantain].Leaf.Transpiration");
            AccumEP -= (double)zone.Get("Plantain.Root.WaterUptake");
            SoilWaterDeficit = (SWC - DUL);
            double OutFlowLat = MathUtilities.Sum(waterBalance.LateralOutflow);
            AccumOutflowLat -= OutFlowLat;
            
            //!!!!!! Stem and leaf fraction !!!!!!
            if ((double)zone.Get("Plantain.AboveGround.Wt") > 0)
            {
                LeafFraction = (double)zone.Get("Plantain.Leaf.Wt") / (double)zone.Get("Plantain.AboveGround.Wt");
                StemFraction = (double)zone.Get("Plantain.Stem.Wt") / (double)zone.Get("Plantain.AboveGround.Wt");
                InflorescenceFraction = (double)zone.Get("Plantain.Inflorescence.Wt") / (double)zone.Get("Plantain.AboveGround.Wt");
            }
            else
            {
                LeafFraction = 0;
                StemFraction = 0;
            }
            
            //!!!!!! Plant DM components !!!!!!
            //!!!!!!^^^^^^^^^^^^^^^^^^^^^^^^^^!!!!!!
            ShootRootRatio = MathUtilities.Divide((double)zone.Get("Plantain.AboveGroundLive.Wt"), (double)zone.Get("Plantain.BelowGroundLive.Wt"), 0.0);
            PMF.Interfaces.BiomassSupplyType Leaf_DMSupplies = (PMF.Interfaces.BiomassSupplyType)zone.Get("Plantain.Leaf.DMSupply");
            PMF.Interfaces.BiomassSupplyType Stem_DMSupplies = (PMF.Interfaces.BiomassSupplyType)zone.Get("Plantain.Stem.DMSupply");
            PMF.Interfaces.BiomassSupplyType Inflorescence_DMSupplies = (PMF.Interfaces.BiomassSupplyType)zone.Get("Plantain.Inflorescence.DMSupply");
            PMF.Interfaces.BiomassSupplyType Root_DMSupplies = (PMF.Interfaces.BiomassSupplyType)zone.Get("Plantain.Root.DMSupply");
            PMF.Interfaces.BiomassSupplyType Taproot_DMSupplies = (PMF.Interfaces.BiomassSupplyType)zone.Get("Plantain.Taproot.DMSupply");
            PMF.Interfaces.BiomassPoolType Leaf_DMDemands = (PMF.Interfaces.BiomassPoolType)zone.Get("Plantain.Leaf.DMDemand");
            PMF.Interfaces.BiomassPoolType Stem_DMDemands = (PMF.Interfaces.BiomassPoolType)zone.Get("Plantain.Stem.DMDemand");
            PMF.Interfaces.BiomassPoolType Inflorescence_DMDemands = (PMF.Interfaces.BiomassPoolType)zone.Get("Plantain.Inflorescence.DMDemand");
            PMF.Interfaces.BiomassPoolType Root_DMDemands = (PMF.Interfaces.BiomassPoolType)zone.Get("Plantain.Root.DMDemand");
            PMF.Interfaces.BiomassPoolType Taproot_DMDemands = (PMF.Interfaces.BiomassPoolType)zone.Get("Plantain.Taproot.DMDemand");

            PMF.Interfaces.BiomassSupplyType Leaf_NSupplies = (PMF.Interfaces.BiomassSupplyType)zone.Get("Plantain.Leaf.NSupply");
            PMF.Interfaces.BiomassSupplyType Stem_NSupplies = (PMF.Interfaces.BiomassSupplyType)zone.Get("Plantain.Stem.NSupply");
            PMF.Interfaces.BiomassSupplyType Inflorescence_NSupplies = (PMF.Interfaces.BiomassSupplyType)zone.Get("Plantain.Inflorescence.NSupply");
            PMF.Interfaces.BiomassSupplyType Taproot_NSupplies = (PMF.Interfaces.BiomassSupplyType)zone.Get("Plantain.Taproot.NSupply");
            PMF.Interfaces.BiomassSupplyType Root_NSupplies = (PMF.Interfaces.BiomassSupplyType)zone.Get("Plantain.Root.NSupply");
            
            PMF.Interfaces.BiomassPoolType Leaf_NDemands = (PMF.Interfaces.BiomassPoolType)zone.Get("Plantain.Leaf.NDemand");
            PMF.Interfaces.BiomassPoolType Stem_NDemands = (PMF.Interfaces.BiomassPoolType)zone.Get("Plantain.Stem.NDemand");
            PMF.Interfaces.BiomassPoolType Inflorescence_NDemands = (PMF.Interfaces.BiomassPoolType)zone.Get("Plantain.Inflorescence.NDemand");
            PMF.Interfaces.BiomassPoolType Taproot_NDemands = (PMF.Interfaces.BiomassPoolType)zone.Get("Plantain.Taproot.NDemand");
            PMF.Interfaces.BiomassPoolType Root_NDemands = (PMF.Interfaces.BiomassPoolType)zone.Get("Plantain.Root.NDemand");
            
            Leaf_DMSupply = Leaf_DMSupplies.Fixation + Leaf_DMSupplies.Uptake + Leaf_DMSupplies.Reallocation + Leaf_DMSupplies.Retranslocation;
            Stem_DMSupply = Stem_DMSupplies.Fixation + Stem_DMSupplies.Uptake + Stem_DMSupplies.Reallocation + Stem_DMSupplies.Retranslocation;
            Inflorescence_DMSupply = Inflorescence_DMSupplies.Fixation + Inflorescence_DMSupplies.Uptake + Inflorescence_DMSupplies.Reallocation + Inflorescence_DMSupplies.Retranslocation;
            Root_DMSupply = Root_DMSupplies.Fixation + Root_DMSupplies.Uptake + Root_DMSupplies.Reallocation + Root_DMSupplies.Retranslocation;
            Taproot_DMSupply = Taproot_DMSupplies.Fixation + Taproot_DMSupplies.Uptake + Taproot_DMSupplies.Reallocation + Taproot_DMSupplies.Retranslocation;
            Leaf_DMDemand = Leaf_DMDemands.Structural + Leaf_DMDemands.Storage + Leaf_DMDemands.Metabolic;
            Stem_DMDemand = Stem_DMDemands.Structural + Stem_DMDemands.Storage + Stem_DMDemands.Metabolic;
            Inflorescence_DMDemand = Inflorescence_DMDemands.Structural + Inflorescence_DMDemands.Storage + Inflorescence_DMDemands.Metabolic;
            Root_DMDemand = Root_DMDemands.Structural + Root_DMDemands.Storage + Root_DMDemands.Metabolic;
            Taproot_DMDemand = Taproot_DMDemands.Structural + Taproot_DMDemands.Storage + Taproot_DMDemands.Metabolic;
            
            Leaf_NSupply = Leaf_NSupplies.Fixation + Leaf_NSupplies.Uptake + Leaf_NSupplies.Reallocation + Leaf_NSupplies.Retranslocation;
            Stem_NSupply = Stem_NSupplies.Fixation + Stem_NSupplies.Uptake + Stem_NSupplies.Reallocation + Stem_NSupplies.Retranslocation;
            Inflorescence_NSupply = Inflorescence_NSupplies.Fixation + Inflorescence_NSupplies.Uptake + Inflorescence_NSupplies.Reallocation + Inflorescence_NSupplies.Retranslocation;
            Taproot_NSupply = Taproot_NSupplies.Fixation + Taproot_NSupplies.Uptake + Taproot_NSupplies.Reallocation + Taproot_NSupplies.Retranslocation;
            Root_NSupply = Root_NSupplies.Fixation + Root_NSupplies.Uptake + Root_NSupplies.Reallocation + Root_NSupplies.Retranslocation;

            Leaf_NDemand = Leaf_NDemands.Structural + Leaf_NDemands.Storage + Leaf_NDemands.Metabolic;
            Stem_NDemand = Stem_NDemands.Structural + Stem_NDemands.Storage + Stem_NDemands.Metabolic;
            Inflorescence_NDemand = Inflorescence_NDemands.Structural + Inflorescence_NDemands.Storage + Inflorescence_NDemands.Metabolic;
            Taproot_NDemand = Taproot_NDemands.Structural + Taproot_NDemands.Storage + Taproot_NDemands.Metabolic;
            Root_NDemand = Root_NDemands.Structural + Root_NDemands.Storage + Root_NDemands.Metabolic;

            Leaf_NSupplyReallocation = Leaf_NSupplies.Reallocation;
            Stem_NSupplyReallocation = Stem_NSupplies.Reallocation;
            Root_NSupplyReallocation = Root_NSupplies.Reallocation;
            
            //!!!!!! Plant Harvest !!!!!!
            if (Clock.Today.DayOfYear == YearStartDate.DayOfYear)
                AccumHarvestedWt = (double)zone.Get("[Defoliate].Script.DefoliatedDM");
            else
                AccumHarvestedWt += (double)zone.Get("[Defoliate].Script.DefoliatedDM");            
        }
        
        [EventSubscribe("DoManagementCalculations")]
        private void OnDoManagementCalculations(object sender, EventArgs e)
        {
            FomN = MathUtilities.Sum(nutrient.FOM.N);
            HumN = MathUtilities.Sum(Humic.N);
            BiomN = MathUtilities.Sum(Microbial.N);
            AccumFert += Fert.NitrogenApplied;
            AccumIrrigation += Irrig.IrrigationApplied;
            
            
            AccumEO -= waterBalance.Eo;
            AccumES -= waterBalance.Es; 
            AccumDrainage -= waterBalance.Drainage;
            AccumRunoff -= waterBalance.Runoff;
            SWC = MathUtilities.Sum(waterBalance.SWmm);
            DUL = MathUtilities.Sum(soilPhysical.DULmm);
        }
    }
}
```
    Report: EventNames=[Clock].DoReport
      VariableNames:
        [Clock].Today as Date
        [Weather].Radn as SolarRadiation
        [Plantain].Leaf.RadiationIntercepted as InterceptedRadiation
        [Weather].Rain as Rainfall
        [Irrigation].IrrigationApplied as IrrigationApplied
        [Soil].SoilWater.Eo as Eo
        [Soil].SoilWater.Es as Evaporation
        [Plantain].Leaf.Transpiration as Transpiration
        [Soil].SoilWater.pond as PondedWater
        [Soil].SoilWater.Drainage as Drainage
        [Soil].SoilWater.Runoff as Runoff
        sum([Soil].SoilWater.LateralOutflow) as LateralFlow
        sum([Soil].SoilWater.SWmm) as TotalSWC
        sum([Soil].Physical.DULmm) as TotalDUL
        [Fertiliser].NitrogenApplied as FertiliserN
        sum([Soil].Nutrient.Natm) as DenitrifiedN
        ([Soil].SoilWater.LeachNH4 + [Soil].SoilWater.LeachNO3) as LeachedN
        (-1*[Plantain].Root.NUptake) as UptakeN
        sum([Soil].Nutrient.MineralisedN) as MineralisedSoilN
        sum([Soil].Nutrient.SurfaceResidue.Decomposition.MineralisedN) as MineralisedSurfOMN
        ([Plantain].Leaf.Detached.N+[Plantain].Stem.Detached.N+[Plantain].Inflorescence.Detached.N) as DetachedAGN
        ([Plantain].Taproot.Detached.N+[Plantain].Root.Detached.N) as DetachedBGN
        (sum([Soil].Nutrient.Urea.kgha) + sum([Soil].Nutrient.NH4.kgha) + sum([Soil].Nutrient.NO3.kgha)) as SoilNContent
        sum([Soil].Nutrient.Urea.kgha) as SoilUrea
        sum([Soil].Nutrient.NH4.kgha) as SoilNH4
        sum([Soil].Nutrient.NO3.kgha) as SoilNO3
        (sum([Soil].Nutrient.NH4.kgha[1:3])+sum([Soil].Nutrient.NO3.kgha[1:3])) as TopSoilN
        [SurfaceOrganicMatter].N as TotalSurfOMN
        sum([Soil].Nutrient.FOM.N) as TotalFOMN
        sum([Soil].Nutrient.Humic.N) as TotalHumicN
        sum([Soil].Nutrient.Microbial.N as TotalMicrobialN
        ([Plantain].Total.N) as TotalPlantN
        [Defoliate].Script.RotationHarvestingDM
        [Defoliate].Script.RotationHarvestedDM as RotationHarvestedWt
        [Defoliate].Script.PreHarvestDM
        [Defoliate].Script.PostHarvestDM
        [Defoliate].Script.DefoliatedDM
        [Defoliate].Script.HarvestedDM
        [Defoliate].Script.RemovedDM
        [Defoliate].Script.DefoliatedN
        [Defoliate].Script.HarvestedN
        [Defoliate].Script.RemovedN
        [Defoliate].Script.NReturnedInDung
        [Defoliate].Script.NReturnedInUrine
        [Defoliate].Script.DefoliatedDM as HarvestedWt
        [Defoliate].Script.DaysAfterCut
        [ExtraVariables].Script.AccumHarvestedWt as CumulativeHarvestedWt
        [Defoliate].Script.HarvestedNconc
        [Plantain].Phenology.ThermalTime
        [Plantain].Phenology.Photoperiod
        [Plantain].Population
        [Plantain].Phenology.CurrentPhase.Name
        [Plantain].Phenology.Stage
        [Plantain].Root.LengthDensity
        [Plantain].Leaf.ExtinctionCoefficient
        [Plantain].AboveGroundLive.Wt
        ([Plantain].Leaf.Live.Wt / ([Plantain].AboveGroundLive.Wt + 0.000001)) as LeafFraction
        ([Plantain].Stem.Live.Wt / ([Plantain].AboveGroundLive.Wt + 0.000001)) as StemFraction
        ([Plantain].Inflorescence.Live.Wt / ([Plantain].AboveGroundLive.Wt + 0.000001)) as FlowerFraction
        ([Plantain].Taproot.Live.Wt / ([Plantain].BelowGround.Wt + 0.000001)) as TaprootFraction
        ([Plantain].Root.Live.Wt / ([Plantain].BelowGround.Wt + 0.000001)) as RootFraction
        [Plantain].Arbitrator.DM.TotalFixationSupply
        [Plantain].Arbitrator.DM.TotalPlantDemand
        [Plantain].Arbitrator.DM.Allocated
        [Plantain].Arbitrator.DM.SinkLimitation
        [Plantain].Arbitrator.DM.NutrientLimitation
        [Plantain].Arbitrator.FDM
        [ExtraVariables].Script.Leaf_DMSupply
        [ExtraVariables].Script.Stem_DMSupply
        [ExtraVariables].Script.Inflorescence_DMSupply
        [ExtraVariables].Script.Root_DMSupply
        [ExtraVariables].Script.Taproot_DMSupply
        [ExtraVariables].Script.Leaf_DMDemand
        [ExtraVariables].Script.Stem_DMDemand
        [ExtraVariables].Script.Inflorescence_DMDemand
        [ExtraVariables].Script.Root_DMDemand
        [ExtraVariables].Script.Taproot_DMDemand
        [Plantain].Arbitrator.N.TotalPlantSupply
        [Plantain].Arbitrator.N.TotalPlantDemand
        [Plantain].Arbitrator.N.Allocated
        [Plantain].Arbitrator.FN
        [Plantain].Root.NTakenUp
        [Plantain].Root.NSupply.Uptake
        [Plantain].Root.NUptake
        [ExtraVariables].Script.Leaf_NSupply
        [ExtraVariables].Script.Stem_NSupply
        [ExtraVariables].Script.Inflorescence_NSupply
        [ExtraVariables].Script.Root_NSupply
        [ExtraVariables].Script.Taproot_NSupply
        [ExtraVariables].Script.Leaf_NDemand
        [ExtraVariables].Script.Stem_NDemand
        [ExtraVariables].Script.Inflorescence_NDemand
        [ExtraVariables].Script.Root_NDemand
        [ExtraVariables].Script.Taproot_NDemand
        [Plantain].ShootRootRatio
        [Plantain].TargetShootRootRatio
        [Plantain].Leaf.DMDemands.Structural.DMDemandFunction.PartitionFraction
        [Plantain].Stem.DMDemands.Structural.DMDemandFunction.PartitionFraction
        [Plantain].Inflorescence.DMDemands.Structural.DMDemandFunction.PartitionFraction
        [Plantain].Taproot.DMDemands.Structural.DMDemandFunction.PartitionFraction
        [Plantain].StemsLeafRatio
        [Plantain].FlowerStemRatio
        [Plantain].TaprootRootRatio
        [Plantain].TargetStemsLeafRatio
        [Plantain].TargetFlowerStemRatio
        [Plantain].TargetTaprootRootRatio
        [Plantain].Total.Wt
        [Plantain].Total.N
        [Plantain].Total.NConc
        [Plantain].AboveGround.Wt
        [Plantain].BelowGround.Wt
        [Plantain].AboveGround.N
        [Plantain].BelowGround.N
        [Plantain].AboveGroundLive.NConc
        [Plantain].BelowGroundLive.NConc
        [Plantain].Leaf.Wt
        [Plantain].Leaf.Live.Wt
        [Plantain].Leaf.Live.N
        [Plantain].Leaf.Live.NConc
        [Plantain].Leaf.Dead.Wt
        [Plantain].Leaf.Dead.NConc
        [Plantain].Leaf.CoverTotal
        [Plantain].Leaf.CoverGreen
        [Plantain].Leaf.CoverDead
        [Plantain].Leaf.LAITotal
        [Plantain].Leaf.LAI
        [Plantain].Leaf.LAIDead
        [Plantain].Leaf.Height
        [Plantain].Leaf.Transpiration
        [Plantain].Leaf.Fw
        [Plantain].Leaf.Fn
        [Plantain].Leaf.Photosynthesis.FCO2
        [Plantain].Leaf.Photosynthesis.FN
        [Plantain].Leaf.Photosynthesis.FT
        [Plantain].Leaf.Photosynthesis.FW
        [Plantain].Leaf.Photosynthesis.FVPD
        [Plantain].Leaf.FRGR
        [Plantain].Stem.Live.Wt
        [Plantain].Stem.Live.N
        [Plantain].Stem.Live.NConc
        [Plantain].Stem.Dead.Wt
        [Plantain].Stem.Dead.NConc
        [Plantain].Inflorescence.Live.Wt
        [Plantain].Inflorescence.Live.N
        [Plantain].Inflorescence.Live.NConc
        [Plantain].Inflorescence.Dead.Wt
        [Plantain].Inflorescence.Dead.NConc
        [Plantain].Taproot.Live.Wt
        [Plantain].Taproot.Live.N
        [Plantain].Taproot.Live.NConc
        [Plantain].Taproot.Dead.Wt
        [Plantain].Taproot.Dead.NConc
        [Plantain].Root.Live.Wt
        [Plantain].Root.Live.N
        [Plantain].Root.Live.NConc
        [Plantain].Root.Dead.Wt
        [Plantain].Root.Dead.NConc
        [Plantain].Root.Depth
        [Plantain].Root.WaterUptake
        [Plantain].Leaf.Live.StructuralWt
        [Plantain].Leaf.Live.StorageWt
        [Plantain].Leaf.Live.MetabolicWt
        [Plantain].Leaf.Live.StructuralN
        [Plantain].Leaf.Live.StorageN
        [Plantain].Leaf.Live.MetabolicN
        [Plantain].Leaf.Dead.StructuralWt
        [Plantain].Leaf.Dead.StorageWt
        [Plantain].Leaf.Dead.MetabolicWt
        [Plantain].Leaf.Dead.StructuralN
        [Plantain].Leaf.Dead.StorageN
        [Plantain].Leaf.Dead.MetabolicN
        [Plantain].Stem.Live.StructuralWt
        [Plantain].Stem.Live.StorageWt
        [Plantain].Stem.Live.MetabolicWt
        [Plantain].Stem.Live.StructuralN
        [Plantain].Stem.Live.StorageN
        [Plantain].Inflorescence.Live.StructuralWt
        [Plantain].Inflorescence.Live.StorageWt
        [Plantain].Inflorescence.Live.StructuralN
        [Plantain].Inflorescence.Live.StorageN
        [Plantain].Root.Live.StructuralWt
        [Plantain].Root.Live.StorageWt
        [Plantain].Root.Live.StructuralN
        [Plantain].Root.Live.StorageN
        [Plantain].Taproot.Live.StructuralWt
        [Plantain].Taproot.Live.StorageWt
        [Plantain].Taproot.Live.StructuralN
        [Plantain].Taproot.Live.StorageN
        [Plantain].Leaf.Live.StructuralNConc
        [Plantain].Leaf.Live.StorageNConc
        [Plantain].Root.Live.StructuralNConc
        [Plantain].Root.Live.StorageNConc
        [Plantain].Leaf.DMDemands.Structural.DMDemandFunction.PartitionFraction
        [Plantain].Stem.DMDemands.Structural.DMDemandFunction.PartitionFraction
        [Plantain].Inflorescence.DMDemands.Structural.DMDemandFunction.PartitionFraction
        [Plantain].Taproot.DMDemands.Structural.DMDemandFunction.PartitionFraction
        [Plantain].Leaf.Allocated.Wt
        [Plantain].Stem.Allocated.Wt
        [Plantain].Inflorescence.Allocated.Wt
        [Plantain].Taproot.Allocated.Wt
        [Plantain].Root.Allocated.Wt
        [Plantain].Leaf.Senesced.Wt
        [Plantain].Stem.Senesced.Wt
        [Plantain].Inflorescence.Senesced.Wt
        [Plantain].Taproot.Senesced.Wt
        [Plantain].Root.Senesced.Wt
        [Plantain].Leaf.Detached.Wt
        [Plantain].Stem.Detached.Wt
        [Plantain].Inflorescence.Detached.Wt
        [Plantain].Taproot.Detached.Wt
        [Plantain].Root.Detached.Wt
        [Plantain].Leaf.Removed.Wt
        [Plantain].Stem.Removed.Wt
        [Plantain].Inflorescence.Removed.Wt
        [Plantain].Taproot.Removed.Wt
        [Plantain].Root.Removed.Wt
  DataStore
    ExcelInput Observed: FileNames=[Observed.xlsx]; SheetNames=[Observed]
    PredictedObserved: PredictedTableName=Report; ObservedTableName=Observed; FieldNameUsedForMatch=Date; AllColumns=false
  Folder Validation
    Memo Note
      The performance of the plantain model is evaluated in simulations based on experiments conducted primarily in New Zealand.  Datasets from USA have been added, but they should be taken with caution as there was limited information about the experiments and published results corresponded to annual or seasonal aggregates only.  Note that population is not explicitly simulated by the model, only a decrease in plant numbers as function of cuts or grazings is considered.  The literature suggest that severe defoliation may reduce population by increasing death rate, but mostly is infered from other species and even then the variation is high.  Plantain persistency has been shown to be low, usually restricted to 2-4 years, but very little actuall data is available.

      The model describes N content in the above ground tissues reasonably well only for treatments where N deficit was not high (See results for the FRNL datasets with annual fertiliser rates of 200 kgN/ha and above).  The measured data showed little effect on plant N concentration for the treatment  with nil or low N rates, wehreas the model predicts differences between them.  The variability among replicates is high and there wer only three or four replicates, this may blur some of the differences.   Also, there was no information from which potential sources of nitrogen, such as soil mineralisation or N fixation from 'weeds' (the present of white clover was noted), could be identified and used to adjust the simulations.  Besides these isses, some of the underlying PMF code may need to be upgraded in order to describe some processes under plant cut/grazing and re-growth conditions.  Processes for computing N demand and supply (especially regarding remobilisation within living tissues) are still under developement and this needs especific detailed datasets.  The SimpleLeaf module was employed to simulate the plant canopy in the plantain model, this was done because there was not enough data to parameterise the more complex PMF approach.  This means that the model has only one leaf cohort with simple N thresholds (only maximum and minimum), this may be too simplistic to capture the nuances of the re-growth processes especially when sustained by the remobilisation from storage organs (taproot and old tissue).  The model will be upgraded in the near future as the work on the code to improve the description of those specific processes is ongoing.
    Folder New Zealand
      Experiment FRNLLincoln
        Memo
          ###FRNL Lincoln###

          Simulation setup based on field trial performed at Lincoln University Research Dairy Farm, New Zealand, between 2014 and 2016.  The experiment was part of the FRNL (Forages for Reduced Nitrogen Leaching) program and the data is basically unpublished (references will be added when this come about).  Here only plots with pure plantain are used.
          The experiment consisted of six fertiliser treatments (N rates of 0, 50, 100, 200, 350 and 500 kg/ha/yr) in four replicates, and measurements comprised yield and quality indicators (here N content is used).
          Data supplied by Grant Edwards, Lincoln University.

          The soil at the experimental site was a Templeton fine sandy loam (an Immature Pallic soil, USDA: Udic Haplustept), the required parameters were inferred based on data from the New Zealand National Soils Database (Landcare Research).
          Weather data was obtained from nearby Broadfields weather station (NIWA).
        Factors
          Factor NRate: Specification=[NRate]
            Operations 0
            Operations 50
              2014-10-08  [Fertiliser].Apply(Amount: 5, Type: Fertiliser.Types.UreaN, Depth: 10)
              2014-10-31  [Fertiliser].Apply(Amount: 5, Type: Fertiliser.Types.UreaN, Depth: 10)
              2014-11-26  [Fertiliser].Apply(Amount: 5, Type: Fertiliser.Types.UreaN, Depth: 10)
              2014-12-17  [Fertiliser].Apply(Amount: 5, Type: Fertiliser.Types.UreaN, Depth: 10)
              2015-01-20  [Fertiliser].Apply(Amount: 5, Type: Fertiliser.Types.UreaN, Depth: 10)
              2015-02-12  [Fertiliser].Apply(Amount: 5, Type: Fertiliser.Types.UreaN, Depth: 10)
              2015-03-10  [Fertiliser].Apply(Amount: 5, Type: Fertiliser.Types.UreaN, Depth: 10)
              2015-04-17  [Fertiliser].Apply(Amount: 5, Type: Fertiliser.Types.UreaN, Depth: 10)
              2015-05-20  [Fertiliser].Apply(Amount: 5, Type: Fertiliser.Types.UreaN, Depth: 10)
              2015-09-09  [Fertiliser].Apply(Amount: 5, Type: Fertiliser.Types.UreaN, Depth: 10)
              2015-10-06  [Fertiliser].Apply(Amount: 5, Type: Fertiliser.Types.UreaN, Depth: 10)
              2015-11-06  [Fertiliser].Apply(Amount: 5, Type: Fertiliser.Types.UreaN, Depth: 10)
              2015-12-09  [Fertiliser].Apply(Amount: 5, Type: Fertiliser.Types.UreaN, Depth: 10)
              2016-01-07  [Fertiliser].Apply(Amount: 5, Type: Fertiliser.Types.UreaN, Depth: 10)
              2016-02-10  [Fertiliser].Apply(Amount: 5, Type: Fertiliser.Types.UreaN, Depth: 10)
              2016-03-07  [Fertiliser].Apply(Amount: 5, Type: Fertiliser.Types.UreaN, Depth: 10)
              2016-04-02  [Fertiliser].Apply(Amount: 5, Type: Fertiliser.Types.UreaN, Depth: 10)
              2016-05-04  [Fertiliser].Apply(Amount: 5, Type: Fertiliser.Types.UreaN, Depth: 10)
              2016-08-31  [Fertiliser].Apply(Amount: 5, Type: Fertiliser.Types.UreaN, Depth: 10)
              2016-10-05  [Fertiliser].Apply(Amount: 5, Type: Fertiliser.Types.UreaN, Depth: 10)
            Operations 100
              2014-10-08  [Fertiliser].Apply(Amount: 10, Type: Fertiliser.Types.UreaN, Depth: 10)
              2014-10-31  [Fertiliser].Apply(Amount: 10, Type: Fertiliser.Types.UreaN, Depth: 10)
              2014-11-26  [Fertiliser].Apply(Amount: 10, Type: Fertiliser.Types.UreaN, Depth: 10)
              2014-12-17  [Fertiliser].Apply(Amount: 10, Type: Fertiliser.Types.UreaN, Depth: 10)
              2015-01-20  [Fertiliser].Apply(Amount: 10, Type: Fertiliser.Types.UreaN, Depth: 10)
              2015-02-12  [Fertiliser].Apply(Amount: 10, Type: Fertiliser.Types.UreaN, Depth: 10)
              2015-03-10  [Fertiliser].Apply(Amount: 10, Type: Fertiliser.Types.UreaN, Depth: 10)
              2015-04-17  [Fertiliser].Apply(Amount: 10, Type: Fertiliser.Types.UreaN, Depth: 10)
              2015-05-20  [Fertiliser].Apply(Amount: 10, Type: Fertiliser.Types.UreaN, Depth: 10)
              2015-09-09  [Fertiliser].Apply(Amount: 10, Type: Fertiliser.Types.UreaN, Depth: 10)
              2015-10-06  [Fertiliser].Apply(Amount: 10, Type: Fertiliser.Types.UreaN, Depth: 10)
              2015-11-06  [Fertiliser].Apply(Amount: 10, Type: Fertiliser.Types.UreaN, Depth: 10)
              2015-12-09  [Fertiliser].Apply(Amount: 10, Type: Fertiliser.Types.UreaN, Depth: 10)
              2016-01-07  [Fertiliser].Apply(Amount: 10, Type: Fertiliser.Types.UreaN, Depth: 10)
              2016-02-10  [Fertiliser].Apply(Amount: 10, Type: Fertiliser.Types.UreaN, Depth: 10)
              2016-03-07  [Fertiliser].Apply(Amount: 10, Type: Fertiliser.Types.UreaN, Depth: 10)
              2016-04-02  [Fertiliser].Apply(Amount: 10, Type: Fertiliser.Types.UreaN, Depth: 10)
              2016-05-04  [Fertiliser].Apply(Amount: 10, Type: Fertiliser.Types.UreaN, Depth: 10)
              2016-08-31  [Fertiliser].Apply(Amount: 10, Type: Fertiliser.Types.UreaN, Depth: 10)
              2016-10-05  [Fertiliser].Apply(Amount: 10, Type: Fertiliser.Types.UreaN, Depth: 10)
            Operations 200
              2014-10-08  [Fertiliser].Apply(Amount: 20, Type: Fertiliser.Types.UreaN, Depth: 10)
              2014-10-31  [Fertiliser].Apply(Amount: 20, Type: Fertiliser.Types.UreaN, Depth: 10)
              2014-11-26  [Fertiliser].Apply(Amount: 20, Type: Fertiliser.Types.UreaN, Depth: 10)
              2014-12-17  [Fertiliser].Apply(Amount: 20, Type: Fertiliser.Types.UreaN, Depth: 10)
              2015-01-20  [Fertiliser].Apply(Amount: 20, Type: Fertiliser.Types.UreaN, Depth: 10)
              2015-02-12  [Fertiliser].Apply(Amount: 20, Type: Fertiliser.Types.UreaN, Depth: 10)
              2015-03-10  [Fertiliser].Apply(Amount: 20, Type: Fertiliser.Types.UreaN, Depth: 10)
              2015-04-17  [Fertiliser].Apply(Amount: 20, Type: Fertiliser.Types.UreaN, Depth: 10)
              2015-05-20  [Fertiliser].Apply(Amount: 20, Type: Fertiliser.Types.UreaN, Depth: 10)
              2015-09-09  [Fertiliser].Apply(Amount: 20, Type: Fertiliser.Types.UreaN, Depth: 10)
              2015-10-06  [Fertiliser].Apply(Amount: 20, Type: Fertiliser.Types.UreaN, Depth: 10)
              2015-11-06  [Fertiliser].Apply(Amount: 20, Type: Fertiliser.Types.UreaN, Depth: 10)
              2015-12-09  [Fertiliser].Apply(Amount: 20, Type: Fertiliser.Types.UreaN, Depth: 10)
              2016-01-07  [Fertiliser].Apply(Amount: 20, Type: Fertiliser.Types.UreaN, Depth: 10)
              2016-02-10  [Fertiliser].Apply(Amount: 20, Type: Fertiliser.Types.UreaN, Depth: 10)
              2016-03-07  [Fertiliser].Apply(Amount: 20, Type: Fertiliser.Types.UreaN, Depth: 10)
              2016-04-02  [Fertiliser].Apply(Amount: 20, Type: Fertiliser.Types.UreaN, Depth: 10)
              2016-05-04  [Fertiliser].Apply(Amount: 20, Type: Fertiliser.Types.UreaN, Depth: 10)
              2016-08-31  [Fertiliser].Apply(Amount: 20, Type: Fertiliser.Types.UreaN, Depth: 10)
              2016-10-05  [Fertiliser].Apply(Amount: 20, Type: Fertiliser.Types.UreaN, Depth: 10)
            Operations 350
              2014-10-08  [Fertiliser].Apply(Amount: 35, Type: Fertiliser.Types.UreaN, Depth: 10)
              2014-10-31  [Fertiliser].Apply(Amount: 35, Type: Fertiliser.Types.UreaN, Depth: 10)
              2014-11-26  [Fertiliser].Apply(Amount: 35, Type: Fertiliser.Types.UreaN, Depth: 10)
              2014-12-17  [Fertiliser].Apply(Amount: 35, Type: Fertiliser.Types.UreaN, Depth: 10)
              2015-01-20  [Fertiliser].Apply(Amount: 35, Type: Fertiliser.Types.UreaN, Depth: 10)
              2015-02-12  [Fertiliser].Apply(Amount: 35, Type: Fertiliser.Types.UreaN, Depth: 10)
              2015-03-10  [Fertiliser].Apply(Amount: 35, Type: Fertiliser.Types.UreaN, Depth: 10)
              2015-04-17  [Fertiliser].Apply(Amount: 35, Type: Fertiliser.Types.UreaN, Depth: 10)
              2015-05-20  [Fertiliser].Apply(Amount: 35, Type: Fertiliser.Types.UreaN, Depth: 10)
              2015-09-09  [Fertiliser].Apply(Amount: 35, Type: Fertiliser.Types.UreaN, Depth: 10)
              2015-10-06  [Fertiliser].Apply(Amount: 35, Type: Fertiliser.Types.UreaN, Depth: 10)
              2015-11-06  [Fertiliser].Apply(Amount: 35, Type: Fertiliser.Types.UreaN, Depth: 10)
              2015-12-09  [Fertiliser].Apply(Amount: 35, Type: Fertiliser.Types.UreaN, Depth: 10)
              2016-01-07  [Fertiliser].Apply(Amount: 35, Type: Fertiliser.Types.UreaN, Depth: 10)
              2016-02-10  [Fertiliser].Apply(Amount: 35, Type: Fertiliser.Types.UreaN, Depth: 10)
              2016-03-07  [Fertiliser].Apply(Amount: 35, Type: Fertiliser.Types.UreaN, Depth: 10)
              2016-04-02  [Fertiliser].Apply(Amount: 35, Type: Fertiliser.Types.UreaN, Depth: 10)
              2016-05-04  [Fertiliser].Apply(Amount: 35, Type: Fertiliser.Types.UreaN, Depth: 10)
              2016-08-31  [Fertiliser].Apply(Amount: 35, Type: Fertiliser.Types.UreaN, Depth: 10)
              2016-10-05  [Fertiliser].Apply(Amount: 35, Type: Fertiliser.Types.UreaN, Depth: 10)
            Operations 500
              2014-10-08  [Fertiliser].Apply(Amount: 50, Type: Fertiliser.Types.UreaN, Depth: 10)
              2014-10-31  [Fertiliser].Apply(Amount: 50, Type: Fertiliser.Types.UreaN, Depth: 10)
              2014-11-26  [Fertiliser].Apply(Amount: 50, Type: Fertiliser.Types.UreaN, Depth: 10)
              2014-12-17  [Fertiliser].Apply(Amount: 50, Type: Fertiliser.Types.UreaN, Depth: 10)
              2015-01-20  [Fertiliser].Apply(Amount: 50, Type: Fertiliser.Types.UreaN, Depth: 10)
              2015-02-12  [Fertiliser].Apply(Amount: 50, Type: Fertiliser.Types.UreaN, Depth: 10)
              2015-03-10  [Fertiliser].Apply(Amount: 50, Type: Fertiliser.Types.UreaN, Depth: 10)
              2015-04-17  [Fertiliser].Apply(Amount: 50, Type: Fertiliser.Types.UreaN, Depth: 10)
              2015-05-20  [Fertiliser].Apply(Amount: 50, Type: Fertiliser.Types.UreaN, Depth: 10)
              2015-09-09  [Fertiliser].Apply(Amount: 50, Type: Fertiliser.Types.UreaN, Depth: 10)
              2015-10-06  [Fertiliser].Apply(Amount: 50, Type: Fertiliser.Types.UreaN, Depth: 10)
              2015-11-06  [Fertiliser].Apply(Amount: 50, Type: Fertiliser.Types.UreaN, Depth: 10)
              2015-12-09  [Fertiliser].Apply(Amount: 50, Type: Fertiliser.Types.UreaN, Depth: 10)
              2016-01-07  [Fertiliser].Apply(Amount: 50, Type: Fertiliser.Types.UreaN, Depth: 10)
              2016-02-10  [Fertiliser].Apply(Amount: 50, Type: Fertiliser.Types.UreaN, Depth: 10)
              2016-03-07  [Fertiliser].Apply(Amount: 50, Type: Fertiliser.Types.UreaN, Depth: 10)
              2016-04-02  [Fertiliser].Apply(Amount: 50, Type: Fertiliser.Types.UreaN, Depth: 10)
              2016-05-04  [Fertiliser].Apply(Amount: 50, Type: Fertiliser.Types.UreaN, Depth: 10)
              2016-08-31  [Fertiliser].Apply(Amount: 50, Type: Fertiliser.Types.UreaN, Depth: 10)
              2016-10-05  [Fertiliser].Apply(Amount: 50, Type: Fertiliser.Types.UreaN, Depth: 10)
        Simulation FRNLLincoln
          Clock: Start=2014-03-01; End=2016-05-31
          Weather: FileName=Lincoln-Broadfields.met
          Summary summaryfile
          SoilArbitrator Soil Arbitrator
          Zone Field: Area=1; Slope=0; AspectAngle=0; Altitude=50
            Folder Management
              Operations Sowing
                2014-03-20  [Plantain].Sow(population: 200, cultivar: "Tonic", depth: 10, rowSpacing: 150)
              Operations IrrigationSchedule
                2014-10-31  [Irrigation].Apply(amount: 7)
                2014-11-03  [Irrigation].Apply(amount: 7)
                2014-11-05  [Irrigation].Apply(amount: 8)
                2014-11-07  [Irrigation].Apply(amount: 8)
                2014-11-10  [Irrigation].Apply(amount: 7)
                2014-11-11  [Irrigation].Apply(amount: 7)
                2014-11-12  [Irrigation].Apply(amount: 8)
                2014-11-17  [Irrigation].Apply(amount: 9)
                2014-11-18  [Irrigation].Apply(amount: 7)
                2014-11-19  [Irrigation].Apply(amount: 7)
                2014-11-24  [Irrigation].Apply(amount: 8)
                2014-11-25  [Irrigation].Apply(amount: 9)
                2014-11-27  [Irrigation].Apply(amount: 10)
                2014-12-01  [Irrigation].Apply(amount: 8)
                2014-12-02  [Irrigation].Apply(amount: 8)
                2014-12-04  [Irrigation].Apply(amount: 7)
                2014-12-08  [Irrigation].Apply(amount: 7)
                2014-12-09  [Irrigation].Apply(amount: 7)
                2014-12-12  [Irrigation].Apply(amount: 8)
                2014-12-15  [Irrigation].Apply(amount: 10)
                2014-12-17  [Irrigation].Apply(amount: 10)
                2014-12-19  [Irrigation].Apply(amount: 7)
                2014-12-20  [Irrigation].Apply(amount: 7)
                2014-12-21  [Irrigation].Apply(amount: 8)
                2014-12-22  [Irrigation].Apply(amount: 10)
                2014-12-25  [Irrigation].Apply(amount: 8)
                2014-12-26  [Irrigation].Apply(amount: 8)
                2014-12-27  [Irrigation].Apply(amount: 7)
                2014-12-28  [Irrigation].Apply(amount: 10)
                2014-12-29  [Irrigation].Apply(amount: 8)
                2014-12-30  [Irrigation].Apply(amount: 8)
                2015-01-02  [Irrigation].Apply(amount: 7)
                2015-01-05  [Irrigation].Apply(amount: 10)
                2015-01-08  [Irrigation].Apply(amount: 8)
                2015-01-09  [Irrigation].Apply(amount: 9)
                2015-01-12  [Irrigation].Apply(amount: 7)
                2015-01-13  [Irrigation].Apply(amount: 7)
                2015-01-16  [Irrigation].Apply(amount: 8)
                2015-01-19  [Irrigation].Apply(amount: 7)
                2015-01-20  [Irrigation].Apply(amount: 7)
                2015-01-21  [Irrigation].Apply(amount: 8)
                2015-01-26  [Irrigation].Apply(amount: 10)
                2015-01-27  [Irrigation].Apply(amount: 10)
                2015-01-29  [Irrigation].Apply(amount: 8)
                2015-02-02  [Irrigation].Apply(amount: 10)
                2015-02-04  [Irrigation].Apply(amount: 8)
                2015-02-05  [Irrigation].Apply(amount: 7)
                2015-02-09  [Irrigation].Apply(amount: 8)
                2015-02-11  [Irrigation].Apply(amount: 7)
                2015-02-12  [Irrigation].Apply(amount: 10)
                2015-02-16  [Irrigation].Apply(amount: 10)
                2015-02-17  [Irrigation].Apply(amount: 10)
                2015-02-18  [Irrigation].Apply(amount: 8)
                2015-02-24  [Irrigation].Apply(amount: 10)
                2015-02-26  [Irrigation].Apply(amount: 7)
                2015-02-27  [Irrigation].Apply(amount: 8)
                2015-03-02  [Irrigation].Apply(amount: 7)
                2015-03-03  [Irrigation].Apply(amount: 7)
                2015-03-05  [Irrigation].Apply(amount: 8)
                2015-03-10  [Irrigation].Apply(amount: 8)
                2015-03-12  [Irrigation].Apply(amount: 9)
                2015-03-13  [Irrigation].Apply(amount: 7)
                2015-03-16  [Irrigation].Apply(amount: 10)
                2015-03-19  [Irrigation].Apply(amount: 9)
                2015-03-20  [Irrigation].Apply(amount: 8)
                2015-03-23  [Irrigation].Apply(amount: 9)
                2015-03-24  [Irrigation].Apply(amount: 7)
                2015-03-26  [Irrigation].Apply(amount: 10)
                2015-03-30  [Irrigation].Apply(amount: 7)
                2015-04-02  [Irrigation].Apply(amount: 10)
                2015-04-03  [Irrigation].Apply(amount: 8)
                2015-04-06  [Irrigation].Apply(amount: 7)
                2015-04-08  [Irrigation].Apply(amount: 10)
                2015-04-17  [Irrigation].Apply(amount: 10)
                2015-05-20  [Irrigation].Apply(amount: 10)
                2015-06-09  [Irrigation].Apply(amount: 10)
                2015-09-09  [Irrigation].Apply(amount: 10)
                2015-09-30  [Irrigation].Apply(amount: 10)
                2015-10-02  [Irrigation].Apply(amount: 8)
                2015-10-06  [Irrigation].Apply(amount: 10)
                2015-10-09  [Irrigation].Apply(amount: 10)
                2015-10-12  [Irrigation].Apply(amount: 8)
                2015-10-13  [Irrigation].Apply(amount: 7)
                2015-10-16  [Irrigation].Apply(amount: 10)
                2015-10-20  [Irrigation].Apply(amount: 10)
                2015-10-21  [Irrigation].Apply(amount: 8)
                2015-10-23  [Irrigation].Apply(amount: 7)
                2015-10-26  [Irrigation].Apply(amount: 7)
                2015-10-27  [Irrigation].Apply(amount: 9)
                2015-11-02  [Irrigation].Apply(amount: 10)
                2015-11-03  [Irrigation].Apply(amount: 8)
                2015-11-04  [Irrigation].Apply(amount: 9)
                2015-11-06  [Irrigation].Apply(amount: 9)
                2015-11-09  [Irrigation].Apply(amount: 10)
                2015-11-11  [Irrigation].Apply(amount: 7)
                2015-11-16  [Irrigation].Apply(amount: 10)
                2015-11-18  [Irrigation].Apply(amount: 9)
                2015-11-20  [Irrigation].Apply(amount: 7)
                2015-11-23  [Irrigation].Apply(amount: 10)
                2015-11-24  [Irrigation].Apply(amount: 8)
                2015-11-25  [Irrigation].Apply(amount: 7)
                2015-11-27  [Irrigation].Apply(amount: 9)
                2015-11-30  [Irrigation].Apply(amount: 7)
                2015-12-01  [Irrigation].Apply(amount: 7)
                2015-12-04  [Irrigation].Apply(amount: 9)
                2015-12-07  [Irrigation].Apply(amount: 10)
                2015-12-09  [Irrigation].Apply(amount: 9)
                2015-12-10  [Irrigation].Apply(amount: 9)
                2015-12-22  [Irrigation].Apply(amount: 8)
                2015-12-24  [Irrigation].Apply(amount: 9)
                2015-12-26  [Irrigation].Apply(amount: 8)
                2015-12-29  [Irrigation].Apply(amount: 7)
                2015-12-31  [Irrigation].Apply(amount: 7)
                2016-01-01  [Irrigation].Apply(amount: 10)
                2016-01-07  [Irrigation].Apply(amount: 10)
                2016-01-09  [Irrigation].Apply(amount: 7)
                2016-01-11  [Irrigation].Apply(amount: 7)
                2016-01-12  [Irrigation].Apply(amount: 7)
                2016-01-13  [Irrigation].Apply(amount: 9)
                2016-01-15  [Irrigation].Apply(amount: 10)
                2016-01-21  [Irrigation].Apply(amount: 7)
                2016-01-25  [Irrigation].Apply(amount: 8)
                2016-01-30  [Irrigation].Apply(amount: 7)
                2016-02-02  [Irrigation].Apply(amount: 10)
                2016-02-03  [Irrigation].Apply(amount: 10)
                2016-02-05  [Irrigation].Apply(amount: 9)
                2016-02-08  [Irrigation].Apply(amount: 10)
                2016-02-11  [Irrigation].Apply(amount: 10)
                2016-02-12  [Irrigation].Apply(amount: 7)
                2016-02-15  [Irrigation].Apply(amount: 8)
                2016-02-16  [Irrigation].Apply(amount: 8)
                2016-02-22  [Irrigation].Apply(amount: 7)
                2016-02-23  [Irrigation].Apply(amount: 7)
                2016-02-25  [Irrigation].Apply(amount: 7)
                2016-02-26  [Irrigation].Apply(amount: 7)
                2016-03-01  [Irrigation].Apply(amount: 7)
                2016-03-02  [Irrigation].Apply(amount: 8)
                2016-03-04  [Irrigation].Apply(amount: 10)
                2016-03-07  [Irrigation].Apply(amount: 9)
                2016-03-08  [Irrigation].Apply(amount: 4)
                2016-03-10  [Irrigation].Apply(amount: 8)
                2016-03-14  [Irrigation].Apply(amount: 8)
                2016-03-15  [Irrigation].Apply(amount: 10)
                2016-03-18  [Irrigation].Apply(amount: 9)
                2016-03-21  [Irrigation].Apply(amount: 10)
                2016-03-22  [Irrigation].Apply(amount: 9)
                2016-03-23  [Irrigation].Apply(amount: 9)
                2016-03-28  [Irrigation].Apply(amount: 8)
                2016-04-02  [Irrigation].Apply(amount: 10)
                2016-04-08  [Irrigation].Apply(amount: 10)
                2016-05-04  [Irrigation].Apply(amount: 10)
                2016-08-31  [Irrigation].Apply(amount: 10)
                2016-10-05  [Irrigation].Apply(amount: 10)
                2016-10-18  [Irrigation].Apply(amount: 10)
                2016-10-26  [Irrigation].Apply(amount: 10)
              Operations NRate
              Manager Defoliate
                Message =
```csharp
using Models.Soils.Nutrients;
using System;
using Models.Core;
using System.Collections.Generic;
using System.Text;
using Models;
using Models.Soils;
using Models.Soils.Nutrients;
using Models.PMF;
using System.Xml.Serialization;
using APSIM.Shared.Utilities;

namespace Models
{
    [Serializable]
    public class Script : Model
    {
        [Description("This script is set in 'Replacements':")]
        public string Message { get; set; }
    }
}
```
              Operations DefoliationSchedule
                2014-10-08  [Defoliate].Script.Defoliate(defoliationType: "Cut", amountDM: 40, amountType: "ResidualDM", duration: 1)
                2014-10-30  [Defoliate].Script.Defoliate(defoliationType: "Cut", amountDM: 40, amountType: "ResidualDM", duration: 1)
                2014-11-25  [Defoliate].Script.Defoliate(defoliationType: "Cut", amountDM: 40, amountType: "ResidualDM", duration: 1)
                2014-12-17  [Defoliate].Script.Defoliate(defoliationType: "Cut", amountDM: 40, amountType: "ResidualDM", duration: 1)
                2015-01-16  [Defoliate].Script.Defoliate(defoliationType: "Cut", amountDM: 40, amountType: "ResidualDM", duration: 1)
                2015-02-11  [Defoliate].Script.Defoliate(defoliationType: "Cut", amountDM: 40, amountType: "ResidualDM", duration: 1)
                2015-03-10  [Defoliate].Script.Defoliate(defoliationType: "Cut", amountDM: 40, amountType: "ResidualDM", duration: 1)
                2015-04-16  [Defoliate].Script.Defoliate(defoliationType: "Cut", amountDM: 40, amountType: "ResidualDM", duration: 1)
                2015-05-20  [Defoliate].Script.Defoliate(defoliationType: "Cut", amountDM: 40, amountType: "ResidualDM", duration: 1)
                2015-09-02  [Defoliate].Script.Defoliate(defoliationType: "Cut", amountDM: 40, amountType: "ResidualDM", duration: 1)
                2015-10-06  [Defoliate].Script.Defoliate(defoliationType: "Cut", amountDM: 40, amountType: "ResidualDM", duration: 1)
                2015-11-06  [Defoliate].Script.Defoliate(defoliationType: "Cut", amountDM: 40, amountType: "ResidualDM", duration: 1)
                2015-12-07  [Defoliate].Script.Defoliate(defoliationType: "Cut", amountDM: 40, amountType: "ResidualDM", duration: 1)
                2016-01-07  [Defoliate].Script.Defoliate(defoliationType: "Cut", amountDM: 40, amountType: "ResidualDM", duration: 1)
                2016-02-04  [Defoliate].Script.Defoliate(defoliationType: "Cut", amountDM: 40, amountType: "ResidualDM", duration: 1)
                2016-03-04  [Defoliate].Script.Defoliate(defoliationType: "Cut", amountDM: 40, amountType: "ResidualDM", duration: 1)
                2016-03-31  [Defoliate].Script.Defoliate(defoliationType: "Cut", amountDM: 40, amountType: "ResidualDM", duration: 1)
                2016-05-04  [Defoliate].Script.Defoliate(defoliationType: "Cut", amountDM: 40, amountType: "ResidualDM", duration: 1)
              Manager ExtraVariables
```csharp
// This will be replaced by the "ExtraVariables" section in "Replacements"

using Models.Core;
using System;

namespace Models
{
    [Serializable] 
    public class Script : Model
    {
    }
}
```
            MicroClimate: a_interception=0; b_interception=1; c_interception=0; d_interception=0; soil_albedo=0.23; SoilHeatFluxFraction=0.4; MinimumHeightDiffForNewLayer=0; NightInterceptionFraction=0.5; ReferenceHeight=2
            Irrigation
            Fertiliser
            SurfaceOrganicMatter: InitialResidueName=grass; InitialResidueType=grass; InitialResidueMass=500; InitialStandingFraction=0; InitialCPR=0; InitialCNR=40
            Soil TempletonPaparua: SoilType=Udic Haplustept (US),  Immature Pallic Soil (NZ); LocalName=Templeton Fine Sandy Loam; Site=LURDF; NearestTown=Lincoln; Region=Canterbury; Country=New Zealand; Latitude=0; Longitude=0; DataSource=Adapted based on data from the NZ Natioanl Soils Database
              Comments=Different references name the soil at the site as either Templeton or Paparua (very similar soils)
              Chemical
                Thickness  NO3N      NH4N      PH
                150        5         0.493827  6
                150        4         0.34965   6
                200        1.5       0.2       6
                250        1.5       0.2       6
                250        1.5       0.135135  6
                500        0.780142  0.070922  6
              Physical
                Thickness  ParticleSizeClay  ParticleSizeSand  ParticleSizeSilt  BD    AirDry  LL15   DUL    SAT    KS
                150        21.8              17.4              60.9              1.35  0.057   0.17   0.34   0.439  2913.761
                150        18.3              24.8              56.9              1.43  0.159   0.177  0.325  0.409  1052.63
                200        19.5              21                59.5              1.54  0.186   0.186  0.327  0.362  182.149
                250        10.3              37                52.6              1.54  0.13    0.132  0.251  0.358  1272.997
                250        9.5               43.6              46.9              1.48  0.116   0.116  0.24   0.365  1767.199
                500        16.6              24.2              59.3              1.41  0.138   0.138  0.273  0.39   586.553
                SoilCrop PlantainSoil: LL=[0.17, 0.18, 0.19, 0.13, 0.12, 0.14]; KL=[0.12, 0.11, 0.06, 0.03, 0.01, 0.01]; XF=[1, 1, 1, 1, 1, 1]
              WaterBalance SoilWater: SummerDate=1-Nov; SummerU=6; SummerCona=3.5; WinterDate=1-apr; WinterU=2; WinterCona=2; DiffusConst=88; DiffusSlope=35; Salb=0.13; CN2Bare=73; CNRed=20; CNCov=0.8; Thickness=[150, 150, 200, 250, 250, 500]; SWCON=[0.5, 0.41, 0.27, 0.39, 0.49, 0.42]
              Organic: FOMCNRatio=40
                Thickness  Carbon  SoilCNRatio  FBiom  FInert  FOM
                150        2.6     11.3         0.045  0.475   358.617
                150        1.01    11.3         0.025  0.695   265.67
                200        0.4     11.3         0.022  0.845   178.084
                250        0.19    11.3         0.02   0.89    108.013
                250        0.22    11.3         0.01   0.96    65.5135
                500        0.18    11.3         0.01   0.99    24.1011
              InitialWater Initial water: PercentMethod=0; FractionFull=0.99
              CERESSoilTemperature Temperature
              Nutrient
            Plant Plantain
            Report: EventNames=[Clock].DoReport
      Experiment FRNLRuakura
        Memo
          ###FRNL Ruakura###

          This simulation setup was based on field trials performed at DairyNZ's Scott Farm, in Ruakura, New Zealand, between 2014 and 2016.  The experiment was part of the FRNL (Forages for Reduced Nitrogen Leaching) program and the data is basically unpublished (references will be added when this come about).  Here only plots with pure plantain are used.
          The experiment consisted of six fertiliser treatments (N rates of 0, 50, 100, 200, 350 and 500 kg/ha/yr) in three replicates, and measurements comprised yield and quality indicators (here N content is used).
          Observed data supplied by Grant Edwards, Lincoln University.

          The soil at the experimental site was a Horotiu silt loam (an Orthic Allophanic soil; USDA: Typic Udivitrand), the parameters required were inferred using data from the New Zealand National Soils Database (Landcare Research).
          Weather data was obtained from nearby Ruakura weather station (NIWA).
        Factors
          Factor NRate: Specification=[NRate]
            Operations 0
            Operations 50
              2014-12-22  [Fertiliser].Apply(Amount: 5, Type: Fertiliser.Types.UreaN, Depth: 10)
              2015-01-19  [Fertiliser].Apply(Amount: 5, Type: Fertiliser.Types.UreaN, Depth: 10)
              2015-03-23  [Fertiliser].Apply(Amount: 5, Type: Fertiliser.Types.UreaN, Depth: 10)
              2015-05-01  [Fertiliser].Apply(Amount: 5, Type: Fertiliser.Types.UreaN, Depth: 10)
              2015-06-18  [Fertiliser].Apply(Amount: 5, Type: Fertiliser.Types.UreaN, Depth: 10)
              2015-09-09  [Fertiliser].Apply(Amount: 5, Type: Fertiliser.Types.UreaN, Depth: 10)
              2015-10-29  [Fertiliser].Apply(Amount: 5, Type: Fertiliser.Types.UreaN, Depth: 10)
              2015-10-09  [Fertiliser].Apply(Amount: 5, Type: Fertiliser.Types.UreaN, Depth: 10)
              2015-11-24  [Fertiliser].Apply(Amount: 5, Type: Fertiliser.Types.UreaN, Depth: 10)
              2015-12-17  [Fertiliser].Apply(Amount: 5, Type: Fertiliser.Types.UreaN, Depth: 10)
              2016-01-26  [Fertiliser].Apply(Amount: 5, Type: Fertiliser.Types.UreaN, Depth: 10)
              2016-04-12  [Fertiliser].Apply(Amount: 5, Type: Fertiliser.Types.UreaN, Depth: 10)
              2016-06-30  [Fertiliser].Apply(Amount: 5, Type: Fertiliser.Types.UreaN, Depth: 10)
            Operations 100
              2014-12-22  [Fertiliser].Apply(Amount: 10, Type: Fertiliser.Types.UreaN, Depth: 10)
              2015-01-19  [Fertiliser].Apply(Amount: 10, Type: Fertiliser.Types.UreaN, Depth: 10)
              2015-03-23  [Fertiliser].Apply(Amount: 10, Type: Fertiliser.Types.UreaN, Depth: 10)
              2015-05-01  [Fertiliser].Apply(Amount: 10, Type: Fertiliser.Types.UreaN, Depth: 10)
              2015-06-18  [Fertiliser].Apply(Amount: 10, Type: Fertiliser.Types.UreaN, Depth: 10)
              2015-09-09  [Fertiliser].Apply(Amount: 10, Type: Fertiliser.Types.UreaN, Depth: 10)
              2015-10-09  [Fertiliser].Apply(Amount: 10, Type: Fertiliser.Types.UreaN, Depth: 10)
              2015-10-29  [Fertiliser].Apply(Amount: 10, Type: Fertiliser.Types.UreaN, Depth: 10)
              2015-11-24  [Fertiliser].Apply(Amount: 10, Type: Fertiliser.Types.UreaN, Depth: 10)
              2015-12-17  [Fertiliser].Apply(Amount: 10, Type: Fertiliser.Types.UreaN, Depth: 10)
              2016-01-26  [Fertiliser].Apply(Amount: 10, Type: Fertiliser.Types.UreaN, Depth: 10)
              2016-04-12  [Fertiliser].Apply(Amount: 10, Type: Fertiliser.Types.UreaN, Depth: 10)
              2016-06-30  [Fertiliser].Apply(Amount: 10, Type: Fertiliser.Types.UreaN, Depth: 10)
            Operations 200
              2014-12-22  [Fertiliser].Apply(Amount: 20, Type: Fertiliser.Types.UreaN, Depth: 10)
              2015-01-19  [Fertiliser].Apply(Amount: 20, Type: Fertiliser.Types.UreaN, Depth: 10)
              2015-03-23  [Fertiliser].Apply(Amount: 20, Type: Fertiliser.Types.UreaN, Depth: 10)
              2015-05-01  [Fertiliser].Apply(Amount: 20, Type: Fertiliser.Types.UreaN, Depth: 10)
              2015-06-18  [Fertiliser].Apply(Amount: 20, Type: Fertiliser.Types.UreaN, Depth: 10)
              2015-09-09  [Fertiliser].Apply(Amount: 20, Type: Fertiliser.Types.UreaN, Depth: 10)
              2015-10-09  [Fertiliser].Apply(Amount: 20, Type: Fertiliser.Types.UreaN, Depth: 10)
              2015-10-29  [Fertiliser].Apply(Amount: 20, Type: Fertiliser.Types.UreaN, Depth: 10)
              2015-11-24  [Fertiliser].Apply(Amount: 20, Type: Fertiliser.Types.UreaN, Depth: 10)
              2015-12-17  [Fertiliser].Apply(Amount: 20, Type: Fertiliser.Types.UreaN, Depth: 10)
              2016-01-26  [Fertiliser].Apply(Amount: 20, Type: Fertiliser.Types.UreaN, Depth: 10)
              2016-04-12  [Fertiliser].Apply(Amount: 20, Type: Fertiliser.Types.UreaN, Depth: 10)
              2016-06-30  [Fertiliser].Apply(Amount: 20, Type: Fertiliser.Types.UreaN, Depth: 10)
            Operations 350
              2014-12-22  [Fertiliser].Apply(Amount: 35, Type: Fertiliser.Types.UreaN, Depth: 10)
              2015-01-19  [Fertiliser].Apply(Amount: 35, Type: Fertiliser.Types.UreaN, Depth: 10)
              2015-03-23  [Fertiliser].Apply(Amount: 35, Type: Fertiliser.Types.UreaN, Depth: 10)
              2015-05-01  [Fertiliser].Apply(Amount: 35, Type: Fertiliser.Types.UreaN, Depth: 10)
              2015-06-18  [Fertiliser].Apply(Amount: 35, Type: Fertiliser.Types.UreaN, Depth: 10)
              2015-09-09  [Fertiliser].Apply(Amount: 35, Type: Fertiliser.Types.UreaN, Depth: 10)
              2015-10-09  [Fertiliser].Apply(Amount: 35, Type: Fertiliser.Types.UreaN, Depth: 10)
              2015-10-29  [Fertiliser].Apply(Amount: 35, Type: Fertiliser.Types.UreaN, Depth: 10)
              2015-11-24  [Fertiliser].Apply(Amount: 35, Type: Fertiliser.Types.UreaN, Depth: 10)
              2015-12-17  [Fertiliser].Apply(Amount: 35, Type: Fertiliser.Types.UreaN, Depth: 10)
              2016-01-26  [Fertiliser].Apply(Amount: 35, Type: Fertiliser.Types.UreaN, Depth: 10)
              2016-04-12  [Fertiliser].Apply(Amount: 35, Type: Fertiliser.Types.UreaN, Depth: 10)
              2016-06-30  [Fertiliser].Apply(Amount: 35, Type: Fertiliser.Types.UreaN, Depth: 10)
            Operations 500
              2014-12-22  [Fertiliser].Apply(Amount: 50, Type: Fertiliser.Types.UreaN, Depth: 10)
              2015-01-19  [Fertiliser].Apply(Amount: 50, Type: Fertiliser.Types.UreaN, Depth: 10)
              2015-03-23  [Fertiliser].Apply(Amount: 50, Type: Fertiliser.Types.UreaN, Depth: 10)
              2015-05-01  [Fertiliser].Apply(Amount: 50, Type: Fertiliser.Types.UreaN, Depth: 10)
              2015-06-18  [Fertiliser].Apply(Amount: 50, Type: Fertiliser.Types.UreaN, Depth: 10)
              2015-09-09  [Fertiliser].Apply(Amount: 50, Type: Fertiliser.Types.UreaN, Depth: 10)
              2015-10-09  [Fertiliser].Apply(Amount: 50, Type: Fertiliser.Types.UreaN, Depth: 10)
              2015-10-29  [Fertiliser].Apply(Amount: 50, Type: Fertiliser.Types.UreaN, Depth: 10)
              2015-11-24  [Fertiliser].Apply(Amount: 50, Type: Fertiliser.Types.UreaN, Depth: 10)
              2015-12-17  [Fertiliser].Apply(Amount: 50, Type: Fertiliser.Types.UreaN, Depth: 10)
              2016-01-26  [Fertiliser].Apply(Amount: 50, Type: Fertiliser.Types.UreaN, Depth: 10)
              2016-04-12  [Fertiliser].Apply(Amount: 50, Type: Fertiliser.Types.UreaN, Depth: 10)
              2016-06-30  [Fertiliser].Apply(Amount: 50, Type: Fertiliser.Types.UreaN, Depth: 10)
        Simulation FRNLRuakura
          Clock: Start=2014-06-01; End=2016-06-30
          Weather: FileName=Ruakura.met
          Summary summaryfile
          SoilArbitrator Soil Arbitrator
          Zone Field: Area=1; Slope=0; AspectAngle=0; Altitude=50
            Folder Management
              Operations Sowing
                2014-10-24  [Plantain].Sow(population: 200, cultivar: "Tonic", depth: 10, rowSpacing: 150)
              Operations NRate
              Operations BaseFertiliser
                2014-10-13  [Fertiliser].Apply(Amount: 26.4, Type: Fertiliser.Types.UreaN, Depth: 10)
                2014-12-23  [Fertiliser].Apply(Amount: 3.9, Type: Fertiliser.Types.UreaN, Depth: 10)
              Manager Defoliate: same as Validation.New Zealand.FRNLLincoln.FRNLLincoln.Field.Management.Defoliate
              Operations DefoliationSchedule
                2014-12-16  [Defoliate].Script.Defoliate(defoliationType: "Cut", amountDM: 60, amountType: "ResidualDM", duration: 1)
                2015-01-14  [Defoliate].Script.Defoliate(defoliationType: "Cut", amountDM: 60, amountType: "ResidualDM", duration: 1)
                2015-03-18  [Defoliate].Script.Defoliate(defoliationType: "Cut", amountDM: 60, amountType: "ResidualDM", duration: 1)
                2015-04-28  [Defoliate].Script.Defoliate(defoliationType: "Cut", amountDM: 60, amountType: "ResidualDM", duration: 1)
                2015-06-17  [Defoliate].Script.Defoliate(defoliationType: "Cut", amountDM: 60, amountType: "ResidualDM", duration: 1)
                2015-09-07  [Defoliate].Script.Defoliate(defoliationType: "Cut", amountDM: 60, amountType: "ResidualDM", duration: 1)
                2015-10-07  [Defoliate].Script.Defoliate(defoliationType: "Cut", amountDM: 60, amountType: "ResidualDM", duration: 1)
                2015-10-28  [Defoliate].Script.Defoliate(defoliationType: "Cut", amountDM: 60, amountType: "ResidualDM", duration: 1)
                2015-11-23  [Defoliate].Script.Defoliate(defoliationType: "Cut", amountDM: 60, amountType: "ResidualDM", duration: 1)
                2015-12-16  [Defoliate].Script.Defoliate(defoliationType: "Cut", amountDM: 60, amountType: "ResidualDM", duration: 1)
                2016-01-25  [Defoliate].Script.Defoliate(defoliationType: "Cut", amountDM: 60, amountType: "ResidualDM", duration: 1)
                2016-04-11  [Defoliate].Script.Defoliate(defoliationType: "Cut", amountDM: 60, amountType: "ResidualDM", duration: 1)
                2016-06-29  [Defoliate].Script.Defoliate(defoliationType: "Cut", amountDM: 60, amountType: "ResidualDM", duration: 1)
                2016-09-21  [Defoliate].Script.Defoliate(defoliationType: "Cut", amountDM: 60, amountType: "ResidualDM", duration: 1)
              Manager ExtraVariables
                script: same as in Validation.New Zealand.FRNLLincoln.FRNLLincoln.Field.Management.ExtraVariables
            MicroClimate: a_interception=0; b_interception=1; c_interception=0; d_interception=0; soil_albedo=0.23; SoilHeatFluxFraction=0.4; MinimumHeightDiffForNewLayer=0; NightInterceptionFraction=0.5; ReferenceHeight=2
            Irrigation
            Fertiliser
            SurfaceOrganicMatter: InitialResidueName=grass; InitialResidueType=grass; InitialResidueMass=500; InitialStandingFraction=0; InitialCPR=0; InitialCNR=40
            Soil HorotiuSoil: SoilType=Typic Udivitrand (US), Typic Orthic Allophanic Soil (NZ); LocalName=Horotiu silt loam; Site=Ruakura; NearestTown=Hamilton; Region=Waikato; Country=New Zealand; Latitude=0; Longitude=0; DataSource=Based primarily on data from Close et al, 2003
              Chemical
                Thickness  NO3N     NH4N   PH
                200        15       0.5    6
                200        10       0.2    6
                130        5        0.093  6
                140        5        0.093  6
                380        4.47368  0.093  6
                230        1        0.093  6
                220        1        0.093  6
              Physical
                Thickness  ParticleSizeClay  ParticleSizeSand  ParticleSizeSilt  BD    AirDry  LL15   DUL    SAT    KS
                200        20                47                33                0.88  0.114   0.228  0.373  0.581  553
                200        19                65                17                0.85  0.209   0.22   0.34   0.609  5083
                130        11                76                13                1.03  0.1     0.182  0.323  0.54   8353
                140        7                 84                10                1.11  0.1     0.15   0.282  0.5    13589
                380        5                 88                8                 1.11  0.1     0.142  0.2    0.5    38963
                230        3                 91                6                 1.03  0.1     0.103  0.16   0.446  45280
                220        1                 94                5                 1.03  0.08    0.08   0.13   0.37   53606
                SoilCrop PlantainSoil: LL=[0.23, 0.22, 0.18, 0.15, 0.14, 0.1, 0.08]; KL=[0.1, 0.08, 0.05, 0.02, 0.01, 0.01, 0]; XF=[1, 1, 1, 1, 1, 1, 0.5]
              WaterBalance SoilWater: SummerDate=21-Sep; SummerU=6; SummerCona=3.5; WinterDate=23-Mar; WinterU=6; WinterCona=2.5; DiffusConst=88; DiffusSlope=35; Salb=0.2; CN2Bare=0.7; CNRed=20; CNCov=0.8; Thickness=[200, 200, 130, 140, 380, 230, 220]; SWCON=[0.55, 0.6, 0.7, 0.7, 0.75, 0.8, 0.8]
              Organic: FOMCNRatio=40
                Thickness  Carbon  SoilCNRatio  FBiom  FInert  FOM
                200        8       12.5         0.06   0.6     338.974
                200        1.88    12.5         0.03   0.645   227.221
                130        0.93    12.5         0.021  0.675   175.199
                140        0.43    12.5         0.01   0.7     132.413
                380        0.13    12.5         0.01   0.78    61.9249
                230        0.1     12.5         0.01   0.87    39.0922
                220        0.07    12.5         0.01   0.95    25.1768
              InitialWater Initial water: PercentMethod=1; FractionFull=0.9
              CERESSoilTemperature Temperature
              Nutrient
            Plant Plantain
            Report: EventNames=[Clock].DoReport
      Memo SubTitle
        ### All data from New Zealand
    Folder USA
      Experiment RELARC_01
        Memo
          ###RELARC 01###

          This simulation was adapted from a defoliation trial conducted in 1998-1999, at Russell E. Larson Agricultural Research Center, Pennsylvania, USA.  The trial consisted of small plots where two plantain cultivars ('*Lancelot*' and '*Tonic*') were sown separately in May-1997 (at 11.0 kg seed/ha).  Population decreased markedly after the 1998/99 winter and plantain plots were no longer used. Plots were fertilized with 27 kgP and 72 kgK/ha in October 1997. Fertilizer N was applied at 56 kg/ha in June and July of 1998.  Treatments were replicated five times and the soil at the site was a Hagerstown silt loam (fine, mixed, semiactive mesic Typic Hapludalfs).
          Each plot was divided in two, one-half was harvested every 3 wk and the other half every 5 wk. Each strip was cut to a 7-cm height with a rotary mower.  Dates for each cut were given, but only annual and treatment yields are reported;  population numbers were provided for few specific dates.  Yield for each harvest were arbitrarily inferred, therefore they should be seen as rough indication only.
          Met file was built using data obtained from NOAA website.  The data set was largely complete except for solar radiation, which was added from an alternative interpolated set for this location, also from NOAA.
          Information to assemble the soil data was obtained from USGS.

          References:
          Sanderson, M.A.; Labreveux, M.; Hall, M.H.; Elwinger, G.F. 2003. Forage yield and persistence of chicory and english plantain. Crop Science, 43: 995-1000.
        Factors
          Permutation
            Factor Cultivar: Specification=[Sowing]
              Operations Lancelot
                1997-05-16  [Plantain].Sow(population: 250, cultivar: "Lancelot", depth: 10, rowSpacing: 150)
              Operations Tonic
                1997-05-16  [Plantain].Sow(population: 250, cultivar: "Tonic", depth: 10, rowSpacing: 150)
            Factor CutFrequency: Specification=[Cuttings]
              Operations 3wks
                1998-05-19  [Defoliate].Script.Defoliate(defoliationType: "Cut", amountDM: 50, amountType: "ResidualDM", duration: 1)
                1998-06-10  [Defoliate].Script.Defoliate(defoliationType: "Cut", amountDM: 50, amountType: "ResidualDM", duration: 1)
                1998-06-30  [Defoliate].Script.Defoliate(defoliationType: "Cut", amountDM: 50, amountType: "ResidualDM", duration: 1)
                1998-07-21  [Defoliate].Script.Defoliate(defoliationType: "Cut", amountDM: 50, amountType: "ResidualDM", duration: 1)
                1998-08-11  [Defoliate].Script.Defoliate(defoliationType: "Cut", amountDM: 50, amountType: "ResidualDM", duration: 1)
                1998-09-02  [Defoliate].Script.Defoliate(defoliationType: "Cut", amountDM: 50, amountType: "ResidualDM", duration: 1)
                1998-09-23  [Defoliate].Script.Defoliate(defoliationType: "Cut", amountDM: 50, amountType: "ResidualDM", duration: 1)
                1999-05-20  [Defoliate].Script.Defoliate(defoliationType: "Cut", amountDM: 50, amountType: "ResidualDM", duration: 1)
                1999-06-10  [Defoliate].Script.Defoliate(defoliationType: "Cut", amountDM: 50, amountType: "ResidualDM", duration: 1)
                1999-07-01  [Defoliate].Script.Defoliate(defoliationType: "Cut", amountDM: 50, amountType: "ResidualDM", duration: 1)
                1999-07-22  [Defoliate].Script.Defoliate(defoliationType: "Cut", amountDM: 50, amountType: "ResidualDM", duration: 1)
                1999-08-12  [Defoliate].Script.Defoliate(defoliationType: "Cut", amountDM: 50, amountType: "ResidualDM", duration: 1)
                1999-09-02  [Defoliate].Script.Defoliate(defoliationType: "Cut", amountDM: 50, amountType: "ResidualDM", duration: 1)
                1999-09-23  [Defoliate].Script.Defoliate(defoliationType: "Cut", amountDM: 50, amountType: "ResidualDM", duration: 1)
              Operations 5wks
                1998-05-19  [Defoliate].Script.Defoliate(defoliationType: "Cut", amountDM: 50, amountType: "ResidualDM", duration: 1)
                1998-06-24  [Defoliate].Script.Defoliate(defoliationType: "Cut", amountDM: 50, amountType: "ResidualDM", duration: 1)
                1998-07-29  [Defoliate].Script.Defoliate(defoliationType: "Cut", amountDM: 50, amountType: "ResidualDM", duration: 1)
                1998-09-02  [Defoliate].Script.Defoliate(defoliationType: "Cut", amountDM: 50, amountType: "ResidualDM", duration: 1)
                1998-10-07  [Defoliate].Script.Defoliate(defoliationType: "Cut", amountDM: 50, amountType: "ResidualDM", duration: 1)
                1999-05-20  [Defoliate].Script.Defoliate(defoliationType: "Cut", amountDM: 50, amountType: "ResidualDM", duration: 1)
                1999-06-24  [Defoliate].Script.Defoliate(defoliationType: "Cut", amountDM: 50, amountType: "ResidualDM", duration: 1)
                1999-07-29  [Defoliate].Script.Defoliate(defoliationType: "Cut", amountDM: 50, amountType: "ResidualDM", duration: 1)
                1999-09-02  [Defoliate].Script.Defoliate(defoliationType: "Cut", amountDM: 50, amountType: "ResidualDM", duration: 1)
                1999-10-07  [Defoliate].Script.Defoliate(defoliationType: "Cut", amountDM: 50, amountType: "ResidualDM", duration: 1)
        Simulation RELARC_01
          Clock: Start=1997-05-01; End=1998-12-31
          Weather: FileName=StateCollege.met
          Summary
          SoilArbitrator Soil Arbitrator
          Zone Field: Area=1; Slope=0; AspectAngle=0; Altitude=50
            Folder Management
              Manager ExtraVariables
```csharp
using Models.Core;
using System;

namespace Models
{
    [Serializable] 
    public class Script : Model
    {
    }
}
```
              Operations Sowing
              Operations FertiliserSchedule
                1998-06-01  [Fertiliser].Apply(Amount: 56, Type: Fertiliser.Types.NH4NO3N, Depth: 10)
                1998-07-15  [Fertiliser].Apply(Amount: 56, Type: Fertiliser.Types.NH4NO3N, Depth: 10)
              Operations BaseCut
                1997-09-15  [Defoliate].Script.Defoliate(defoliationType: "Cut", amountDM: 50, amountType: "ResidualDM", duration: 1)
              Operations Cuttings
              Manager Defoliate: same as Validation.New Zealand.FRNLLincoln.FRNLLincoln.Field.Management.Defoliate
            MicroClimate: a_interception=0; b_interception=1; c_interception=0; d_interception=0; soil_albedo=0.23; SoilHeatFluxFraction=0.4; MinimumHeightDiffForNewLayer=0; NightInterceptionFraction=0.5; ReferenceHeight=2
            SurfaceOrganicMatter: InitialResidueName=grass; InitialResidueType=grass; InitialResidueMass=500; InitialStandingFraction=0; InitialCPR=0; InitialCNR=40
            Irrigation
            Fertiliser
            Soil HagerstownSoil: SoilType=Typic Hapludult (US); LocalName=Ramsey fine-loam; State=West Virginia; Country=USA; NaturalVegetation=Forest; Latitude=0; Longitude=0; DataSource=National Cooperative Soil Survey, US
              Comments=Generic soil description based on data of the same sol type from different locations
              Chemical
                Thickness  NO3N      NH4N       PH
                100        15.3846   1.53846    6
                120        9.05797   1.20773    6
                130        2.17344   0.217344   6
                200        2.17344   0.217344   6
                300        0.352858  0.0352858  6
                300        0.352858  0.0352858  6
                350        0.352858  0.0352858  6
              Physical
                Thickness  ParticleSizeClay  ParticleSizeSand  ParticleSizeSilt  BD    AirDry  LL15   DUL    SAT    KS
                100        21.7              11.4              66.9              1.3   0.048   0.12   0.277  0.465  1200
                120        22.4              10.9              66.7              1.38  0.085   0.094  0.264  0.421  420
                130        23.8              11.9              64.3              1.37  0.079   0.079  0.238  0.381  275
                200        25.5              13.7              60.8              1.41  0.05    0.094  0.222  0.381  200
                300        43.3              11.1              45.6              1.47  0.05    0.141  0.255  0.338  80
                300        51.4              8.7               39.9              1.48  0.155   0.155  0.28   0.359  40
                350        48                9.3               42.7              1.52  0.166   0.166  0.296  0.409  80
                SoilCrop PlantainSoil: LL=[0.12, 0.09, 0.08, 0.09, 0.14, 0.16, 0.17]; KL=[0.1, 0.09, 0.08, 0.05, 0.03, 0.02, 0.02]; XF=[1, 1, 1, 1, 1, 1, 1]
              WaterBalance SoilWater: SummerDate=21-Mar; SummerU=6; SummerCona=3.5; WinterDate=23-Sep; WinterU=6; WinterCona=2.5; DiffusConst=88; DiffusSlope=35; Salb=0.13; CN2Bare=73; CNRed=20; CNCov=0.8; Thickness=[100, 120, 130, 200, 300, 300, 350]; SWCON=[0.6, 0.5, 0.3, 0.3, 0.25, 0.2, 0.3]
              Organic: FOMCNRatio=40
                Thickness  Carbon  SoilCNRatio  FBiom  FInert  FOM
                100        3.26    11           0.05   0.4     311.903
                120        1.17    11           0.03   0.6     245.352
                130        0.39    11           0.02   0.75    189.179
                200        0.4     11           0.015  0.875   126.81
                300        0.25    11           0.01   0.95    69.595
                300        0.2     11           0.01   0.99    38.1945
                350        0.15    11           0.01   0.99    18.9668
              InitialWater Initial water: PercentMethod=1; FractionFull=0.95
              CERESSoilTemperature Temperature
              Nutrient
            Plant Plantain
            Report: EventNames=[Clock].DoReport
      Experiment RELARC_02
        Memo
          ###RELARC 02###

          This simulation was adapted from a defoliation trial conducted in 2000-2001, at Russell E. Larson Agricultural Research Center, Pennsylvania, USA.  The trial was established in small plots, replicated five times, with plantain sown in April-1999 (Cultivars '*Lancelot*' and '*Tonic*'.  Only data from the first year is used as the population declined markedly in the second winter.  All plots received 4.5 t/ha of limestone and were fertilized with 56 kg N/ha in April, June and July of 2000.  The soil at the site was a Hagerstown silt loam (fine, mixed, semiactive mesic Typic Hapludalfs).
          Each plot was mechanically mowed to height of 7cm every 4 weeks.  Only annual and treatment yields are reported, however population was given for specific dates.  Dates for each harvest were reported.  From these data, yield was arbitrarily inferred for each harvest, therefore they should be seen as rough approximation only (N variation between cultivars were considered here).
          Met file was built using data obtained from NOAA website.  The data set was largely complete except for solar radiation, which was added from an alternative interpolated set for this location, also from NOAA.
          Information to assemble the soil data was obtained from USGS.

          References:
          Sanderson, M.A.; Labreveux, M.; Hall, M.H.; Elwinger, G.F. 2003. Forage yield and persistence of chicory and english plantain. Crop Science, 43: 995-1000.
        Factors
          Factor Cultivar: Specification=[Sowing]
            Operations Lancelot
              1999-04-28  [Plantain].Sow(population: 300, cultivar: "Lancelot", depth: 10, rowSpacing: 150)
            Operations Tonic
              1999-04-28  [Plantain].Sow(population: 300, cultivar: "Tonic", depth: 10, rowSpacing: 150)
        Simulation RELARC_02
          Clock: Start=1999-04-01; End=2000-12-31
          Weather: FileName=StateCollege.met
          Summary
          SoilArbitrator Soil Arbitrator
          Zone Field: Area=1; Slope=0; AspectAngle=0; Altitude=50
            Folder Management
              Manager ExtraVariables
```csharp
using Models.Climate;
using APSIM.Shared.Utilities;
using System.Xml.Serialization;
using Models;
using Models.PMF;
using Models.Soils.Nutrients;
using Models.Soils;
using System.Text;
using System.Collections.Generic;
using Models.Core;
using System;
using Models.Interfaces;
using Models.PMF.Organs;

namespace Models
{
    [Serializable] 
    public class Script : Model
    {
        [Link] private Clock Clock;
        [Link] private Weather Met;
        [Link] private Fertiliser Fert;
        [Link] private Irrigation Irrig;
        [Link] private Plant Plantain;
        [Link] private Zone zone;
        [Link(ByName = true)]
        private ISolute Urea;
        [Link(ByName = true)]
        private ISolute NO3;
        [Link(ByName = true)]
        private ISolute NH4;
        [Link(ByName = true)]
        private SoilNitrogen SoilNitrogen;
        [Link] private Soils.Soil Soil;
        [Link] private Models.Surface.SurfaceOrganicMatter SOM;
        [Link] private Nutrient Nutrient;
        [Link(Type = LinkType.Path, Path = "[Plantain].Root")]
        private Root root;
        [Link]
        private IPhysical soilPhysical;
        [Link]
        private ISoilWater waterBalance;
                    
        [XmlIgnore] public bool InitialDay { get; set; }
        
        [XmlIgnore] public double AccumPlantN { get; set; }
        [XmlIgnore] public double AccumMineralisation { get; set; }
        [XmlIgnore] public double AccumDenit { get; set; }
        [XmlIgnore] public double AccumFert { get; set; }
        [XmlIgnore] public double AccumLeach { get; set; }
        [XmlIgnore] public double AccumDetach { get; set; }
        [XmlIgnore] public double DeltaSoilOMN { get; set; }
        [XmlIgnore] public double DeltaSurfaceOMN { get; set; }
        [XmlIgnore] public double DeltaSoilMineralN { get; set; }
        [XmlIgnore] public double SoilNitrogenContent { get; set; }
        
        [XmlIgnore] public double AccumEO { get; set; }
        [XmlIgnore] public double AccumEP { get; set; }
        [XmlIgnore] public double AccumES { get; set; }
        [XmlIgnore] public double AccumDrainage { get; set; }
        [XmlIgnore] public double AccumRunoff { get; set; }
        [XmlIgnore] public double AccumOutflowLat { get; set; }
        [XmlIgnore] public double AccumIrrigation { get; set; }
        [XmlIgnore] public double AccumRainfall { get; set; }
        [XmlIgnore] public double SoilWaterDeficit { get; set; }
    
        [XmlIgnore] public double  InitialSoilOMN { get; set; }
        [XmlIgnore] public double  InitialSurfaceOMN { get; set; }
        [XmlIgnore] public double  InitialMineralN { get; set; }
        
        [XmlIgnore] public double SWC { get; set; }
        [XmlIgnore] public double DUL { get; set; }
        [XmlIgnore] public double OutFlowLat { get; set; }

        [XmlIgnore] public double FomN { get; set; }
        [XmlIgnore] public double BiomN { get; set; }
        [XmlIgnore] public double HumN { get; set; }
        [XmlIgnore] public double OrganicN { get; set; }
        [XmlIgnore] public double NO3N { get; set; }
        [XmlIgnore] public double NH4N { get; set; }
        [XmlIgnore] public double UreaN { get; set; }
        [XmlIgnore] public double MineralN { get; set; }
        [XmlIgnore] public double DltNMinRes { get; set; }
        [XmlIgnore] public double DltNMinTot { get; set; }
        
        [EventSubscribe("StartOfSimulation")]
        private void OnSimulationCommencing(object sender, EventArgs e)
        {
            InitialDay = true;
        }
        
        [EventSubscribe("DoManagement")]
        private void OnDoManagement(object sender, EventArgs e)
        {
            //!!!!!! Nitrogen balance components !!!!!!
            //!!!!!!^^^^^^^^^^^^^^^^^^^^^^^^^^^^^!!!!!!
            FomN = MathUtilities.Sum(Nutrient.FOM.N);
            HumN = MathUtilities.Sum(SoilNitrogen.HumicN);
            BiomN = MathUtilities.Sum(SoilNitrogen.MicrobialN);
            OrganicN = FomN + HumN + BiomN;
            NO3N = MathUtilities.Sum(NO3.kgha);
            NH4N = MathUtilities.Sum(NH4.kgha);
            UreaN = MathUtilities.Sum(Urea.kgha);
            MineralN = NO3N + NH4N + UreaN; 
            DltNMinRes = MathUtilities.Sum(SoilNitrogen.dlt_n_min_res);
            DltNMinTot = MathUtilities.Sum(Nutrient.MineralisedN);
            int layers = soilPhysical.Thickness.Length;
            if (InitialDay == true)
            {
                InitialSurfaceOMN = SOM.N;
                InitialSoilOMN = OrganicN;
                InitialMineralN = MineralN;
                InitialDay = false;
            }
            DeltaSurfaceOMN = SOM.N - InitialSurfaceOMN;
            AccumLeach = AccumLeach - waterBalance.LeachNH4 - waterBalance.LeachNO3 - waterBalance.LeachUrea; //Fails
            AccumMineralisation += MathUtilities.Sum(Nutrient.MineralisedN);
            AccumDenit -= MathUtilities.Sum(Nutrient.Natm);
            AccumPlantN -= (double)zone.Get("Plantain.Root.NUptake");
            DeltaSoilOMN = OrganicN - InitialSoilOMN;
            DeltaSoilMineralN = MineralN - InitialMineralN;
            SoilNitrogenContent = MineralN;
            
            //!!!!!! Water balance components !!!!!!
            //!!!!!!^^^^^^^^^^^^^^^^^^^^^^^^^^!!!!!!

            AccumRainfall += Met.Rain;
            //AccumEP -= (double)zone.Get("[Plantain].Leaf.Transpiration");
            AccumEP -= (double)zone.Get("Plantain.Root.WaterUptake");
            SoilWaterDeficit = (SWC - DUL);
            double OutFlowLat = MathUtilities.Sum(waterBalance.LateralOutflow);
            AccumOutflowLat -= OutFlowLat;
        }
        
        [EventSubscribe("DoManagementCalculations")]
        private void OnDoManagementCalculations(object sender, EventArgs e)
        {
            FomN = MathUtilities.Sum(Nutrient.FOM.N);
            HumN = MathUtilities.Sum(SoilNitrogen.HumicN);
            BiomN = MathUtilities.Sum(SoilNitrogen.MicrobialN);
            AccumFert += Fert.NitrogenApplied;
            AccumIrrigation += Irrig.IrrigationApplied;
            
            
            AccumEO -= waterBalance.Eo;
            AccumES -= waterBalance.Es; 
            AccumDrainage -= waterBalance.Drainage;
            AccumRunoff -= waterBalance.Runoff;
            SWC = MathUtilities.Sum(waterBalance.SWmm);
            DUL = MathUtilities.Sum(soilPhysical.DULmm);
        }
    }
}
```
              Operations Sowing
              Operations FertiliserSchedule
                2000-04-15  [Fertiliser].Apply(Amount: 56, Type: Fertiliser.Types.NH4NO3N, Depth: 10)
                2000-06-01  [Fertiliser].Apply(Amount: 56, Type: Fertiliser.Types.NH4NO3N, Depth: 10)
                2000-07-05  [Fertiliser].Apply(Amount: 56, Type: Fertiliser.Types.NH4NO3N, Depth: 10)
              Operations Cuttings
                1999-09-15  [Defoliate].Script.Defoliate(defoliationType: "Cut", amountDM: 50, amountType: "ResidualDM", duration: 1)
                2000-05-16  [Defoliate].Script.Defoliate(defoliationType: "Cut", amountDM: 50, amountType: "ResidualDM", duration: 1)
                2000-06-14  [Defoliate].Script.Defoliate(defoliationType: "Cut", amountDM: 50, amountType: "ResidualDM", duration: 1)
                2000-07-11  [Defoliate].Script.Defoliate(defoliationType: "Cut", amountDM: 50, amountType: "ResidualDM", duration: 1)
                2000-08-08  [Defoliate].Script.Defoliate(defoliationType: "Cut", amountDM: 50, amountType: "ResidualDM", duration: 1)
                2000-09-05  [Defoliate].Script.Defoliate(defoliationType: "Cut", amountDM: 50, amountType: "ResidualDM", duration: 1)
              Manager Defoliate: same as Validation.New Zealand.FRNLLincoln.FRNLLincoln.Field.Management.Defoliate
            MicroClimate: a_interception=0; b_interception=1; c_interception=0; d_interception=0; soil_albedo=0.23; SoilHeatFluxFraction=0.4; MinimumHeightDiffForNewLayer=0; NightInterceptionFraction=0.5; ReferenceHeight=2
            SurfaceOrganicMatter: InitialResidueName=grass; InitialResidueType=grass; InitialResidueMass=500; InitialStandingFraction=0; InitialCPR=0; InitialCNR=40
            Irrigation
            Fertiliser
            Soil HagerstownSoil: same as Validation.USA.RELARC_01.RELARC_01.Field.HagerstownSoil
            Plant Plantain
            Report: EventNames=[Clock].DoReport
      Memo SubTitle
        ### All data from USA
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