Simulations: Area=0
  DataStore
  Experiment APS26
    Factors
      Factor NRate: Paths=[ApplyFertiliser].Script.Amount
        FactorValue 0
        FactorValue 40
        FactorValue 80
        FactorValue 160
      Factor Water: Paths=[IrrigationSchedule]
        FactorValue Wet
          Operations IrrigationSchedule
            1995-05-31  Irrigation.Apply(amount:31);
            1995-06-01  Irrigation.Apply(amount:13);
            1995-06-02  Irrigation.Apply(amount:26);
            1995-06-05  Irrigation.Apply(amount:26);
            1995-06-06  Irrigation.Apply(amount:26);
            1995-06-07  Irrigation.Apply(amount:26);
            1995-06-08  Irrigation.Apply(amount:26);
            1995-06-15  Wheat.Sow(population:120, cultivar:"GattonHartog", depth:40, rowSpacing:250);
            1995-07-05  Irrigation.Apply(amount:26);
            1995-07-21  Irrigation.Apply(amount:14);
            1995-08-01  Irrigation.Apply(amount:28);
            1995-08-11  Irrigation.Apply(amount:30);
            1995-08-25  Irrigation.Apply(amount:15);
            1995-08-31  Irrigation.Apply(amount:14);
            1995-09-04  Irrigation.Apply(amount:15);
            1995-09-15  Irrigation.Apply(amount:25);
            1995-09-22  Irrigation.Apply(amount:20);
            1995-10-02  Irrigation.Apply(amount:11);
        FactorValue Dry
          Operations IrrigationSchedule
            1995-06-15  Wheat.Sow(population:120, cultivar:"GattonHartog", depth:40, rowSpacing:250);
    Simulation APS26NRate160WaterWet: Area=0
      Clock: StartDate=1995-06-13; EndDate=1995-10-31
      Summary summaryfile
      WeatherFile met: FileName=APS26.met
      Zone paddock: Area=1
        Report: AutoCreateCSV=false
          Variables:
            [Clock].Today
            [Wheat].Zadok.Stage
            [Wheat].Phenology.CurrentStageName
            [Wheat].AboveGround.Wt
            [Wheat].AboveGround.N
            [Wheat].Grain.Yield
            [Wheat].Grain.Protein
            [Wheat].Grain.Size
            [Wheat].Grain.GrainNo
            [Wheat].Grain.Wt
            [Wheat].Grain.N
            [Wheat].Leaf.LAI
            [Wheat].Leaf.Live.Wt
            [Wheat].Leaf.Live.N
            [Wheat].Head.Wt
            [Wheat].Head.N
            [Wheat].Stem.Live.Wt
            [Wheat].Stem.Live.N
            [Wheat].Root.RootDepth
            [Wheat].EP
            [Wheat].SWStress.Photo
            [Wheat].SWStress.Expansion
            [Wheat].NStress.Photo
            [Wheat].NStress.Expansion
            [Wheat].Total.Wt
          Events:
            [Clock].EndOfDay
        Irrigation
        Fertiliser
          Definitions:
            Name   FractionNO3  FractionNH4  FractionUrea
            UreaN  0            0            1
            NO3N   1            0            0
        Manager ApplyFertiliser
          FertDayOfYear = 186
          Amount = 160
```csharp
using System;
using Models.Core;
using Models.PMF;
namespace Models
{
	[Serializable]
	public class Script : Model
	{
		[Link] Clock Clock;
		[Link] Fertiliser Fertiliser;
		[Link] Summary Summary;
		
		[Description("Day of year fertiliser is to be applied")]
		public int FertDayOfYear { get; set;}

		[Description("Amount of fertiliser to be applied")]
		public double Amount { get; set;}

		[EventSubscribe("StartOfDay")]
		private void OnStartOfDay(object sender, EventArgs e)
		{
			if (Clock.Today.DayOfYear == FertDayOfYear)
			{
				Fertiliser.Apply(Amount: Amount, Type: Fertiliser.Types.NO3N);
			}
		
		}
		
	}
}
```
        Soil APS26Field: SoilType=APS26Soil; LocalName=APS26Site; Site=APS26Site; NearestTown=Unknown; Region=Lawes; NaturalVegetation=Unknown; Latitude=0; Longitude=0
          Water
            Thickness  BD    AirDry  LL15  DUL   SAT
            150        1.38  0.1     0.2   0.38  0.44
            150        1.38  0.1     0.2   0.38  0.44
            150        1.38  0.1     0.2   0.38  0.44
            150        1.38  0.1     0.2   0.38  0.44
            300        1.46  0.1     0.21  0.38  0.43
            300        1.51  0.1     0.19  0.4   0.42
            300        1.49  0.1     0.14  0.38  0.43
            300        1.47  0.1     0.14  0.38  0.43
            SoilCrop Wheat: LL=[0.2, 0.2, 0.2, 0.2, 0.21, 0.19, 0.14, 0.14]; KL=[0.06, 0.06, 0.06, 0.06, 0.06, 0.06, 0.06, 0.06]; XF=[1, 1, 1, 1, 1, 1, 1, 1]
          SoilWater: min_crit_temp=5; max_crit_temp=35; max_albedo=0.23; A_to_evap_fact=0.44; canopy_eos_coef=1.7; sw_top_crit=0.9; sumes1_max=100; sumes2_max=25; solute_flow_eff=[1]; solute_flux_eff=[1]; gravity_gradient=2E-05; specific_bd=2.65; hydrol_effective_depth=450; immobile_solutes=[nh4]; canopy_fact=[1, 1, 0, 0]; canopy_fact_height=[0, 600, 1800, 30000]; canopy_fact_default=0.5; act_evap_method=ritchie; irrigation_will_runoff=false; irrigation_layer=1; SummerCona=3.5; SummerU=6; SummerDate=1-Nov; WinterCona=3.5; WinterU=6; WinterDate=1-Apr; DiffusConst=88; DiffusSlope=35.4; Salb=0.13; slope=0; discharge_width=0; catchment_area=0; max_pond=0; CN2Bare=60; CNRed=20; CNCov=0.8
            mobile_solutes  Thickness  SWCON  KLAT
            no3             150        0.3    0
            urea            150        0.3    0
            cl              150        0.3    0
            br              150        0.3    0
            org_n           300        0.3    0
            org_c_pool1     300        0.3    0
            org_c_pool2     300        0.3    0
            org_c_pool3     300        0.3    0
          SoilNitrogen: NPartitionApproach=BasedOnLayerConcentration; wnmm_n_alpha=0.002; wnmm_dn_alpha=0.5; nemis_dn_km=22; nemis_dn_pot=7.194; cent_n_soilt_ave=15; cent_n_maxt_ave=25; cent_n_wfps_ave=0.7; cent_n_max_rate=0.1; ini_FOMtype=default; fom_type=[default, manure, mucuna, lablab, shemp, stable]; fract_carb=[0.2, 0.3, 0.54, 0.57, 0.45, 0]; fract_cell=[0.7, 0.3, 0.37, 0.37, 0.47, 0.1]; fract_lign=[0.1, 0.4, 0.09, 0.06, 0.08, 0.9]; ef_res=0.4; fr_res_biom=0.9; min_depth=100; rd_carb=[0.2, 0.1]; rd_cell=[0.05, 0.25]; rd_lign=[0.0095, 0.003]; ef_fom=0.4; fr_fom_biom=0.9; cnrf_coeff=0.693; cnrf_optcn=25; rd_biom=[0.0081, 0.004]; ef_biom=0.4; fr_biom_biom=0.6; rd_hum=[0.00015, 7E-05]; ef_hum=0.4; opt_temp=[32, 32]; wfmin_index=[0, 0.5, 1, 2]; wfmin_values=[0, 1, 1, 0.5]; nitrification_pot=40; nh4_at_half_pot=90; wfnit_index=[0, 0.25, 1, 2]; wfnit_values=[0, 1, 1, 0]; pHf_nit_pH=[4.5, 6, 8, 9]; pHf_nit_values=[0, 1, 1, 0]; dnit_rate_coeff=0.0006; dnit_k1=25.1; dnit_wf_power=1; soiltype=standard; allow_simpleSoilTemp=no; profile_reduction=no; use_organic_solutes=no; c_in_fom=0.4; minPatchArea=1; mcn=8; root_depth=1800; root_cn_pool=[40, 40, 40]
            zero: n2o_approach, ureappm_min, nh4ppm_min, no3ppm_min, fom_min, oc2om_factor, ini_pH, WarningThreshold, FatalThreshold, potHydrol_min, potHydrol_parmA, potHydrol_parmB, potHydrol_parmC, potHydrol_parmD, dnit_nitrf_loss, actC_parmB, actC_parmA, N2N2O_parmA, N2N2O_parmB
          SoilOrganicMatter: RootCN=40; RootWt=500; SoilCN=14.5; EnrACoeff=1; EnrBCoeff=1; OCUnits=Total
            Thickness  OC    FBiom  FInert
            150        2.2   0.03   0.4
            150        1.6   0.02   0.6
            150        1.35  0.01   0.7
            150        0.95  0.01   0.5
            300        1     0.01   0.9
            300        0.8   0.01   0.9
            300        0.45  0.01   0.9
            300        0.45  0.01   0.9
          Analysis: Thickness=[150, 150, 150, 150, 300, 300, 300, 300]; PH=[7.5, 8, 8, 8, 8, 8, 8, 8]; PHUnits=Water; BoronUnits=HotWater
          Sample Initial Water: Thickness=[150, 150, 150, 150, 300, 300, 300, 300]; SW=[0.31, 0.36, 0.37, 0.37, 0.35, 0.34, 0.34, 0.28]; NO3Units=ppm; NH4Units=ppm; SWUnits=Volumetric; OCUnits=Total; PHUnits=Water
          Sample Initial Nitrogen: NO3Units=ppm; NH4Units=ppm; SWUnits=Volumetric; OCUnits=Total; PHUnits=Water
            Thickness  NO3  NH4
            150        1.5  1.3
            150        1.8  1
            150        1.5  1
            150        1.5  0.8
            300        0.4  0.8
            300        0.2  0.5
            300        0.4  0.5
            300        0.3  0.5
        SurfaceOrganicMatter: crit_residue_wt=2000; opt_temp=20; cum_eos_max=20; cnrf_coeff=0.277; cnrf_optcn=25; c_fract=0.4; leach_rain_tot=25; min_rain_to_leach=10; crit_min_surfom_orgC=0.004; default_cpr=0; default_standing_fraction=0; standing_extinct_coeff=0.5; fractionFaecesAdded=0.5; PoolName=wheat_stubble; type=Wheat; mass=0; standing_fraction=0.0; cpr=0; cnr=80
        Plant15 Wheat: AutoHarvest=false; CropType=Wheat; EOCropFactor=1.5; NSupplyPreference=active; DoRetranslocationBeforeNDemand=false
          Population1 Population: Density=120; LeafNumberCritical=10; TTEmergenceLimit=300; DaysToGerminationLimit=40; SWStressPhenoLimit=25; SWStressPhotoLimit=99; SWStressPhotoRate=0
            PhaseBasedSwitch CropFailureStressPeriod: Start=Emergence; End=Flowering
            SoilTemperatureWeightedFunction DeathHighTemperatureDuringEmergence
              XYPairs: X=[55, 60]; Y=[0, 1]
          Phenology
            GerminatingPhase SowingToGermination: Start=Sowing; End=Germination
            EmergingPhase15 GerminationToEmergence: Start=Germination; End=Emergence; ShootLag=40; ShootRate=1.5
              LinearInterpolationFunction ThermalTime: XProperty=[VernalisationCW].CrownTemperature
                XYPairs: X=[0, 26, 34]; Y=[0, 26, 0]
            GenericPhase EmergenceToEndOfJuvenile: Start=Emergence; End=EndOfJuvenile
              Constant Target: Value=1
              LinearInterpolationFunction ThermalTime: XProperty=[VernalisationCW].CrownTemperature
                XYPairs: X=[0, 26, 34]; Y=[0, 26, 0]
              MultiplyFunction Stress
                MinimumFunction
                  VariableReference: VariableName=[VernalisationCW].VernEff
                  VariableReference Variable1: VariableName=[VernalisationCW].PhotopEff
                MinimumFunction Stresses
                  VariableReference Variable2: VariableName=[SWStress].Pheno
                  VariableReference Variable3: VariableName=[NStress].Pheno
                  VariableReference Variable4: VariableName=[PStress].Pheno
            GenericPhase EndOfJuvenileToFloralInitiation: Start=EndOfJuvenile; End=FloralInitiation
              Constant Target: Value=400
              LinearInterpolationFunction ThermalTime: XProperty=[VernalisationCW].CrownTemperature
                XYPairs: X=[0, 26, 34]; Y=[0, 26, 0]
              MultiplyFunction Stress: same as APS26.APS26NRate160WaterWet.paddock.Wheat.Phenology.EmergenceToEndOfJuvenile.Stress
            GenericPhase FloralInitiationToFlowering: Start=FloralInitiation; End=Flowering
              Constant Target: Value=555
              LinearInterpolationFunction ThermalTime: XProperty=[VernalisationCW].CrownTemperature
                XYPairs: X=[0, 26, 34]; Y=[0, 26, 0]
              MultiplyFunction Stress: same as APS26.APS26NRate160WaterWet.paddock.Wheat.Phenology.EmergenceToEndOfJuvenile.Stress
            GenericPhase FloweringToStartGrainFill: Start=Flowering; End=StartGrainFill
              Constant Target: Value=120
              LinearInterpolationFunction ThermalTime: XProperty=[VernalisationCW].CrownTemperature
                XYPairs: X=[0, 26, 34]; Y=[0, 26, 0]
            GenericPhase StartGrainFillToEndGrainFill: Start=StartGrainFill; End=EndGrainFill
              Constant Target: Value=545
              LinearInterpolationFunction ThermalTime: XProperty=[VernalisationCW].CrownTemperature
                XYPairs: X=[0, 26, 34]; Y=[0, 26, 0]
            GenericPhase EndGrainFillToMaturity: Start=EndGrainFill; End=Maturity
              Constant Target: Value=35
              LinearInterpolationFunction ThermalTime: XProperty=[VernalisationCW].CrownTemperature
                XYPairs: X=[0, 26, 34]; Y=[0, 26, 0]
            GenericPhase MaturityToHarvestRipe: Start=Maturity; End=HarvestRipe
              Constant Target: Value=1
              LinearInterpolationFunction ThermalTime: XProperty=[VernalisationCW].CrownTemperature
                XYPairs: X=[0, 26, 34]; Y=[0, 26, 0]
            GenericPhase ReadyForHarvesting: Start=HarvestRipe; End=EndCrop
              Constant Target: Value=1000
              LinearInterpolationFunction ThermalTime: XProperty=[VernalisationCW].CrownTemperature
                XYPairs: X=[0, 26, 34]; Y=[0, 26, 0]
            GenericPhase EndCrop: Start=EndCrop; End=Unused
              Constant Target: Value=1000
              LinearInterpolationFunction ThermalTime: XProperty=[VernalisationCW].CrownTemperature
                XYPairs: X=[0, 26, 34]; Y=[0, 26, 0]
            VernalisationCW Vernalisation: VernSens=2.5; PhotopSens=3.5; StartStageForEffects=Germination; EndStageForEffects=FloralInitiation; StartStageForCumulativeVD=Germination; EndStageForCumulativeVD=FloralInitiation
              AirTemperatureFunction VDModel
                XYPairs: X=[0, 2, 8, 15]; Y=[0, 1, 0.5, 0]
              PhotoperiodFunction Photoperiod: Twilight=-6
            LinearInterpolationFunction RewindDueToBiomassRemoved: XProperty=[Phenology].FractionBiomassRemoved
              XYPairs: X=[0, 0.1, 0.4, 0.5, 1]; Y=[0, 0.08, 0.4, 0.5, 1]
            PhaseBasedSwitch AboveGroundPeriod: Start=Emergence; End=EndCrop
          Root1 Root: NConcentrationCritical=0.02; NConcentrationMinimum=0.01; NConcentrationMaximum=0.02; InitialRootDepth=100; DieBackFraction=0; ll=[0.2, 0.2, 0.2, 0.2, 0.21, 0.19, 0.14, 0.14]; kl=[0.06, 0.06, 0.06, 0.06, 0.06, 0.06, 0.06, 0.06]; xf=[1, 1, 1, 1, 1, 1, 1, 1]; ModifyKL=false; ClA=4; ClB=-0.005; ESPA=10; ESPB=-0.15; ECA=3; ECB=-1.3; NDeficitUptakeFraction=0.0001; NSenescenceConcentration=0.005; NSupplyPreference=active; SenescenceDetachmentFraction=1; InitialWt=0.01; InitialNConcentration=0.02; SpecificRootLength=105000
            Biomass Live
            Biomass Dead
            LinearInterpolationFunction RootAdvanceFactorTemp: XProperty=[Environment].MeanT
              XYPairs: X=[0, 25, 35]; Y=[0, 1, 0]
            LinearInterpolationFunction RootAdvanceFactorWaterStress: XProperty=[SWStress].Photo
              XYPairs: X=[0, 1]; Y=[1, 1]
            LinearInterpolationFunction SWFactorRootDepth: XProperty=[Root1].FASW
              XYPairs: X=[0, 0.25]; Y=[0, 1]
            LinearInterpolationFunction SWFactorRootLength: XProperty=[Root1].FASWLayered
              XYPairs: X=[0, 0.25]; Y=[0, 1]
            StageBasedInterpolation RootDepthRate: Codes=[0, 5, 30, 30, 30, 30, 0, 0, 0, 0, 0]; Proportional=false
              Stages=[Sowing, Germination, Emergence, EndOfJuvenile, FloralInitiation, Flowering, StartGrainFill, EndGrainFill, Maturity, HarvestRipe, EndCrop]
            LinearInterpolationFunction RelativeRootRate: XProperty=[Root1].RootLengthDensity
              XYPairs: X=[0, 0.0001, 0.0003]; Y=[0.02, 0.1, 1]
            NUptake3 NUptakeFunction: kno3=0.02; knh4=0; no3ppm_min=0; nh4ppm_min=0; total_n_uptake_max=0.6
              PhaseBasedSwitch NStressPeriod: Start=EndOfJuvenile(0.3); End=EndCrop
            Constant GrowthStructuralFractionStage: Value=1
            LinearInterpolationFunction DMSenescenceFraction: XProperty=[Leaf1].FractionCanopySenescing
              XYPairs: X=[0, 1]; Y=[0.005, 0.005]
            Live
            Dead
          GenericArbitratorXY Arbitrator1: DMSupply=0; PartitionOrgans=[Root, Pod, Grain, Leaf, Stem]; PartitionRules=[magic, demand, demand, frac, remainder]
            LinearInterpolationFunction FracDMRemainingInLeaf: XProperty=[Phenology].Stage
              XYPairs: X=[1, 2, 3, 4, 4.9, 5, 5.4, 6, 6.9, 7, 8, 9, 10, 11]; Y=[0, 0, 0.6, 0.6, 0.6, 0.42, 0, 0, 0, 0, 0, 0, 0, 0]
            LinearInterpolationFunction RatioRootShoot: XProperty=[Phenology].Stage
              XYPairs: X=[1, 2, 3, 4, 4.9, 5, 5.4, 6, 6.9, 7, 8, 9, 10, 11]; Y=[0, 0, 1, 1, 0.3, 0.3, 0.3, 0.08, 0.01, 0, 0, 0, 0, 0]
          Leaf1 Leaf: dlt_dm_pot_rue=0; dlt_n_senesced_retrans=5.86292e-07; dlt_n_senesced_trans=0; dlt_height=0; dlt_width=0; width=0; NodeNumberCorrection=2; SLAMin=18000; FractionLeafSenescenceRate=0.035; NodeSenescenceRate=60; NFactLeafSenescenceRate=0; MinTPLA=5; NDeficitUptakeFraction=0.0001; InitialWt=0.003; InitialNConcentration=0.063; InitialTPLA=200; InitialLeafNumber=2; LAISenLight=7; SenLightSlope=0.002; SenRateWater=0.1; NSenescenceConcentration=0.005; SenescenceDetachmentFraction=0
            Biomass Live
            Biomass Dead
            RUEModel1 Photosynthesis
              StageBasedInterpolation RUE: Codes=[0, 0, 1.24, 1.24, 1.24, 1.24, 1.24, 1.24, 0, 0, 0]; Proportional=false
                Stages=[Sowing, Germination, Emergence, EndOfJuvenile, FloralInitiation, Flowering, StartGrainFill, EndGrainFill, Maturity, HarvestRipe, EndCrop]
              RUECO2Function RUEModifier: PhotosyntheticPathway=C3
            StageBasedInterpolation TE: Proportional=false
              Stages=[Sowing, Germination, Emergence, EndOfJuvenile, FloralInitiation, Flowering, StartGrainFill, EndGrainFill, Maturity, HarvestRipe, EndCrop]
              Codes=[0, 0, 0.006, 0.006, 0.006, 0.006, 0.006, 0.006, 0.0025, 0, 0]
            LinearInterpolationFunction TEModifier: XProperty=[WeatherFile].CO2
              XYPairs: X=[350, 700, 1000]; Y=[1, 1.37, 1.69]
            LinearInterpolationFunction NConcCriticalModifier: XProperty=[WeatherFile].CO2
              XYPairs: X=[350, 700, 1000]; Y=[1, 0.93, 0.9]
            PhaseBasedSwitch NodeFormationPeriod: Start=Emergence; End=HarvestRipe
            LinearInterpolationFunction NodeAppearanceRate: XProperty=[Leaf1].NodeNo
              XYPairs: X=[0, 20]; Y=[95, 95]
            LinearInterpolationFunction LeavesPerNode: XProperty=[Leaf1].NodeNo
              XYPairs: X=[0, 2.5, 6]; Y=[1, 1, 6]
            LinearInterpolationFunction LeafSize: XProperty=[Leaf1].NodeNumberNow
              XYPairs: X=[1, 5, 8, 10]; Y=[1400, 3700, 4800, 5600]
            Constant GrowthStructuralFractionStage: Value=1
            LinearInterpolationFunction SLAMax: XProperty=[Leaf1].LAI
              XYPairs: X=[0, 5]; Y=[27000, 22000]
            LinearInterpolationFunction LeafNumberFraction: XProperty=[Leaf1].LAIRatio
              XYPairs: X=[0, 0.1, 0.8, 1]; Y=[0, 1, 1, 1]
            PhaseBasedSwitch LeafSenescencePeriod: Start=EndOfJuvenile(0.4); End=EndCrop
            LinearInterpolationFunction LeafSenescenceFrost: XProperty=[WeatherFile].MinT
              XYPairs: X=[-15, -5]; Y=[0, 0]
            LinearInterpolationFunction DMSenescenceFraction: XProperty=[Leaf1].FractionCanopySenescing
              XYPairs: X=[0, 1]; Y=[0, 1]
            LinearInterpolationFunction ExtinctionCoefficient: XProperty=[PlantSpatial1].RowSpacing
              XYPairs: X=[200, 350, 1000]; Y=[0.5, 0.5, 0.5]
            LinearInterpolationFunction ExtinctionCoefficientDead: XProperty=[PlantSpatial1].RowSpacing
              XYPairs: X=[200, 350, 1000]; Y=[0.3, 0.3, 0.3]
            StageBasedInterpolation NConcentrationMinimum: Codes=[0.025, 0.025, 0.021, 0.01, 0.005, 0.0025]; Proportional=true
              Stages=[Emergence, EndOfJuvenile, FloralInitiation, Flowering, EndGrainFill, HarvestRipe]
            StageBasedInterpolation NConcentrationMaximum: Codes=[0.07, 0.07, 0.05, 0.02, 0.01, 0.005]; Proportional=true
              Stages=[Emergence, EndOfJuvenile, FloralInitiation, Flowering, EndGrainFill, HarvestRipe]
            StageBasedInterpolation NConcentrationCritical: Codes=[0.063, 0.063, 0.042, 0.015, 0.008, 0.0035]; Proportional=true
              Stages=[Emergence, EndOfJuvenile, FloralInitiation, Flowering, EndGrainFill, HarvestRipe]
            Live
            Dead
          Stem1 Stem: dlt_n_senesced_retrans=4.34468e-05; dlt_n_senesced_trans=0; dlt_height=0; dlt_width=0; NDeficitUptakeFraction=0.0001; NSenescenceConcentration=0.0025; SenescenceDetachmentFraction=0; InitialWt=0.0016; InitialNConcentration=0.05
            Biomass Live
            Biomass Dead
            LinearInterpolationFunction RetainFraction: XProperty=[Stem1].FractionHeightRemoved
              XYPairs: X=[0, 0.1, 1]; Y=[0, 0.2, 1]
            LinearInterpolationFunction HeightFunction: XProperty=[Stem1].GreenWtPerPlant
              XYPairs: X=[0, 6]; Y=[0, 1500]
            LinearInterpolationFunction GrowthStructuralFractionStage: XProperty=[Phenology].Stage
              XYPairs: X=[7, 7.01]; Y=[0.65, 0]
            LinearInterpolationFunction DMSenescenceFraction: XProperty=[Leaf1].FractionCanopySenescing
              XYPairs: X=[0, 1]; Y=[0, 0]
            StageBasedInterpolation NConcentrationMinimum: Codes=[0.025, 0.025, 0.004, 0.003, 0.003, 0.0025]; Proportional=true
              Stages=[Emergence, EndOfJuvenile, FloralInitiation, Flowering, EndGrainFill, HarvestRipe]
            StageBasedInterpolation NConcentrationMaximum: Codes=[0.07, 0.07, 0.04, 0.015, 0.015, 0.015]; Proportional=true
              Stages=[Emergence, EndOfJuvenile, FloralInitiation, Flowering, EndGrainFill, HarvestRipe]
            StageBasedInterpolation NConcentrationCritical: Codes=[0.05, 0.05, 0.02, 0.01, 0.005, 0.0035]; Proportional=true
              Stages=[Emergence, EndOfJuvenile, FloralInitiation, Flowering, EndGrainFill, HarvestRipe]
            Live
            Dead
          Pod: InitialWt=0; InitialNConcentration=0.063; NDeficitUptakeFraction=0.0001; NSenescenceConcentration=0.007; SenescenceDetachmentFraction=0
            Biomass Live
            Biomass Dead
            RUECO2Function Fco2: PhotosyntheticPathway=C3
            StageBasedInterpolation TE: Proportional=false
              Stages=[Sowing, Germination, Emergence, EndOfJuvenile, FloralInitiation, Flowering, StartGrainFill, EndGrainFill, Maturity, HarvestRipe, EndCrop]
              Codes=[0, 0, 0.006, 0.006, 0.006, 0.006, 0.006, 0.006, 0.0025, 0, 0]
            LinearInterpolationFunction FractionGrainInPod: XProperty=[Phenology].Stage
              XYPairs: X=[1, 2, 3, 4, 4.9, 5, 5.4, 6, 6.9, 7, 8, 9, 10, 11]; Y=[0, 0, 0, 0, 0, 0, 0.33, 0.33, 0.33, 0, 0, 0, 0, 0]
            Constant GrowthStructuralFractionStage: Value=1
            LinearInterpolationFunction DMSenescenceFraction: XProperty=[Leaf1].FractionCanopySenescing
              XYPairs: X=[0, 1]; Y=[0, 0]
            StageBasedInterpolation NConcentrationMinimum: Codes=[0.025, 0.025, 0.004, 0.003, 0.003, 0.0025]; Proportional=true
              Stages=[Emergence, EndOfJuvenile, FloralInitiation, Flowering, EndGrainFill, HarvestRipe]
            StageBasedInterpolation NConcentrationMaximum: Codes=[0.07, 0.07, 0.04, 0.015, 0.015, 0.015]; Proportional=true
              Stages=[Emergence, EndOfJuvenile, FloralInitiation, Flowering, EndGrainFill, HarvestRipe]
            StageBasedInterpolation NConcentrationCritical: Codes=[0.05, 0.05, 0.02, 0.01, 0.005, 0.0035]; Proportional=true
              Stages=[Emergence, EndOfJuvenile, FloralInitiation, Flowering, EndGrainFill, HarvestRipe]
            Live
            Dead
          Grain: GrainsPerGramStem=25; PotentialGrainFillingRate=0.002; PotentialGrainGrowthRate=0.001; MinimumGrainNFillingRate=1.5E-05; GrainMaxDailyNConc=0.03; PotentialGrainNFillingRate=5.5E-05; MaxGrainSize=0.041; NSenescenceConcentration=0.014; WaterContentFraction=0.125
            zero: dlt_dm_pot_rue, dlt_n_senesced_retrans, dlt_n_senesced_trans, dlt_height, dlt_width, InitialWt, InitialNConcentration, CriticalGrainFillingRate, SenescenceDetachmentFraction
            Biomass Live
            Biomass Dead
            PhaseBasedSwitch GrainGrowthPeriod: Start=Flowering; End=EndGrainFill
            PhaseBasedSwitch ReproductivePeriod: Start=Flowering; End=EndGrainFill
            LinearInterpolationFunction RelativeGrainFill: XProperty=[Environment].MeanT
              XYPairs: X=[0, 26, 35]; Y=[0, 1, 1]
            LinearInterpolationFunction RelativeGrainNFill: XProperty=[Environment].MeanT
              XYPairs: X=[0, 25]; Y=[0, 1]
            Constant GrowthStructuralFractionStage: Value=1
            LinearInterpolationFunction DMSenescenceFraction: XProperty=[Leaf1].FractionCanopySenescing
              XYPairs: X=[0, 1]; Y=[0, 0]
            StageBasedInterpolation NConcentrationMinimum: Codes=[0, 0, 0, 0, 0.014, 0.014]; Proportional=true
              Stages=[Emergence, EndOfJuvenile, FloralInitiation, Flowering, EndGrainFill, HarvestRipe]
            StageBasedInterpolation NConcentrationMaximum: Codes=[0, 0, 0, 0, 0.03, 0.03]; Proportional=true
              Stages=[Emergence, EndOfJuvenile, FloralInitiation, Flowering, EndGrainFill, HarvestRipe]
            StageBasedInterpolation NConcentrationCritical: Codes=[0, 0, 0, 0, 0.03, 0.03]; Proportional=true
              Stages=[Emergence, EndOfJuvenile, FloralInitiation, Flowering, EndGrainFill, HarvestRipe]
            Live
            Dead
          NStress: N_fact_photo=1.5; N_fact_pheno=100; N_fact_expansion=1; N_fact_grain=1.5
          SWStress
            LinearInterpolationFunction ExpansionFactor: XProperty=[Plant15].SWSupplyDemandRatio
              XYPairs: X=[0.1, 1.1]; Y=[0, 1]
            LinearInterpolationFunction PhenoFactor: XProperty=[Root1].SWAvailRatio
              XYPairs: X=[0, 0.16]; Y=[1, 1]
            LinearInterpolationFunction FixationFactor: XProperty=[Root1].SWAvailRatio
              XYPairs: X=[0, 0.5, 0.95, 1]; Y=[1, 1, 1, 1]
            LinearInterpolationFunction OxygenDeficitPhotoFactor: XProperty=[Root1].WetRootFraction
              XYPairs: X=[0, 0.8, 1]; Y=[1, 1, 1]
            LinearInterpolationFunction PhenoFlowerFactor: XProperty=[Root1].SWAvailRatio
              XYPairs: X=[0.2, 0.5, 1]; Y=[1, 1, 1]
            LinearInterpolationFunction PhenoGrainFillingFactor: XProperty=[Root1].SWAvailRatio
              XYPairs: X=[0.2, 0.5, 1]; Y=[1, 1, 1]
          LinearInterpolationFunction TempStress: XProperty=[Environment].MeanT
            XYPairs: X=[0, 10, 25, 35]; Y=[0, 1, 1, 0]
          RadiationPartitioning: FractIncidentRadn=1; RadiationPartitioningOrder=[Pod, Grain, Leaf]
          StageBasedInterpolation NFixRate: Codes=[0, 0, 0, 0, 0, 0, 0, 0, 0, 0, 0]; Proportional=false
            Stages=[Sowing, Germination, Emergence, EndOfJuvenile, FloralInitiation, Flowering, StartGrainFill, EndGrainFill, Maturity, HarvestRipe, EndCrop]
          CompositeBiomass AboveGroundLive: Propertys=[[Leaf1].Live, [Stem1].Live, [Pod].Live, [Grain].Live]
          CompositeBiomass AboveGroundDead: Propertys=[[Leaf1].Dead, [Stem1].Dead, [Pod].Dead, [Grain].Dead]
          CompositeBiomass BelowGroundLive: Propertys=[[Root1].Live]
          CompositeBiomass BelowGroundDead: Propertys=[[Root1].Dead]
          CompositeBiomass TotalLive
            Propertys=[[Leaf1].Live, [Stem1].Live, [Pod].Live, [Grain].Live, [Root1].Live]
          CompositeBiomass TotalDead
            Propertys=[[Leaf1].Dead, [Stem1].Dead, [Pod].Dead, [Grain].Dead, [Root1].Dead]
          CompositeBiomass AboveGround: Propertys=[[AboveGroundLive], [AboveGroundDead]]
          CompositeBiomass BelowGround: Propertys=[[Root1].Live, [Root1].Dead]
          CompositeBiomass Total
            Propertys=[[AboveGroundLive], [AboveGroundDead], [BelowGroundLive], [BelowGroundDead]]
          CompositeBiomass Head: Propertys=[[Pod].Live, [Grain].Live, [Pod].Dead, [Grain].Dead]
          StageBasedInterpolation StageCode: Codes=[1, 2, 3, 4, 5, 6, 7, 8, 9, 10, 11]; Proportional=false
            Stages=[Sowing, Germination, Emergence, EndOfJuvenile, FloralInitiation, Flowering, StartGrainFill, EndGrainFill, Maturity, HarvestRipe, EndCrop]
          PlantSpatial1
          Environment: CO2=350
          PStress
          Zadok
        Operations IrrigationSchedule: same as APS26.Factors.Water.Wet.IrrigationSchedule
        MicroClimate: air_pressure=1010; soil_emissivity=0.96; sun_angle=15; soil_heat_flux_fraction=0.4; night_interception_fraction=0.5; windspeed_default=3; refheight=2; albedo=0.15; emissivity=0.96; gsmax=0.01; r50=200; a_interception=0; b_interception=1; c_interception=0; d_interception=0; soil_albedo=0.3
          ComponentData Wheat: Type=Wheat; Albedo=0.26; Emissivity=0.96; Gsmax=0.011; R50=200
        PredictedObserved: FileName=APS26TimeSeries.txt; FieldNameUsedForMatch=Wheat.Zadok.Stage
  Experiment APS6
    Factors
      Factor NRate: Paths=[ApplyFertiliser].Script.Amount
        FactorValue 0
        FactorValue 40
        FactorValue 80
        FactorValue 120
        FactorValue 160
        FactorValue 360
    Simulation APS6NRate0: Area=0
      Clock: StartDate=1992-06-14; EndDate=1992-11-17
      Summary summaryfile
      WeatherFile met: FileName=APS6.met
      Zone paddock: Area=1
        Report: same as APS26.APS26NRate160WaterWet.paddock.Report
        Irrigation
        Fertiliser
          Definitions:
            Name   FractionNO3  FractionNH4  FractionUrea
            UreaN  0            0            1
            NO3N   1            0            0
        Soil APS6Field: SoilType=APS6Soil; LocalName=APS6Site; Site=APS6Site; NearestTown=Unknown; Region=Lawes; NaturalVegetation=Unknown; Latitude=0; Longitude=0
          Water
            Thickness  BD    AirDry  LL15  DUL   SAT
            150        1.38  0.1     0.2   0.38  0.43
            150        1.34  0.1     0.2   0.38  0.43
            300        1.35  0.1     0.22  0.4   0.43
            300        1.5   0.1     0.18  0.4   0.43
            300        1.49  0.1     0.14  0.39  0.42
            300        1.46  0.1     0.2   0.38  0.4
            300        1.46  0.1     0.2   0.38  0.4
            SoilCrop Wheat: LL=[0.2, 0.2, 0.22, 0.18, 0.14, 0.25, 0.28]; KL=[0.06, 0.06, 0.06, 0.06, 0.06, 0.06, 0.06]; XF=[1, 1, 1, 1, 1, 1, 1]
          SoilWater: min_crit_temp=5; max_crit_temp=35; max_albedo=0.23; A_to_evap_fact=0.44; canopy_eos_coef=1.7; sw_top_crit=0.9; sumes1_max=100; sumes2_max=25; solute_flow_eff=[1]; solute_flux_eff=[1]; gravity_gradient=2E-05; specific_bd=2.65; hydrol_effective_depth=450; immobile_solutes=[nh4]; canopy_fact=[1, 1, 0, 0]; canopy_fact_height=[0, 600, 1800, 30000]; canopy_fact_default=0.5; act_evap_method=ritchie; irrigation_will_runoff=false; irrigation_layer=1; SummerCona=3.5; SummerU=6; SummerDate=1-Nov; WinterCona=3.5; WinterU=6; WinterDate=1-Apr; DiffusConst=88; DiffusSlope=35.4; Salb=0.13; slope=0; discharge_width=0; catchment_area=0; max_pond=0; CN2Bare=60; CNRed=20; CNCov=0.8
            Thickness  SWCON  KLAT
            150        0.3    0
            150        0.3    0
            300        0.3    0
            300        0.3    0
            300        0.3    0
            300        0.3    0
            300        0.3    0
            mobile_solutes=[no3, urea, cl, br, org_n, org_c_pool1, org_c_pool2, org_c_pool3]
          SoilNitrogen: NPartitionApproach=BasedOnLayerConcentration; wnmm_n_alpha=0.002; wnmm_dn_alpha=0.5; nemis_dn_km=22; nemis_dn_pot=7.194; cent_n_soilt_ave=15; cent_n_maxt_ave=25; cent_n_wfps_ave=0.7; cent_n_max_rate=0.1; ini_FOMtype=default; fom_type=[default, manure, mucuna, lablab, shemp, stable]; fract_carb=[0.2, 0.3, 0.54, 0.57, 0.45, 0]; fract_cell=[0.7, 0.3, 0.37, 0.37, 0.47, 0.1]; fract_lign=[0.1, 0.4, 0.09, 0.06, 0.08, 0.9]; ef_res=0.4; fr_res_biom=0.9; min_depth=100; rd_carb=[0.2, 0.1]; rd_cell=[0.05, 0.25]; rd_lign=[0.0095, 0.003]; ef_fom=0.4; fr_fom_biom=0.9; cnrf_coeff=0.693; cnrf_optcn=25; rd_biom=[0.0081, 0.004]; ef_biom=0.4; fr_biom_biom=0.6; rd_hum=[0.00015, 7E-05]; ef_hum=0.4; opt_temp=[32, 32]; wfmin_index=[0, 0.5, 1, 2]; wfmin_values=[0, 1, 1, 0.5]; soiltype=standard; allow_simpleSoilTemp=no; profile_reduction=no; use_organic_solutes=no; c_in_fom=0.4; minPatchArea=1; mcn=8; root_depth=1800; root_cn_pool=[0, 0, 0]
            zero: n2o_approach, ureappm_min, nh4ppm_min, no3ppm_min, fom_min, oc2om_factor, ini_pH, WarningThreshold, FatalThreshold, potHydrol_min, potHydrol_parmA, potHydrol_parmB, potHydrol_parmC, potHydrol_parmD, nitrification_pot, nh4_at_half_pot, dnit_rate_coeff, dnit_nitrf_loss, dnit_k1, dnit_wf_power, actC_parmB, actC_parmA, N2N2O_parmA, N2N2O_parmB
          SoilOrganicMatter: RootCN=0; RootWt=0; SoilCN=0; EnrACoeff=0; EnrBCoeff=0; OCUnits=Total
            Thickness  OC    FBiom  FInert
            150        2.2   0.03   0.45
            150        1.6   0.02   0.6
            300        1.15  0.01   0.78
            300        1     0.01   0.9
            300        0.8   0.01   0.99
            300        0.45  0.01   0.99
            300        0.45  0.01   0.99
          Analysis: Thickness=[150, 150, 300, 300, 300, 300, 300]; PH=[7.5, 8, 8, 8, 8, 8, 8]; PHUnits=Water; BoronUnits=HotWater
          Sample Initial Water: Thickness=[150, 150, 300, 300, 300, 300, 300]; SW=[0.326, 0.326, 0.346, 0.333, 0.315, 0.326, 0.326]; NO3Units=ppm; NH4Units=ppm; SWUnits=Volumetric; OCUnits=Total; PHUnits=Water
          Sample Initial Nitrogen: NO3Units=ppm; NH4Units=ppm; SWUnits=Volumetric; OCUnits=Total; PHUnits=Water
            Thickness  NO3   NH4
            150        1.3   1.3
            150        0.6   1
            300        0.25  1
            300        0.2   0.8
            300        0.1   0.8
            300        0.1   0.5
            300        0.1   0.5
        SurfaceOrganicMatter: crit_residue_wt=2000; opt_temp=20; cum_eos_max=20; cnrf_coeff=0.277; cnrf_optcn=25; c_fract=0.4; leach_rain_tot=25; min_rain_to_leach=10; crit_min_surfom_orgC=0.004; default_cpr=0; default_standing_fraction=0; standing_extinct_coeff=0.5; fractionFaecesAdded=0.5; PoolName=wheat_stubble; type=wheat; mass=500; standing_fraction=0.0; cnr=100
        Plant15 Wheat: AutoHarvest=false; CropType=Wheat; EOCropFactor=1.5; NSupplyPreference=active; DoRetranslocationBeforeNDemand=false
          Population1 Population: Density=121.61; LeafNumberCritical=10; TTEmergenceLimit=300; DaysToGerminationLimit=40; SWStressPhenoLimit=25; SWStressPhotoLimit=99; SWStressPhotoRate=0
            PhaseBasedSwitch CropFailureStressPeriod: Start=Emergence; End=Flowering
            SoilTemperatureWeightedFunction DeathHighTemperatureDuringEmergence
              XYPairs: X=[55, 60]; Y=[0, 1]
          Phenology: same as APS26.APS26NRate160WaterWet.paddock.Wheat.Phenology
          Root1 Root: NConcentrationCritical=0.02; NConcentrationMinimum=0.01; NConcentrationMaximum=0.02; InitialRootDepth=100; DieBackFraction=0; ll=[0.2, 0.2, 0.22, 0.18, 0.14, 0.25, 0.28]; kl=[0.06, 0.06, 0.06, 0.06, 0.06, 0.06, 0.06]; xf=[1, 1, 1, 1, 1, 1, 1]; ModifyKL=false; ClA=4; ClB=-0.005; ESPA=10; ESPB=-0.15; ECA=3; ECB=-1.3; NDeficitUptakeFraction=0.0001; NSenescenceConcentration=0.005; NSupplyPreference=active; SenescenceDetachmentFraction=1; InitialWt=0.01; InitialNConcentration=0.02; SpecificRootLength=105000
            Biomass Live
            Biomass Dead
            LinearInterpolationFunction RootAdvanceFactorTemp: XProperty=[Environment].MeanT
              XYPairs: X=[0, 25, 35]; Y=[0, 1, 0]
            LinearInterpolationFunction RootAdvanceFactorWaterStress: XProperty=[SWStress].Photo
              XYPairs: X=[0, 1]; Y=[1, 1]
            LinearInterpolationFunction SWFactorRootDepth: XProperty=[Root1].FASW
              XYPairs: X=[0, 0.25]; Y=[0, 1]
            LinearInterpolationFunction SWFactorRootLength: XProperty=[Root1].FASWLayered
              XYPairs: X=[0, 0.25]; Y=[0, 1]
            StageBasedInterpolation RootDepthRate: Codes=[0, 5, 30, 30, 30, 30, 0, 0, 0, 0, 0]; Proportional=false
              Stages=[Sowing, Germination, Emergence, EndOfJuvenile, FloralInitiation, Flowering, StartGrainFill, EndGrainFill, Maturity, HarvestRipe, EndCrop]
            LinearInterpolationFunction RelativeRootRate: XProperty=[Root1].RootLengthDensity
              XYPairs: X=[0, 0.0001, 0.0003]; Y=[0.02, 0.1, 1]
            NUptake3 NUptakeFunction: kno3=0.02; knh4=0; no3ppm_min=0; nh4ppm_min=0; total_n_uptake_max=0.6
              PhaseBasedSwitch NStressPeriod: Start=EndOfJuvenile(0.3); End=EndCrop
            Constant GrowthStructuralFractionStage: Value=1
            LinearInterpolationFunction DMSenescenceFraction: XProperty=[Leaf1].FractionCanopySenescing
              XYPairs: X=[0, 1]; Y=[0.005, 0.005]
            Live
            Dead
          GenericArbitratorXY Arbitrator1: same as APS26.APS26NRate160WaterWet.paddock.Wheat.Arbitrator1
          Leaf1 Leaf: dlt_dm_pot_rue=0; dlt_n_senesced_retrans=3.92391e-08; dlt_n_senesced_trans=0; dlt_height=0; dlt_width=0; width=0; NodeNumberCorrection=2; SLAMin=18000; FractionLeafSenescenceRate=0.035; NodeSenescenceRate=60; NFactLeafSenescenceRate=0; MinTPLA=5; NDeficitUptakeFraction=0.0001; InitialWt=0.003; InitialNConcentration=0.063; InitialTPLA=200; InitialLeafNumber=2; LAISenLight=7; SenLightSlope=0.002; SenRateWater=0.1; NSenescenceConcentration=0.005; SenescenceDetachmentFraction=0
            Biomass Live
            Biomass Dead
            RUEModel1 Photosynthesis: same as APS26.APS26NRate160WaterWet.paddock.Wheat.Leaf.Photosynthesis
            StageBasedInterpolation TE: Proportional=false
              Stages=[Sowing, Germination, Emergence, EndOfJuvenile, FloralInitiation, Flowering, StartGrainFill, EndGrainFill, Maturity, HarvestRipe, EndCrop]
              Codes=[0, 0, 0.006, 0.006, 0.006, 0.006, 0.006, 0.006, 0.0025, 0, 0]
            LinearInterpolationFunction TEModifier: XProperty=[WeatherFile].CO2
              XYPairs: X=[350, 700, 1000]; Y=[1, 1.37, 1.69]
            LinearInterpolationFunction NConcCriticalModifier: XProperty=[WeatherFile].CO2
              XYPairs: X=[350, 700, 1000]; Y=[1, 0.93, 0.9]
            PhaseBasedSwitch NodeFormationPeriod: Start=Emergence; End=HarvestRipe
            LinearInterpolationFunction NodeAppearanceRate: XProperty=[Leaf1].NodeNo
              XYPairs: X=[0, 20]; Y=[95, 95]
            LinearInterpolationFunction LeavesPerNode: XProperty=[Leaf1].NodeNo
              XYPairs: X=[0, 2.5, 6]; Y=[1, 1, 6]
            LinearInterpolationFunction LeafSize: XProperty=[Leaf1].NodeNumberNow
              XYPairs: X=[1, 5, 8, 10]; Y=[1400, 3700, 4800, 5600]
            Constant GrowthStructuralFractionStage: Value=1
            LinearInterpolationFunction SLAMax: XProperty=[Leaf1].LAI
              XYPairs: X=[0, 5]; Y=[27000, 22000]
            LinearInterpolationFunction LeafNumberFraction: XProperty=[Leaf1].LAIRatio
              XYPairs: X=[0, 0.1, 0.8, 1]; Y=[0, 1, 1, 1]
            PhaseBasedSwitch LeafSenescencePeriod: Start=EndOfJuvenile(0.4); End=EndCrop
            LinearInterpolationFunction LeafSenescenceFrost: XProperty=[WeatherFile].MinT
              XYPairs: X=[-15, -5]; Y=[0, 0]
            LinearInterpolationFunction DMSenescenceFraction: XProperty=[Leaf1].FractionCanopySenescing
              XYPairs: X=[0, 1]; Y=[0, 1]
            LinearInterpolationFunction ExtinctionCoefficient: XProperty=[PlantSpatial1].RowSpacing
              XYPairs: X=[200, 350, 1000]; Y=[0.5, 0.5, 0.5]
            LinearInterpolationFunction ExtinctionCoefficientDead: XProperty=[PlantSpatial1].RowSpacing
              XYPairs: X=[200, 350, 1000]; Y=[0.3, 0.3, 0.3]
            StageBasedInterpolation NConcentrationMinimum: Codes=[0.025, 0.025, 0.021, 0.01, 0.005, 0.0025]; Proportional=true
              Stages=[Emergence, EndOfJuvenile, FloralInitiation, Flowering, EndGrainFill, HarvestRipe]
            StageBasedInterpolation NConcentrationMaximum: Codes=[0.07, 0.07, 0.05, 0.02, 0.01, 0.005]; Proportional=true
              Stages=[Emergence, EndOfJuvenile, FloralInitiation, Flowering, EndGrainFill, HarvestRipe]
            StageBasedInterpolation NConcentrationCritical: Codes=[0.063, 0.063, 0.042, 0.015, 0.008, 0.0035]; Proportional=true
              Stages=[Emergence, EndOfJuvenile, FloralInitiation, Flowering, EndGrainFill, HarvestRipe]
            Live
            Dead
          Stem1 Stem: dlt_n_senesced_retrans=3.14083e-06; dlt_n_senesced_trans=0; dlt_height=0; dlt_width=0; NDeficitUptakeFraction=0.0001; NSenescenceConcentration=0.0025; SenescenceDetachmentFraction=0; InitialWt=0.0016; InitialNConcentration=0.05
            Biomass Live
            Biomass Dead
            LinearInterpolationFunction RetainFraction: XProperty=[Stem1].FractionHeightRemoved
              XYPairs: X=[0, 0.1, 1]; Y=[0, 0.2, 1]
            LinearInterpolationFunction HeightFunction: XProperty=[Stem1].GreenWtPerPlant
              XYPairs: X=[0, 6]; Y=[0, 1500]
            LinearInterpolationFunction GrowthStructuralFractionStage: XProperty=[Phenology].Stage
              XYPairs: X=[7, 7.01]; Y=[0.65, 0]
            LinearInterpolationFunction DMSenescenceFraction: XProperty=[Leaf1].FractionCanopySenescing
              XYPairs: X=[0, 1]; Y=[0, 0]
            StageBasedInterpolation NConcentrationMinimum: Codes=[0.025, 0.025, 0.004, 0.003, 0.003, 0.0025]; Proportional=true
              Stages=[Emergence, EndOfJuvenile, FloralInitiation, Flowering, EndGrainFill, HarvestRipe]
            StageBasedInterpolation NConcentrationMaximum: Codes=[0.07, 0.07, 0.04, 0.015, 0.015, 0.015]; Proportional=true
              Stages=[Emergence, EndOfJuvenile, FloralInitiation, Flowering, EndGrainFill, HarvestRipe]
            StageBasedInterpolation NConcentrationCritical: Codes=[0.05, 0.05, 0.02, 0.01, 0.005, 0.0035]; Proportional=true
              Stages=[Emergence, EndOfJuvenile, FloralInitiation, Flowering, EndGrainFill, HarvestRipe]
            Live
            Dead
          Pod: same as APS26.APS26NRate160WaterWet.paddock.Wheat.Pod
          Grain: same as APS26.APS26NRate160WaterWet.paddock.Wheat.Grain
          NStress: N_fact_photo=1.5; N_fact_pheno=100; N_fact_expansion=1; N_fact_grain=1.5
          SWStress: same as APS26.APS26NRate160WaterWet.paddock.Wheat.SWStress
          LinearInterpolationFunction TempStress: XProperty=[Environment].MeanT
            XYPairs: X=[0, 10, 25, 35]; Y=[0, 1, 1, 0]
          RadiationPartitioning: FractIncidentRadn=1; RadiationPartitioningOrder=[Pod, Grain, Leaf]
          StageBasedInterpolation NFixRate: Codes=[0, 0, 0, 0, 0, 0, 0, 0, 0, 0, 0]; Proportional=false
            Stages=[Sowing, Germination, Emergence, EndOfJuvenile, FloralInitiation, Flowering, StartGrainFill, EndGrainFill, Maturity, HarvestRipe, EndCrop]
          CompositeBiomass AboveGroundLive: Propertys=[[Leaf1].Live, [Stem1].Live, [Pod].Live, [Grain].Live]
          CompositeBiomass AboveGroundDead: Propertys=[[Leaf1].Dead, [Stem1].Dead, [Pod].Dead, [Grain].Dead]
          CompositeBiomass BelowGroundLive: Propertys=[[Root1].Live]
          CompositeBiomass BelowGroundDead: Propertys=[[Root1].Dead]
          CompositeBiomass TotalLive
            Propertys=[[Leaf1].Live, [Stem1].Live, [Pod].Live, [Grain].Live, [Root1].Live]
          CompositeBiomass TotalDead
            Propertys=[[Leaf1].Dead, [Stem1].Dead, [Pod].Dead, [Grain].Dead, [Root1].Dead]
          CompositeBiomass AboveGround: Propertys=[[AboveGroundLive], [AboveGroundDead]]
          CompositeBiomass BelowGround: Propertys=[[Root1].Live, [Root1].Dead]
          CompositeBiomass Total
            Propertys=[[AboveGroundLive], [AboveGroundDead], [BelowGroundLive], [BelowGroundDead]]
          CompositeBiomass Head: Propertys=[[Pod].Live, [Grain].Live, [Pod].Dead, [Grain].Dead]
          StageBasedInterpolation StageCode: Codes=[1, 2, 3, 4, 5, 6, 7, 8, 9, 10, 11]; Proportional=false
            Stages=[Sowing, Germination, Emergence, EndOfJuvenile, FloralInitiation, Flowering, StartGrainFill, EndGrainFill, Maturity, HarvestRipe, EndCrop]
          PlantSpatial1
          Environment: CO2=350
          PStress
          Zadok
        Manager ApplyFertiliser
          FertDayOfYear = 167
          Amount = 0
          script: same as in APS26.APS26NRate160WaterWet.paddock.ApplyFertiliser
        Operations IrrigationSchedule
          1992-06-17  Wheat.Sow(population:121.61, cultivar:"GattonHartog", depth:30, rowSpacing:250);
          1992-06-24  Irrigation.Apply(amount:10);
          1992-06-26  Irrigation.Apply(amount:10);
          1992-07-28  Irrigation.Apply(amount:30);
          1992-08-05  Irrigation.Apply(amount:30);
          1992-08-19  Irrigation.Apply(amount:40);
          1992-08-26  Irrigation.Apply(amount:40);
          1992-09-09  Irrigation.Apply(amount:40);
          1992-09-21  Irrigation.Apply(amount:40);
          1992-10-01  Irrigation.Apply(amount:50);
          1992-10-07  Irrigation.Apply(amount:20);
          1992-10-08  Irrigation.Apply(amount:20);
          1992-10-09  Irrigation.Apply(amount:20);
          1992-10-13  Irrigation.Apply(amount:20);
        MicroClimate: same as APS26.APS26NRate160WaterWet.paddock.MicroClimate
        PredictedObserved: FileName=APS26TimeSeries.txt; FieldNameUsedForMatch=Wheat.Zadok.Stage
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